// SBML level 2 version 1

model Varma()

  // Compartments:
  compartment c = 1; c is "rootCompartment";

  // Species:
  species $X14 in c = 2.703886e-6;
  species $X29 in c = 2.77424e-6;
  species $X35 in c = 3.241892e-6;
  species X1 in c = 1.384134e-6;
  species X2 in c = 0.000706953094;
  species X3 in c = 0.00392080804;
  species X4 in c = 1.147973e-6;
  species X5 in c = 4.675502e-6;
  species X6 in c = 0.000894391063;
  species X7 in c = 2.466505e-6;
  species X8 in c = 0.005124857;
  species X9 in c = 2.548275e-6;
  species X10 in c = 0.000262117808;
  species X11 in c = 3.0645425e-5;
  species X12 in c = 0.03787519;
  species X13 in c = 7.92584e-6;
  species X15 in c = 1.4518626e-5;
  species X16 in c = 1.113434e-6;
  species X17 in c = 0.000616740014;
  species X18 in c = 1.2695168e-5;
  species X19 in c = 0.003658179;
  species X20 in c = 6.5519569e-5;
  species X21 in c = 3.562557e-6;
  species X22 in c = 2.341766e-6;
  species X23 in c = 1.861526e-6;
  species X24 in c = 8.268274e-6;
  species X25 in c = 0.004136564;
  species X26 in c = 0.000460802549;
  species X27 in c = 1.229463e-6;
  species X28 in c = 8.3264538e-5;
  species X30 in c = 1.777923e-6;
  species X31 in c = 3.1623e-8;
  species X32 in c = 3.3029887e-5;
  species X33 in c = 1.817774e-6;
  species X34 in c = 0.00015324793;
  species X36 in c = 6.876137e-5;
  species X37 in c = 1.380756e-6;
  species X38 in c = 0.00066890011;
  species X39 in c = 0.000648297263;
  species X40 in c = 4.662512e-6;
  species X41 in c = 1.3149758e-5;
  species X42 in c = 1.196875e-6;
  species X43 in c = 0.04975786;
  species X44 in c = 3.328216e-6;
  species X45 in c = 1.840522e-6;
  species X46 in c = 5.8095435e-5;
  species X47 in c = 0.000449994287;
  species X48 in c = 0.01558558;
  species X49 in c = 0.006074331;
  species X50 in c = 0.002438235;
  species X51 in c = 0.01906762;
  species X52 in c = 0.000548435831;
  species X53 in c = 2.3722e-6;
  species X54 in c = 5.2310044e-5;

  // Parameters:
  X0_ac_e = 4.54045e-7;
  X0_acald_e = 1.613767e-6;
  X0_akg_e = 1.68741e-7;
  X0_etoh_e = 6.8753081e-5;
  X0_for_e = 2.5198e-7;
  X0_h_e = 1e-7;
  X0_lac_D_e = 9.3845e-8;
  X0_o2_e = 7.09034e-7;
  X0_pi_e = 0.02794804;
  X0_pyr_e = 1.3999e-8;
  X0_4crsol_e = 1.9378883e-5;
  X0_5drib_e = 5.1614e-8;
  X0_amob_e = 1.2963977e-5;
  X0_glycogenn1_e = 0.08112271;
  X0_mththf_e = 5.88636e-7;
  X0_cit_e = 5.7387e-8;
  X0_co2_e = 4.42889e-7;
  X0_glc_D_e = 0.06689069;
  X0_mal_L_e = 1.9177487e-5;
  X0_succ_e = 0.000184186581;
  kM_R1_9 = 1.891779e-6;
  kM_R1_19 = 0.000858668995;
  kM_R1_37 = 8.5562874e-5;
  kM_R1_10 = 0.000632479903;
  kM_R1_31 = 1.01952e-7;
  kM_R1_38 = 2.798184e-6;
  kM_R2_9 = 2.92444e-7;
  kM_R2_58 = 4.583169e-6;
  kM_R3_17 = 0.001546086;
  kM_R3_11 = 5.2812549e-5;
  kM_R4_11 = 5.919275e-6;
  kM_R4_33 = 3.3713138e-5;
  kM_R5_8 = 0.001034658;
  kM_R5_16 = 1.90064e-7;
  kM_R5_19 = 0.004485964;
  kM_R5_31 = 6.334e-9;
  kM_R5_10 = 0.000286576662;
  kM_R5_15 = 3.607412e-6;
  kM_R5_45 = 1.2607271e-5;
  kM_R6_8 = 0.001926878;
  kM_R6_31 = 2.35978e-7;
  kM_R6_57 = 1.248198e-6;
  kM_R6_74 = 1.50885e-7;
  kM_R7_13 = 1.0342079e-5;
  kM_R7_19 = 0.001334741;
  kM_R7_37 = 0.000358578256;
  kM_R7_18 = 1.853266e-6;
  kM_R7_38 = 1.341078e-6;
  kM_R7_54 = 7.229395e-6;
  kM_R8_13 = 1.302435e-6;
  kM_R8_31 = 6.6936e-8;
  kM_R8_59 = 4.0985e-7;
  kM_R8_74 = 3.26792e-7;
  kM_R9_9 = 8.42819e-6;
  kM_R9_31 = 4.3499e-8;
  kM_R9_38 = 3.267598e-6;
  kM_R9_22 = 1.965808e-6;
  kM_R9_37 = 0.000406771541;
  kM_R10_16 = 4.52414e-7;
  kM_R10_12 = 0.0199913;
  kM_R10_31 = 2.4077e-8;
  kM_R10_44 = 0.02911224;
  kM_R11_12 = 0.3241572;
  kM_R11_44 = 0.02016491;
  kM_R11_16 = 4.17092e-7;
  kM_R11_31 = 9.4416e-8;
  kM_R12_17 = 0.002894413;
  kM_R12_31 = 7.483e-8;
  kM_R14_10 = 0.000151390213;
  kM_R14_42 = 2.360895e-6;
  kM_R14_17 = 0.001107518;
  kM_R14_19 = 0.004829882;
  kM_R14_31 = 2.9809e-8;
  kM_R15_31 = 4.561e-9;
  kM_R15_41 = 1.029332e-6;
  kM_R15_48 = 0.001536681;
  kM_R15_47 = 0.000273463856;
  kM_R16_31 = 1.2521e-8;
  kM_R16_41 = 1.2619434e-5;
  kM_R16_48 = 0.003311169;
  kM_R16_47 = 7.0112608e-5;
  kM_R17_31 = 5.4729e-8;
  kM_R17_34 = 2.85536e-7;
  kM_R17_74 = 1.621e-8;
  kM_R17_77 = 2.9905e-8;
  kM_R18_2 = 0.000190137354;
  kM_R18_43 = 1.071065e-6;
  kM_R19_22 = 2.805911e-6;
  kM_R19_69 = 2.0388525e-5;
  kM_R20_24 = 5.250516e-6;
  kM_R20_20 = 0.000342615856;
  kM_R20_27 = 9.28545e-7;
  kM_R21_51 = 0.000725701181;
  kM_R21_20 = 7.8836197e-5;
  kM_R21_21 = 2.7592914e-5;
  kM_R22_24 = 2.8455036e-5;
  kM_R22_23 = 3.586173e-6;
  kM_R22_31 = 1.9611e-8;
  kM_R22_44 = 0.08686146;
  kM_R23_25 = 0.000699963055;
  kM_R23_71 = 3.20332e-7;
  kM_R24_26 = 0.00087445182;
  kM_R24_35 = 0.000670862529;
  kM_R25_28 = 0.000325809092;
  kM_R25_39 = 0.000255186106;
  kM_R25_7 = 1.592276e-6;
  kM_R25_31 = 1.46697e-7;
  kM_R25_40 = 0.00013515164;
  kM_R26_27 = 3.914709e-6;
  kM_R26_37 = 0.000268168556;
  kM_R26_44 = 0.2131212;
  kM_R26_1 = 1.335723e-6;
  kM_R26_38 = 1.095811e-6;
  kM_R27_43 = 3.010319e-6;
  kM_R27_28 = 3.4005431e-5;
  kM_R27_46 = 5.353318e-6;
  kM_R28_6 = 0.000509747815;
  kM_R28_39 = 0.000244854515;
  kM_R28_18 = 7.7344681e-5;
  kM_R28_40 = 0.000273672081;
  kM_R28_50 = 0.002101037;
  kM_R29_33 = 2.2302011e-5;
  kM_R29_39 = 0.000310194954;
  kM_R29_13 = 2.565605e-6;
  kM_R29_18 = 9.389318e-6;
  kM_R29_40 = 0.000469063361;
  kM_R30_33 = 4.2647505e-5;
  kM_R30_29 = 3.45396e-7;
  kM_R30_53 = 0.000459569071;
  kM_R31_31 = 2.1061e-8;
  kM_R31_38 = 6.29184e-7;
  kM_R31_46 = 4.499947e-6;
  kM_R31_34 = 6.55477e-7;
  kM_R31_37 = 0.000346383513;
  kM_R32_10 = 0.000155258235;
  kM_R32_29 = 3.008486e-6;
  kM_R32_19 = 0.0011859192;
  kM_R32_31 = 3.49e-8;
  kM_R32_35 = 0.00012349617;
  kM_R33_35 = 2.0430066e-5;
  kM_R33_31 = 5.9965e-8;
  kM_R34_35 = 0.000245952639;
  kM_R34_37 = 6.2976811e-5;
  kM_R34_31 = 2.1141e-8;
  kM_R34_38 = 1.76163e-7;
  kM_R34_42 = 6.719032e-6;
  kM_R35_35 = 0.000481443654;
  kM_R35_37 = 6.9261259e-5;
  kM_R35_18 = 6.141125e-6;
  kM_R35_38 = 1.92688e-7;
  kM_R35_46 = 9.60479e-7;
  kM_R36_35 = 0.000151381838;
  kM_R36_39 = 0.00388685746;
  kM_R36_18 = 2.0385609e-5;
  kM_R36_40 = 0.0001125762;
  kM_R36_46 = 1.086763e-5;
  kM_R37_31 = 4.4028e-8;
  kM_R37_38 = 1.904954e-6;
  kM_R37_47 = 0.000142409976;
  kM_R37_37 = 3.4327334e-5;
  kM_R37_48 = 0.00076749671;
  kM_R38_31 = 6.8617e-8;
  kM_R38_38 = 2.61941e-7;
  kM_R38_47 = 2.5126846e-5;
  kM_R38_37 = 0.000133824049;
  kM_R38_48 = 0.000834072854;
  kM_R39_37 = 7.3089968e-5;
  kM_R39_40 = 0.000220172898;
  kM_R39_38 = 1.412063e-6;
  kM_R39_39 = 0.000470295857;
  kM_R41_19 = 0.000620059508;
  kM_R41_37 = 0.000184662533;
  kM_R41_46 = 3.2399e-7;
  kM_R41_10 = 0.001329423;
  kM_R41_18 = 6.517118e-6;
  kM_R41_38 = 6.57727e-7;
  kM_R42_23 = 2.163689e-6;
  kM_R42_16 = 2.01851e-7;
  kM_R42_24 = 3.30343e-6;
  kM_R42_12 = 0.0173608;
  kM_R42_43 = 3.891756e-6;
  kM_R43_16 = 1.502866e-6;
  kM_R43_52 = 0.01312349;
  kM_R43_12 = 0.03408372;
  kM_R43_51 = 0.000428954493;
  kM_R44_19 = 0.003247386;
  kM_R44_46 = 2.68035e-7;
  kM_R44_10 = 0.000530357704;
  kM_R44_25 = 0.001835458;
  kM_R45_28 = 0.000202911695;
  kM_R45_23 = 4.835563e-6;
  kM_R46_1 = 1.59586e-7;
  kM_R46_12 = 0.0683132528;
  kM_R46_3 = 0.003232067;
  kM_R46_16 = 1.112652e-6;
  kM_R46_31 = 6.032e-9;
  kM_R47_7 = 9.60496e-7;
  kM_R47_6 = 0.001836669;
  kM_R47_31 = 4.0325e-8;
  kM_R48_3 = 0.004576984;
  kM_R48_2 = 0.003930856;
  kM_R50_16 = 1.83059e-7;
  kM_R50_12 = 0.08793254;
  kM_R50_31 = 1.1738e-8;
  kM_R50_44 = 0.01114418;
  kM_R51_18 = 4.49422e-6;
  kM_R51_43 = 3.150723e-6;
  kM_R51_31 = 1.74331e-7;
  kM_R51_42 = 8.220786e-6;
  kM_R51_44 = 0.2979184;
  kM_R52_16 = 1.66839e-7;
  kM_R52_31 = 2.5988e-8;
  kM_R52_42 = 8.290269e-5;
  kM_R52_12 = 0.03014012;
  kM_R52_18 = 4.013394e-6;
  kM_R52_43 = 1.608048e-6;
  kM_R53_12 = 0.1769924;
  kM_R53_43 = 6.340597e-6;
  kM_R53_16 = 2.32581e-6;
  kM_R53_46 = 5.712037e-6;
  kM_R54_31 = 1.9928e-8;
  kM_R54_46 = 1.684503e-6;
  kM_R54_74 = 1.53061e-7;
  kM_R54_87 = 5.8941e-8;
  kM_R55_50 = 0.002112119;
  kM_R55_55 = 6.2268999e-5;
  kM_R56_50 = 0.001181699;
  kM_R56_49 = 0.03472475;
  kM_R57_53 = 0.000308824285;
  kM_R57_31 = 1.22407e-7;
  kM_R58_53 = 0.000283601968;
  kM_R58_47 = 1.4892691e-5;
  kM_R58_26 = 0.000522754007;
  kM_R58_48 = 0.000161131452;
  kM_R59_16 = 1.369072e-6;
  kM_R59_19 = 0.009855319;
  kM_R59_53 = 0.000273721731;
  kM_R59_12 = 0.2180824;
  kM_R59_44 = 0.248681;
  kM_R59_54 = 8.929682e-6;
  kM_R60_27 = 2.03651e-6;
  kM_R60_52 = 0.04078979;
  kM_R60_21 = 4.55528e-7;
  kM_R60_23 = 9.9856e-7;
  kM_R61_38 = 9.954245e-6;
  kM_R61_39 = 0.000908158799;
  kM_R61_31 = 2.5678e-8;
  kM_R61_37 = 0.000133258294;
  kM_R61_40 = 0.000994095717;
  kM_R62_49 = 0.04633447;
  kM_R62_55 = 9.9606324e-5;
  kM_R62_27 = 9.95541e-7;
  kM_R62_52 = 0.06137231;
  kM_R63_21 = 1.6883115e-5;
  kM_R63_55 = 3.5868643e-5;
  kM_R63_23 = 1.2452635e-5;
  kM_R63_27 = 3.351087e-6;
  kM_R64_20 = 3.7804038e-5;
  kM_R64_27 = 3.64044e-7;
  kM_R65_4 = 3.05936e-7;
  kM_R65_92 = 5.7914457e-5;
  kM_R66_5 = 1.5474636e-5;
  kM_R66_93 = 1.90997e-7;
  kM_R67_14 = 6.27942e-7;
  kM_R67_94 = 4.5237577e-5;
  kM_R68_95 = 0.05809448;
  kM_R68_30 = 9.07503e-7;
  kM_R69_36 = 8.360245e-6;
  kM_R69_96 = 1.80472e-7;
  kM_R70_10 = 4.8965737e-5;
  kM_R71_13 = 5.068326e-6;
  kM_R72_15 = 3.0760687e-5;
  kM_R73_16 = 2.546163e-6;
  kM_R74_20 = 0.000124679605;
  kM_R75_21 = 1.674684e-6;
  kM_R76_23 = 1.807927e-6;
  kM_R77_25 = 0.003055818;
  kM_R78_28 = 0.000177313774;
  kM_R79_30 = 3.574384e-6;
  kM_R80_38 = 6.60185e-7;
  kM_R81_40 = 0.000484308999;
  kM_R82_41 = 7.182613e-6;
  kM_R83_42 = 2.7301556e-5;
  kM_R84_43 = 1.983356e-6;
  kM_R85_45 = 9.68318e-7;
  kM_R86_46 = 1.168203e-6;
  kM_R87_47 = 1.6792686e-5;
  kM_R88_49 = 0.01313259;
  kM_R89_50 = 0.00707084;
  kM_R90_52 = 0.04306869;
  kM_R91_54 = 3.56215e-7;
  kM_R92_4 = 2.9435e-7;
  Kf_R13 = 1512727;
  Kf_R40 = 7.345578e7;
  Kf_R49 = 3.195138e8;
  vMax_R1 = 9.283002;
  vMax_R2 = 0.03832765;
  vMax_R3 = 37.26785;
  vMax_R4 = 8.782924;
  vMax_R5 = 1.537312;
  vMax_R6 = 0.8722211;
  vMax_R7 = 26.61741;
  vMax_R8 = 0.000466551984;
  vMax_R9 = 0.005156716;
  vMax_R10 = 69.7462;
  vMax_R11 = 1603.31;
  vMax_R12 = 0.000759959239;
  vMax_R14 = 10.87519;
  vMax_R15 = 0.002293174;
  vMax_R16 = 6634.685;
  vMax_R17 = 0.002217331;
  vMax_R18 = 18.2861;
  vMax_R19 = 0.000730854156;
  vMax_R20 = 6.08303;
  vMax_R21 = 4.084985;
  vMax_R22 = 0.002232055;
  vMax_R23 = 0.000128930484;
  vMax_R24 = 16.06007;
  vMax_R25 = 258.6648;
  vMax_R26 = 3511.125;
  vMax_R27 = 103.8301;
  vMax_R28 = 41.2513;
  vMax_R29 = 11.03591;
  vMax_R30 = 159.9967;
  vMax_R31 = 0.001104664;
  vMax_R32 = 48.04305;
  vMax_R33 = 0.000119158158;
  vMax_R34 = 5676.296;
  vMax_R35 = 0.02339216;
  vMax_R36 = 0.008060214;
  vMax_R37 = 4162.979;
  vMax_R38 = 0.000563916287;
  vMax_R39 = 13.21748;
  vMax_R41 = 45.6572;
  vMax_R42 = 19.97438;
  vMax_R43 = 55.49302;
  vMax_R44 = 2.433544;
  vMax_R45 = 0.000433802395;
  vMax_R46 = 102.808;
  vMax_R47 = 16.38228;
  vMax_R48 = 28.17475;
  vMax_R50 = 0.002307102;
  vMax_R51 = 4.229959;
  vMax_R52 = 0.002721027;
  vMax_R53 = 148.9086;
  vMax_R54 = 0.000435672049;
  vMax_R55 = 7.886257;
  vMax_R56 = 7.311114;
  vMax_R57 = 0.000169148666;
  vMax_R58 = 14.97336;
  vMax_R59 = 0.001859297;
  vMax_R60 = 0.01101527;
  vMax_R61 = 0.01004415;
  vMax_R62 = 73.09603;
  vMax_R63 = 28.16013;
  vMax_R64 = 18.82866;
  vMax_R65 = 0.001319576;
  vMax_R66 = 0.01399401;
  vMax_R67 = 0.00129845;
  vMax_R68 = 0.951117;
  vMax_R69 = 0.02461013;
  vMax_R70 = 3.050576;
  vMax_R71 = 1.315372;
  vMax_R72 = 1.243863;
  vMax_R73 = 184.4739;
  vMax_R74 = 0.3645909;
  vMax_R75 = 0.4033792;
  vMax_R76 = 0.1038557;
  vMax_R77 = 1.233617;
  vMax_R78 = 0.449823;
  vMax_R79 = 0.342242;
  vMax_R80 = 2.14634;
  vMax_R81 = 26.16674;
  vMax_R82 = 0.000627006405;
  vMax_R83 = 12.0489;
  vMax_R84 = 1.559245;
  vMax_R85 = 0.5148788;
  vMax_R86 = 3.364103;
  vMax_R87 = 0.3074659;
  vMax_R88 = 1.24752;
  vMax_R89 = 0.04044115;
  vMax_R90 = 0.07833853;
  vMax_R91 = 0.4399468;
  vMax_R92 = 0.000207018154;
  Keq_R1 = 0.2557195;
  Keq_R2 = 9.454202;
  Keq_R3 = 0.1301532;
  Keq_R4 = 4.005221;
  Keq_R5 = 2.514114e9;
  Keq_R6 = 4.584859;
  Keq_R7 = 4.201727e9;
  Keq_R8 = 11.30223;
  Keq_R9 = 2.446714e11;
  Keq_R10 = 0.01413929;
  Keq_R11 = 213.4;
  Keq_R12 = 7.948642;
  Keq_R13 = 1.76724;
  Keq_R14 = 0.6908885;
  Keq_R15 = 1.986765e56;
  Keq_R16 = 8.574439e50;
  Keq_R17 = 71.88744;
  Keq_R18 = 26.9743;
  Keq_R19 = 200.5705;
  Keq_R20 = 0.006122557;
  Keq_R21 = 0.01020433;
  Keq_R22 = 1.24252e-7;
  Keq_R23 = 10.42914;
  Keq_R24 = 6.929121;
  Keq_R25 = 8.7571089e-5;
  Keq_R26 = 92.3458;
  Keq_R27 = 0.2509821;
  Keq_R28 = 0.5927162;
  Keq_R29 = 0.02161877;
  Keq_R30 = 0.000108284337;
  Keq_R31 = 2.189725e11;
  Keq_R32 = 0.1018405;
  Keq_R33 = 4.674422;
  Keq_R34 = 6.3e-11;
  Keq_R35 = 0.3212782;
  Keq_R36 = 0.8571772;
  Keq_R37 = 2.631133e19;
  Keq_R38 = 1.61887e20;
  Keq_R39 = 2.712216;
  Keq_R40 = 9.845899;
  Keq_R41 = 7773191;
  Keq_R42 = 379134.3;
  Keq_R43 = 248245;
  Keq_R44 = 763020.2;
  Keq_R45 = 14.5196;
  Keq_R46 = 1.47615e-7;
  Keq_R47 = 0.06151176;
  Keq_R48 = 10.61206;
  Keq_R49 = 2.400079;
  Keq_R50 = 0.3738661;
  Keq_R51 = 4.2e-10;
  Keq_R52 = 1.438111e8;
  Keq_R53 = 206.2145;
  Keq_R54 = 49.24185;
  Keq_R55 = 23.54141;
  Keq_R56 = 5.916287;
  Keq_R57 = 1.199618;
  Keq_R58 = 4207.562;
  Keq_R59 = 7312.631;
  Keq_R60 = 7.412225;
  Keq_R61 = 31.11978;
  Keq_R62 = 0.4312353;
  Keq_R63 = 4852.389;
  Keq_R64 = 0.1362948;
  Keq_R65 = 20.32081;
  Keq_R66 = 0.03433239;
  Keq_R67 = 2391.528;
  Keq_R68 = 3.4944708e-5;
  Keq_R69 = 5.455969;
  beta_R42 = 100;
  alpha_R42 = 0.01;

  // Rate rules:
  X14' = -V67 + 2.233811e-5*V70 + 4.85611e-6*V71 + 9.712221e-6*V72 + 9.712221e-6*V73 + 2.913666e-6*V74 + 3.884888e-6*V75 + 5.827332e-6*V76 + 5.827332e-6*V78 + 2.330933e-5*V79 + 2.039566e-5*V80 + 2.039566e-5*V81 + 3.884888e-6*V83 + 2.913666e-6*V84 + 2.913666e-6*V86 + 4.758988e-5*V87 + 4.85611e-6*V88 + 4.85611e-6*V89 + 6.798554e-6*V90 + 2.428055e-5*V91 + 6.021577e-5*V92;
  X29' = V30 - V32 + 1.472463e-5*V70 + 3.201006e-6*V71 + 6.402012e-6*V72 + 6.402012e-6*V73 + 1.920604e-6*V74 + 2.560805e-6*V75 + 3.841207e-6*V76 + 3.841207e-6*V78 + 1.536483e-5*V79 + 1.344422e-5*V80 + 1.344422e-5*V81 + 2.560805e-6*V83 + 1.920604e-6*V84 + 1.920604e-6*V86 + 3.136986e-5*V87 + 3.201006e-6*V88 + 3.201006e-6*V89 + 4.481408e-6*V90 + 1.600503e-5*V91 + 3.969247e-5*V92;
  X35' = -V69 + 4.442505e-5*V70 + 9.657619e-6*V71 + 1.931524e-5*V72 + 1.931524e-5*V73 + 5.794571e-6*V74 + 7.726095e-6*V75 + 1.158914e-5*V76 + 1.158914e-5*V78 + 4.635657e-5*V79 + 4.0562e-5*V80 + 4.0562e-5*V81 + 7.726095e-6*V83 + 5.794571e-6*V84 + 5.794571e-6*V86 + 9.464467e-5*V87 + 9.657619e-6*V88 + 9.657619e-6*V89 + 1.352067e-5*V90 + 4.82881e-5*V91 + 0.0001197545*V92;

  // Reactions:
  V1: X9 + X19 + X36 => X10 + X31 + X37; vMax_R1*(X9^1*X19^1*X36^1 - X10*X31*X37/Keq_R1)/(kM_R1_9^1*kM_R1_19^1*kM_R1_37^1*((1 + (X9/kM_R1_9)^1)*(1 + (X19/kM_R1_19)^1)*(1 + (X36/kM_R1_37)^1) + (1 + (X10/kM_R1_10)^1)*(1 + (X31/kM_R1_31)^1)*(1 + (X37/kM_R1_38)^1) - 1));
  V2: X9 => ; vMax_R2*(X9 - X0_acald_e/Keq_R2)/(kM_R2_9*(X9/kM_R2_9 + X0_acald_e/kM_R2_58 + 1));
  V3: X17 => X11; vMax_R3*(X17 - X11/Keq_R3)/(kM_R3_17*(X17/kM_R3_17 + X11/kM_R3_11 + 1));
  V4: X11 => X32; vMax_R4*(X11 - X32/Keq_R4)/(kM_R4_11*(X11/kM_R4_11 + X32/kM_R4_33 + 1));
  V5: X8 + X16 + X19 + X31 => X10 + X15 + X44; vMax_R5*(X8^1*X16^1*X19^1*X31^1 - X10*X15*X44/Keq_R5)/(kM_R5_8^1*kM_R5_16^1*kM_R5_19^1*kM_R5_31^1*((1 + (X8/kM_R5_8)^1)*(1 + (X16/kM_R5_16)^1)*(1 + (X19/kM_R5_19)^1)*(1 + (X31/kM_R5_31)^1) + (1 + (X10/kM_R5_10)^1)*(1 + (X15/kM_R5_15)^1)*(1 + (X44/kM_R5_45)^1) - 1));
  V6: X8 + X31 => ; vMax_R6*(X8*X31 - X0_ac_e*X0_h_e/Keq_R6)/(kM_R6_8*kM_R6_31*(1 + X8/kM_R6_8 + X0_ac_e/kM_R6_57)*(1 + X31/kM_R6_31 + X0_h_e/kM_R6_74));
  V7: X13 + X19 + X36 => X18 + X37 + X53; vMax_R7*(X13^1*X19^1*X36^1 - X18*X37*X53/Keq_R7)/(kM_R7_13^1*kM_R7_19^1*kM_R7_37^1*((1 + (X13/kM_R7_13)^1)*(1 + (X19/kM_R7_19)^1)*(1 + (X36/kM_R7_37)^1) + (1 + (X18/kM_R7_18)^1)*(1 + (X37/kM_R7_38)^1)*(1 + (X53/kM_R7_54)^1) - 1));
  V8: X13 + X31 => ; vMax_R8*(X13*X31 - X0_akg_e*X0_h_e/Keq_R8)/(kM_R8_13*kM_R8_31*(1 + X13/kM_R8_13 + X0_akg_e/kM_R8_59)*(1 + X31/kM_R8_31 + X0_h_e/kM_R8_74));
  V9: X9 + X31 + X37 => X22 + X36; vMax_R9*(X9*X31*X37 - X22*X36/Keq_R9)/(kM_R9_9*kM_R9_31*kM_R9_38*((1 + X9/kM_R9_9)*(1 + X31/kM_R9_31)*(1 + X37/kM_R9_38) + (1 + X22/kM_R9_22)*(1 + X36/kM_R9_37) - 1));
  V10: X16 => X12 + X31 + X43; vMax_R10*(X16^1 - X12*X31*X43/Keq_R10)/(kM_R10_16^1*(1 + (X16/kM_R10_16)^1 + (1 + (X12/kM_R10_12)^1)*(1 + (X31/kM_R10_31)^1)*(1 + (X43/kM_R10_44)^1) - 1));
  V11: X12 + X43 => X16 + 3 X31; vMax_R11*(X12^1*X43^1 - X16*X31^3/Keq_R11)/(kM_R11_12^1*kM_R11_44^1*((1 + (X12/kM_R11_12)^1)*(1 + (X43/kM_R11_44)^1) + (1 + (X16/kM_R11_16)^1)*(1 + (X31/kM_R11_31)^1 + (X31/kM_R11_31)^2 + (X31/kM_R11_31)^3) - 1));
  V12: X17 => X31; vMax_R12*(X17 - X31*X0_cit_e/Keq_R12)/(kM_R12_17*(X17/kM_R12_17 + X31/kM_R12_31 + 1));
  V13: X18 => ; Kf_R13*(X18 - X0_co2_e/Keq_R13);
  V14: X10 + X41 => X17 + X19 + X31; vMax_R14*(X10*X41 - X17*X19*X31/Keq_R14)/(kM_R14_10*kM_R14_42*((1 + X10/kM_R14_10)*(1 + X41/kM_R14_42) + (1 + X17/kM_R14_17)*(1 + X19/kM_R14_19)*(1 + X31/kM_R14_31) - 1));
  V15: 4 X31 + X40 + 2 X47 => 2 X46; vMax_R15*(X31^4*X40^1*X47^2 - X46^2*X0_h_e^4/Keq_R15)/(kM_R15_31^4*kM_R15_41^1*kM_R15_48^2*((1 + (X31/kM_R15_31)^1 + (X31/kM_R15_31)^2 + (X31/kM_R15_31)^3 + (X31/kM_R15_31)^4)*(1 + (X40/kM_R15_41)^1)*(1 + (X47/kM_R15_48)^1 + (X47/kM_R15_48)^2) + 1 + (X46/kM_R15_47)^1 + (X46/kM_R15_47)^2 - 1));
  V16: 8 X31 + X40 + 2 X47 => 2 X46; vMax_R16*(X31^8*X40^1*X47^2 - X46^2*X0_h_e^8/Keq_R16)/(kM_R16_31^8*kM_R16_41^1*kM_R16_48^2*((1 + (X31/kM_R16_31)^1 + (X31/kM_R16_31)^2 + (X31/kM_R16_31)^3 + (X31/kM_R16_31)^4 + (X31/kM_R16_31)^5 + (X31/kM_R16_31)^6 + (X31/kM_R16_31)^7 + (X31/kM_R16_31)^8)*(1 + (X40/kM_R16_41)^1)*(1 + (X47/kM_R16_48)^1 + (X47/kM_R16_48)^2) + 1 + (X46/kM_R16_47)^1 + (X46/kM_R16_47)^2 - 1));
  V17: X31 + X33 => ; vMax_R17*(X31*X33 - X0_h_e*X0_lac_D_e/Keq_R17)/(kM_R17_31*kM_R17_34*(1 + X31/kM_R17_31 + X0_h_e/kM_R17_74)*(1 + X33/kM_R17_34 + X0_lac_D_e/kM_R17_77));
  V18: X2 => X42; vMax_R18*(X2 - X42/Keq_R18)/(kM_R18_2*(X2/kM_R18_2 + X42/kM_R18_43 + 1));
  V19: X22 => ; vMax_R19*(X22 - X0_etoh_e/Keq_R19)/(kM_R19_22*(X22/kM_R19_22 + X0_etoh_e/kM_R19_69 + 1));
  V20: X24 => X20 + X27; vMax_R20*(X24 - X20*X27/Keq_R20)/(kM_R20_24*(1 + X24/kM_R20_24 + X20/kM_R20_20 + X27/kM_R20_27 + X20/kM_R20_20*(X27/kM_R20_27)));
  V21: X50 => X20 + X21; vMax_R21*(X50 - X20*X21/Keq_R21)/(kM_R21_51*(1 + X50/kM_R21_51 + X20/kM_R21_20 + X21/kM_R21_21 + X20/kM_R21_20*(X21/kM_R21_21)));
  V22: X24 => X23 + X31 + X43; vMax_R22*(X24^1 - X23*X31*X43/Keq_R22)/(kM_R22_24^1*(1 + (X24/kM_R22_24)^1 + (1 + (X23/kM_R22_23)^1)*(1 + (X31/kM_R22_31)^1)*(1 + (X43/kM_R22_44)^1) - 1));
  V23: X25 => ; vMax_R23*(X25 - X0_for_e/Keq_R23)/(kM_R23_25*(X25/kM_R23_25 + X0_for_e/kM_R23_71 + 1));
  V24: X26 => X34; vMax_R24*(X26 - X34/Keq_R24)/(kM_R24_26*(X26/kM_R24_26 + X34/kM_R24_35 + 1));
  V25: X28 + X38 => X7 + X31 + X39; vMax_R25*(X28*X38 - X7*X31*X39/Keq_R25)/(kM_R25_28*kM_R25_39*((1 + X28/kM_R25_28)*(1 + X38/kM_R25_39) + (1 + X7/kM_R25_7)*(1 + X31/kM_R25_31)*(1 + X39/kM_R25_40) - 1));
  V26: X27 + X36 + X43 => X1 + X37; vMax_R26*(X27*X36*X43 - X1*X37/Keq_R26)/(kM_R26_27*kM_R26_37*kM_R26_44*((1 + X27/kM_R26_27)*(1 + X36/kM_R26_37)*(1 + X43/kM_R26_44) + (1 + X1/kM_R26_1)*(1 + X37/kM_R26_38) - 1));
  V27: X42 => X28 + X45; vMax_R27*(X42 - X28*X45/Keq_R27)/(kM_R27_43*(1 + X42/kM_R27_43 + X28/kM_R27_28 + X45/kM_R27_46 + X28/kM_R27_28*(X45/kM_R27_46)));
  V28: X6 + X38 => X18 + X39 + X49; vMax_R28*(X6*X38 - X18*X39*X49/Keq_R28)/(kM_R28_6*kM_R28_39*((1 + X6/kM_R28_6)*(1 + X38/kM_R28_39) + (1 + X18/kM_R28_18)*(1 + X39/kM_R28_40)*(1 + X49/kM_R28_50) - 1));
  V29: X32 + X38 => X13 + X18 + X39; vMax_R29*(X32*X38 - X13*X18*X39/Keq_R29)/(kM_R29_33*kM_R29_39*((1 + X32/kM_R29_33)*(1 + X38/kM_R29_39) + (1 + X13/kM_R29_13)*(1 + X18/kM_R29_18)*(1 + X39/kM_R29_40) - 1));
  V30: X32 => X52 + $X29; vMax_R30*(X32 - X29*X52/Keq_R30)/(kM_R30_33*(1 + X32/kM_R30_33 + X29/kM_R30_29 + X52/kM_R30_53 + X29/kM_R30_29*(X52/kM_R30_53)));
  V31: X31 + X37 + X45 => X33 + X36; vMax_R31*(X31*X37*X45 - X33*X36/Keq_R31)/(kM_R31_31*kM_R31_38*kM_R31_46*((1 + X31/kM_R31_31)*(1 + X37/kM_R31_38)*(1 + X45/kM_R31_46) + (1 + X33/kM_R31_34)*(1 + X36/kM_R31_37) - 1));
  V32: X10 + $X29 => X19 + X31 + X34; vMax_R32*(X10*X29 - X19*X31*X34/Keq_R32)/(kM_R32_10*kM_R32_29*((1 + X10/kM_R32_10)*(1 + X29/kM_R32_29) + (1 + X19/kM_R32_19)*(1 + X31/kM_R32_31)*(1 + X34/kM_R32_35) - 1));
  V33: X34 => X31; vMax_R33*(X34 - X31*X0_mal_L_e/Keq_R33)/(kM_R33_35*(X34/kM_R33_35 + X31/kM_R33_31 + 1));
  V34: X34 + X36 => X31 + X37 + X41; vMax_R34*(X34*X36 - X31*X37*X41/Keq_R34)/(kM_R34_35*kM_R34_37*((1 + X34/kM_R34_35)*(1 + X36/kM_R34_37) + (1 + X31/kM_R34_31)*(1 + X37/kM_R34_38)*(1 + X41/kM_R34_42) - 1));
  V35: X34 + X36 => X18 + X37 + X45; vMax_R35*(X34*X36 - X18*X37*X45/Keq_R35)/(kM_R35_35*kM_R35_37*((1 + X34/kM_R35_35)*(1 + X36/kM_R35_37) + (1 + X18/kM_R35_18)*(1 + X37/kM_R35_38)*(1 + X45/kM_R35_46) - 1));
  V36: X34 + X38 => X18 + X39 + X45; vMax_R36*(X34*X38 - X18*X39*X45/Keq_R36)/(kM_R36_35*kM_R36_39*((1 + X34/kM_R36_35)*(1 + X38/kM_R36_39) + (1 + X18/kM_R36_18)*(1 + X39/kM_R36_40)*(1 + X45/kM_R36_46) - 1));
  V37: 4 X31 + X37 + X46 => X36 + X47; vMax_R37*(X31^4*X37^1*X46^1 - X36*X47*X0_h_e^3/Keq_R37)/(kM_R37_31^4*kM_R37_38^1*kM_R37_47^1*((1 + (X31/kM_R37_31)^1 + (X31/kM_R37_31)^2 + (X31/kM_R37_31)^3 + (X31/kM_R37_31)^4)*(1 + (X37/kM_R37_38)^1)*(1 + (X46/kM_R37_47)^1) + (1 + (X36/kM_R37_37)^1)*(1 + (X47/kM_R37_48)^1) - 1));
  V38: X31 + X37 + X46 => X36 + X47; vMax_R38*(X31*X37*X46 - X36*X47/Keq_R38)/(kM_R38_31*kM_R38_38*kM_R38_47*((1 + X31/kM_R38_31)*(1 + X37/kM_R38_38)*(1 + X46/kM_R38_47) + (1 + X36/kM_R38_37)*(1 + X47/kM_R38_48) - 1));
  V39: X36 + X39 => X37 + X38; vMax_R39*(X36*X39 - X37*X38/Keq_R39)/(kM_R39_37*kM_R39_40*(1 + X36/kM_R39_37 + X37/kM_R39_38)*(1 + X39/kM_R39_40 + X38/kM_R39_39));
  V40: => X40; Kf_R40*(X0_o2_e - X40/Keq_R40);
  V41: X19 + X36 + X45 => X10 + X18 + X37; vMax_R41*(X19^1*X36^1*X45^1 - X10*X18*X37/Keq_R41)/(kM_R41_19^1*kM_R41_37^1*kM_R41_46^1*((1 + (X19/kM_R41_19)^1)*(1 + (X36/kM_R41_37)^1)*(1 + (X45/kM_R41_46)^1) + (1 + (X10/kM_R41_10)^1)*(1 + (X18/kM_R41_18)^1)*(1 + (X37/kM_R41_38)^1) - 1));
  V42: X16 + X23 => X12 + X24; vMax_R42*(X23*X16 - X12*X24*X42^0/Keq_R42)*(X23/kM_R42_23 + X24/kM_R42_24)^3*(X16/kM_R42_16 + X12/kM_R42_12)^3/(kM_R42_23*kM_R42_16*((1 + (X42/kM_R42_43)^4)/(1 + alpha_R42^2*(X42/kM_R42_43)^4)*(1 + (X12/kM_R42_12)^4)/(1 + beta_R42^2*(X12/kM_R42_12)^4) + (1 + beta_R42*(X12/kM_R42_12)^4)/(1 + beta_R42^2*(X12/kM_R42_12)^4)*(1 + alpha_R42*(X42/kM_R42_43)^4)/(1 + alpha_R42^2*(X42/kM_R42_43)^4)*((X23/kM_R42_23 + X24/kM_R42_24)^4 + (X16/kM_R42_16 + X12/kM_R42_12)^4) + (X23/kM_R42_23 + X24/kM_R42_24)^4*(X16/kM_R42_16 + X12/kM_R42_12)^4));  // modifiers: X42
  V43: X16 + X51 => X12 + X50; vMax_R43*(X16*X51 - X12*X50/Keq_R43)/(kM_R43_16*kM_R43_52*(1 + X16/kM_R43_16 + X12/kM_R43_12)*(1 + X51/kM_R43_52 + X50/kM_R43_51));
  V44: X19 + X45 => X10 + X25; vMax_R44*(X19*X45 - X10*X25/Keq_R44)/(kM_R44_19*kM_R44_46*(1 + X19/kM_R44_19 + X10/kM_R44_10)*(1 + X45/kM_R44_46 + X25/kM_R44_25));
  V45: X28 => X23; vMax_R45*(X28 - X23/Keq_R45)/(kM_R45_28*(X28/kM_R45_28 + X23/kM_R45_23 + 1));
  V46: X1 + X12 => X3 + X16 + X31; vMax_R46*(X1*X12 - X3*X16*X31/Keq_R46)/(kM_R46_1*kM_R46_12*((1 + X1/kM_R46_1)*(1 + X12/kM_R46_12) + (1 + X3/kM_R46_3)*(1 + X16/kM_R46_16)*(1 + X31/kM_R46_31) - 1));
  V47: X7 => X6 + X31; vMax_R47*(X7 - X6*X31/Keq_R47)/(kM_R47_7*(1 + X7/kM_R47_7 + X6/kM_R47_6 + X31/kM_R47_31 + X6/kM_R47_6*(X31/kM_R47_31)));
  V48: X3 => X2; vMax_R48*(X3 - X2/Keq_R48)/(kM_R48_3*(X3/kM_R48_3 + X2/kM_R48_2 + 1));
  V49: => X31 + X43; Kf_R49*(X0_h_e*X0_pi_e - X31*X43/Keq_R49);
  V50: X16 => X12 + X31 + 2 X43; vMax_R50*(X16^1 - X12*X31*X43^2/Keq_R50)/(kM_R50_16^1*(1 + (X16/kM_R50_16)^1 + (1 + (X12/kM_R50_12)^1)*(1 + (X31/kM_R50_31)^1)*(1 + (X43/kM_R50_44)^1 + (X43/kM_R50_44)^2) - 1));
  V51: X18 + X42 => 2 X31 + X41 + X43; vMax_R51*(X18^1*X42^1 - X31^2*X41*X43/Keq_R51)/(kM_R51_18^1*kM_R51_43^1*((1 + (X18/kM_R51_18)^1)*(1 + (X42/kM_R51_43)^1) + (1 + (X31/kM_R51_31)^1 + (X31/kM_R51_31)^2)*(1 + (X41/kM_R51_42)^1)*(1 + (X43/kM_R51_44)^1) - 1));
  V52: X16 + X31 + X41 => X12 + X18 + X42; vMax_R52*(X16^1*X31^1*X41^1 - X12*X18*X42/Keq_R52)/(kM_R52_16^1*kM_R52_31^1*kM_R52_42^1*((1 + (X16/kM_R52_16)^1)*(1 + (X31/kM_R52_31)^1)*(1 + (X41/kM_R52_42)^1) + (1 + (X12/kM_R52_12)^1)*(1 + (X18/kM_R52_18)^1)*(1 + (X42/kM_R52_43)^1) - 1));
  V53: X12 + X42 => X16 + X45; vMax_R53*(X12*X42 - X16*X45/Keq_R53)/(kM_R53_12*kM_R53_43*(1 + X12/kM_R53_12 + X16/kM_R53_16)*(1 + X42/kM_R53_43 + X45/kM_R53_46));
  V54: X31 + X45 => ; vMax_R54*(X31*X45 - X0_h_e*X0_pyr_e/Keq_R54)/(kM_R54_31*kM_R54_46*(1 + X31/kM_R54_31 + X0_h_e/kM_R54_74)*(1 + X45/kM_R54_46 + X0_pyr_e/kM_R54_87));
  V55: X49 => X54; vMax_R55*(X49 - X54/Keq_R55)/(kM_R55_50*(X49/kM_R55_50 + X54/kM_R55_55 + 1));
  V56: X49 => X48; vMax_R56*(X49 - X48/Keq_R56)/(kM_R56_50*(X49/kM_R56_50 + X48/kM_R56_49 + 1));
  V57: X52 => X31; vMax_R57*(X52 - X31*X0_succ_e/Keq_R57)/(kM_R57_53*(X52/kM_R57_53 + X31/kM_R57_31 + 1));
  V58: X46 + X52 => X26 + X47; vMax_R58*(X52*X46 - X26*X47/Keq_R58)/(kM_R58_53*kM_R58_47*(1 + X52/kM_R58_53 + X26/kM_R58_26)*(1 + X46/kM_R58_47 + X47/kM_R58_48));
  V59: X16 + X19 + X52 => X12 + X43 + X53; vMax_R59*(X16^1*X19^1*X52^1 - X12*X43*X53/Keq_R59)/(kM_R59_16^1*kM_R59_19^1*kM_R59_53^1*((1 + (X16/kM_R59_16)^1)*(1 + (X19/kM_R59_19)^1)*(1 + (X52/kM_R59_53)^1) + (1 + (X12/kM_R59_12)^1)*(1 + (X43/kM_R59_44)^1)*(1 + (X53/kM_R59_54)^1) - 1));
  V60: X27 + X51 => X21 + X23; vMax_R60*(X27*X51 - X21*X23/Keq_R60)/(kM_R60_27*kM_R60_52*(1 + X27/kM_R60_27 + X21/kM_R60_21)*(1 + X51/kM_R60_52 + X23/kM_R60_23));
  V61: X37 + X38 => 2 X31 + X36 + X39; vMax_R61*(X37^1*X38^1 - X31^2*X36*X39/Keq_R61)/(kM_R61_38^1*kM_R61_39^1*((1 + (X37/kM_R61_38)^1)*(1 + (X38/kM_R61_39)^1) + (1 + (X31/kM_R61_31)^1 + (X31/kM_R61_31)^2)*(1 + (X36/kM_R61_37)^1)*(1 + (X39/kM_R61_40)^1) - 1));
  V62: X48 + X54 => X27 + X51; vMax_R62*(X48*X54 - X27*X51/Keq_R62)/(kM_R62_49*kM_R62_55*(1 + X48/kM_R62_49 + X27/kM_R62_27)*(1 + X54/kM_R62_55 + X51/kM_R62_52));
  V63: X21 + X54 => X23 + X27; vMax_R63*(X21*X54 - X23*X27/Keq_R63)/(kM_R63_21*kM_R63_55*(1 + X21/kM_R63_21 + X23/kM_R63_23)*(1 + X54/kM_R63_55 + X27/kM_R63_27));
  V64: X20 => X27; vMax_R64*(X20 - X27/Keq_R64)/(kM_R64_20*(X20/kM_R64_20 + X27/kM_R64_27 + 1));
  V65: X4 => ; vMax_R65*(X4 - X0_4crsol_e/Keq_R65)/(kM_R65_4*(X4/kM_R65_4 + X0_4crsol_e/kM_R65_92 + 1));
  V66: X5 => ; vMax_R66*(X5 - X0_5drib_e/Keq_R66)/(kM_R66_5*(X5/kM_R66_5 + X0_5drib_e/kM_R66_93 + 1));
  V67: $X14 => ; vMax_R67*(X14 - X0_amob_e/Keq_R67)/(kM_R67_14*(X14/kM_R67_14 + X0_amob_e/kM_R67_94 + 1));
  V68: => X30; vMax_R68*(X0_glycogenn1_e - X30/Keq_R68)/(kM_R68_95*(X0_glycogenn1_e/kM_R68_95 + X30/kM_R68_30 + 1));
  V69: $X35 => ; vMax_R69*(X35 - X0_mththf_e/Keq_R69)/(kM_R69_36*(X35/kM_R69_36 + X0_mththf_e/kM_R69_96 + 1));
  V70: X10 => 0.009892281 X8 + 0.04057156 X9 + 1.265533 X12 + 0.04318763 X18 + 0.0661123 X19 + 0.01673908 X26 + 0.0007950514 X27 + 0.8622429 X31 + 0.03250998 X36 + 0.3353332 X38 + 1.292038 X43 + 0.005340205 X47 + 0.008584395 X52; vMax_R70*(X10/kM_R70_10/(1 + X10/kM_R70_10));
  V71: X13 => 0.002150496 X8 + 0.008819904 X9 + 0.2751158 X12 + 0.009388615 X18 + 0.01437224 X19 + 0.003638929 X26 + 0.0001728373 X27 + 0.1874441 X31 + 0.007067388 X36 + 0.07289853 X38 + 0.2808779 X43 + 0.001160914 X47 + 0.001866173 X52; vMax_R71*(X13/kM_R71_13/(1 + X13/kM_R71_13));
  V72: X15 => 0.004300992 X8 + 0.01763981 X9 + 0.5502316 X12 + 0.01877723 X18 + 0.02874448 X19 + 0.007277859 X26 + 0.0003456745 X27 + 0.3748882 X31 + 0.01413478 X36 + 0.1457971 X38 + 0.5617558 X43 + 0.002321828 X47 + 0.003732346 X52; vMax_R72*(X15/kM_R72_15/(1 + X15/kM_R72_15));
  V73: X16 => 0.004300992 X8 + 0.01763981 X9 + 0.5502316 X12 + 0.01877723 X18 + 0.02874448 X19 + 0.007277859 X26 + 0.0003456745 X27 + 0.3748882 X31 + 0.01413478 X36 + 0.1457971 X38 + 0.5617558 X43 + 0.002321828 X47 + 0.003732346 X52; vMax_R73*(X16/kM_R73_16/(1 + X16/kM_R73_16));
  V74: X20 => 0.001290298 X8 + 0.005291943 X9 + 0.1650695 X12 + 0.005633169 X18 + 0.008623344 X19 + 0.002183358 X26 + 0.0001037024 X27 + 0.1124665 X31 + 0.004240433 X36 + 0.04373912 X38 + 0.1685267 X43 + 0.0006965484 X47 + 0.001119704 X52; vMax_R74*(X20/kM_R74_20/(1 + X20/kM_R74_20));
  V75: X21 => 0.001720397 X8 + 0.007055923 X9 + 0.2200926 X12 + 0.007510892 X18 + 0.01149779 X19 + 0.002911144 X26 + 0.0001382698 X27 + 0.1499553 X31 + 0.00565391 X36 + 0.05831883 X38 + 0.2247023 X43 + 0.0009287313 X47 + 0.001492938 X52; vMax_R75*(X21/kM_R75_21/(1 + X21/kM_R75_21));
  V76: X23 => 0.002580595 X8 + 0.01058389 X9 + 0.330139 X12 + 0.01126634 X18 + 0.01724669 X19 + 0.004366715 X26 + 0.0002074047 X27 + 0.2249329 X31 + 0.008480865 X36 + 0.08747824 X38 + 0.3370535 X43 + 0.001393097 X47 + 0.002239407 X52; vMax_R76*(X23/kM_R76_23/(1 + X23/kM_R76_23));
  V77: X25 => ; vMax_R77*(X25/kM_R77_25/(1 + X25/kM_R77_25));
  V78: X28 => 0.002580595 X8 + 0.01058389 X9 + 0.330139 X12 + 0.01126634 X18 + 0.01724669 X19 + 0.004366715 X26 + 0.0002074047 X27 + 0.2249329 X31 + 0.008480865 X36 + 0.08747824 X38 + 0.3370535 X43 + 0.001393097 X47 + 0.002239407 X52; vMax_R78*(X28/kM_R78_28/(1 + X28/kM_R78_28));
  V79: X30 => 0.01032238 X8 + 0.04233554 X9 + 1.320556 X12 + 0.04506535 X18 + 0.06898675 X19 + 0.01746686 X26 + 0.0008296188 X27 + 0.8997318 X31 + 0.03392346 X36 + 0.349913 X38 + 1.348214 X43 + 0.005572388 X47 + 0.008957629 X52; vMax_R79*(X30/kM_R79_30/(1 + X30/kM_R79_30));
  V80: X37 => 0.009032083 X8 + 0.0370436 X9 + 1.155486 X12 + 0.03943218 X18 + 0.06036341 X19 + 0.0152835 X26 + 0.0007259165 X27 + 0.7872653 X31 + 0.02968303 X36 + 0.3061738 X38 + 1.179687 X43 + 0.004875839 X47 + 0.007837926 X52; vMax_R80*(X37/kM_R80_38/(1 + X37/kM_R80_38));
  V81: X39 => 0.009032083 X8 + 0.0370436 X9 + 1.155486 X12 + 0.03943218 X18 + 0.06036341 X19 + 0.0152835 X26 + 0.0007259165 X27 + 0.7872653 X31 + 0.02968303 X36 + 0.3061738 X38 + 1.179687 X43 + 0.004875839 X47 + 0.007837926 X52; vMax_R81*(X39/kM_R81_40/(1 + X39/kM_R81_40));
  V82: X40 => ; vMax_R82*(X40/kM_R82_41/(1 + X40/kM_R82_41));
  V83: X41 => 0.001720397 X8 + 0.007055923 X9 + 0.2200926 X12 + 0.007510892 X18 + 0.01149779 X19 + 0.002911144 X26 + 0.0001382698 X27 + 0.1499553 X31 + 0.00565391 X36 + 0.05831883 X38 + 0.2247023 X43 + 0.0009287313 X47 + 0.001492938 X52; vMax_R83*(X41/kM_R83_42/(1 + X41/kM_R83_42));
  V84: X42 => 0.001290298 X8 + 0.005291943 X9 + 0.1650695 X12 + 0.005633169 X18 + 0.008623344 X19 + 0.002183358 X26 + 0.0001037024 X27 + 0.1124665 X31 + 0.004240433 X36 + 0.04373912 X38 + 0.1685267 X43 + 0.0006965484 X47 + 0.001119704 X52; vMax_R84*(X42/kM_R84_43/(1 + X42/kM_R84_43));
  V85: X44 => ; vMax_R85*(X44/kM_R85_45/(1 + X44/kM_R85_45));
  V86: X45 => 0.001290298 X8 + 0.005291943 X9 + 0.1650695 X12 + 0.005633169 X18 + 0.008623344 X19 + 0.002183358 X26 + 0.0001037024 X27 + 0.1124665 X31 + 0.004240433 X36 + 0.04373912 X38 + 0.1685267 X43 + 0.0006965484 X47 + 0.001119704 X52; vMax_R86*(X45/kM_R86_46/(1 + X45/kM_R86_46));
  V87: X46 => 0.02107486 X8 + 0.08643506 X9 + 2.696135 X12 + 0.09200843 X18 + 0.140848 X19 + 0.03566151 X26 + 0.001693805 X27 + 1.836952 X31 + 0.0692604 X36 + 0.7144056 X38 + 2.752603 X43 + 0.01137696 X47 + 0.01828849 X52; vMax_R87*(X46/kM_R87_47/(1 + X46/kM_R87_47));
  V88: X48 => 0.002150496 X8 + 0.008819904 X9 + 0.2751158 X12 + 0.009388615 X18 + 0.01437224 X19 + 0.003638929 X26 + 0.0001728373 X27 + 0.1874441 X31 + 0.007067388 X36 + 0.07289853 X38 + 0.2808779 X43 + 0.001160914 X47 + 0.001866173 X52; vMax_R88*(X48/kM_R88_49/(1 + X48/kM_R88_49));
  V89: X49 => 0.002150496 X8 + 0.008819904 X9 + 0.2751158 X12 + 0.009388615 X18 + 0.01437224 X19 + 0.003638929 X26 + 0.0001728373 X27 + 0.1874441 X31 + 0.007067388 X36 + 0.07289853 X38 + 0.2808779 X43 + 0.001160914 X47 + 0.001866173 X52; vMax_R89*(X49/kM_R89_50/(1 + X49/kM_R89_50));
  V90: X51 => 0.003010694 X8 + 0.01234787 X9 + 0.3851621 X12 + 0.01314406 X18 + 0.02012114 X19 + 0.005094501 X26 + 0.0002419722 X27 + 0.2624218 X31 + 0.009894343 X36 + 0.1020579 X38 + 0.393229 X43 + 0.00162528 X47 + 0.002612642 X52; vMax_R90*(X51/kM_R90_52/(1 + X51/kM_R90_52));
  V91: X53 => 0.01075248 X8 + 0.04409952 X9 + 1.375579 X12 + 0.04694308 X18 + 0.0718612 X19 + 0.01819465 X26 + 0.0008641863 X27 + 0.9372206 X31 + 0.03533694 X36 + 0.3644927 X38 + 1.404389 X43 + 0.00580457 X47 + 0.009330864 X52; vMax_R91*(X53/kM_R91_54/(1 + X53/kM_R91_54));
  V92: 9.944276e-6 X4 => 0.02666615 X8 + 0.1093668 X9 + 3.411436 X12 + 0.1164188 X18 + 0.1782158 X19 + 0.04512273 X26 + 0.002143182 X27 + 2.324307 X31 + 0.08763561 X36 + 0.9039418 X38 + 3.482886 X43 + 0.01439533 X47 + 0.02314054 X52; vMax_R92*(X4/kM_R92_4/(1 + X4/kM_R92_4));
end
