// SBML level 2 version 1

model Tuty2010()

  // Compartments:
  compartment extracellular = 65;
  compartment cytosol = 1;

  // Species:
  species M_GLCex in extracellular = 2;
  species M_G6P in cytosol = 5.64;
  species M_F6P in cytosol = 5.64;
  species M_FDP in cytosol = 5.64;
  species M_GAPDHAP in cytosol = 5.64;
  species M_PEP in cytosol = 282;
  species M_PYR in cytosol = 5.64;
  species M_ACCOA in cytosol = 5.64;
  species M_ICIT in cytosol = 5.64;
  species M_2KG in cytosol = 5.64;
  species M_SUC in cytosol = 5.64;
  species M_FUM in cytosol = 5.64;
  species M_MAL in cytosol = 5.64;
  species M_OAA in cytosol = 5.64;
  species M_GOX in cytosol = 0;
  species M_ACP in cytosol = 0;
  species M_ACET in extracellular = 5.64;
  species M_6PG in cytosol = 0.564;
  species M_Ru5P in cytosol = 0.564;
  species M_R5P in cytosol = 0.564;
  species M_Xu5P in cytosol = 0.564;
  species M_S7P in cytosol = 0.564;
  species M_E4P in cytosol = 0.564;

  // Parameters:
  Dil = 2.777778e-5;
  GLC_feed = 110.96;
  NAD = 1.47;
  NADH = 0.1;
  NADP = 0.195;
  NADPH = 0.062;
  COA = 0.001;
  ADP = 0.595;
  ATP = 4.27;
  AMP = 0.955;
  P = 10;
  V_PTSmax = 4.032443;
  K_PTSa1 = 564;
  K_PTSa2 = 5.64;
  K_PTSa3 = 1;
  n_PTSg6p = 4;
  K_PTSg6p = 474.2656;
  V_PGImax = 4.131472;
  K_PGIg6p = 1387.44;
  K_PGIf6p = 112.8;
  K_PGIeq = 0.43;
  K_PGIg6p_6pginh = 112.8;
  K_PGIf6p_6pginh = 112.8;
  V_PFKmax = 3.856037;
  K_PFKatp_s = 0.16;
  K_PFKadp_a = 239;
  K_PFKadp_b = 0.25;
  K_PFKadp_c = 0.36;
  K_PFKamp_b = 0.01;
  n_PFK = 4;
  L_PFK = 4;
  K_PFKf6p_s = 78.96;
  K_PFKpep = 1838.64;
  V_ALDOmax = 0.443946333;
  K_ALDOfdp = 75.012;
  K_ALDOgap = 49.632;
  K_ALDOdhap = 49.632;
  K_ALDOgapinh = 338.4;
  K_ALDOeq = 78.96;
  V_ALDOblf = 2;
  V_GAPDHmax = 19.0021;
  K_GAPDHgap = 84.6;
  K_GAPDHpgp = 56.4;
  K_GAPDHnad = 0.45;
  K_GAPDHnadh = 0.02;
  K_GAPDHeq = 0.63;
  V_PYKmax = 0.169983333;
  Km_PYKpep = 174.84;
  Km_PYKfdp = 107.16;
  Km_PYKamp = 0.2;
  Km_PYKatp = 22.5;
  Km_PYKadp = 0.26;
  L_PYK = 1000;
  n_PYK = 4;
  V_PDHmax2 = 4256.79;
  Km_PDHpyr2 = 564;
  Km_PDHnad2 = 0.4;
  Km_PDHcoa2 = 0.014;
  Km_PDHaccoa2 = 4.512;
  Km_PDHnadh2 = 0.1;
  Ki_PDH2 = 46.4;
  V_G6PDHmax = 0.1535208;
  K_G6PDHnadp = 0.015;
  K_G6PDHnadphnadpinh = 0.01;
  K_G6PDHnadphg6pinh = 0.18;
  K_G6PDHg6p = 39.48;
  V_6PGDHmax = 0.283566667;
  K_6PGDH6pg = 56.4;
  K_6PGDHnadp = 0.028;
  K_6PGDHnadphinh = 0.01;
  K_6PGDHatpinh = 3;
  V_RPEmax = 0.005135;
  K_RPEeq = 1.4;
  V_RPImax = 0.003699722;
  K_RPIeq = 4;
  V_TKTAmax = 1.44543e-5;
  K_TKTAeq = 1.2;
  V_TKTBmax = 0.000155743;
  K_TKTBeq = 10;
  V_TALmax = 1.20661e-5;
  K_TALeq = 1.05;
  V_CSmax = 2.720078;
  Km_CSaccoa = 101.52;
  Km_CSoaa = 22.56;
  Kd_CSaccoa = 56.4;
  Kd1_CSh = 1e-5;
  Kd2_CSh = 0.0002;
  Ki_CSatp = 0.58;
  Ki1_CS2kg = 8.46;
  Ki2_CS2kg = 144.384;
  Ki1_CSnadh = 0.00033;
  Ki2_CSnadh = 0.0084;
  H = 1e-7;
  ICDH = 13773.162;
  Keq_ICDH = 1000;
  Kf_ICDH = 80.5;
  Km_ICDH2kg = 21.432;
  Km_ICDHicit = 6.204;
  Kd_ICDHnadp = 0.006;
  Km_ICDHnadp = 0.017;
  Kd_ICDHicit = 0.003;
  Keinh_ICDHnadph = 0.007;
  Keknh_ICDH2kg = 3102;
  Kekn_ICDHnadp = 0.00016;
  Km_ICDHnadph = 0.0036;
  Kenhe_ICDHnadph = 0.028;
  V_2KGDHmax = 5.864817;
  K_2KGDH2kg = 564;
  KI_2KGDH2kg = 423;
  K_2KGDHcoa = 0.002;
  K_2KGDHnad = 0.07;
  K_2KGDHsuc = 564;
  K_2KGDHnadh = 0.018;
  K_2KGDHz = 1.5;
  Km_SDHsuc = 56.4;
  V_SDH1 = 0.177566;
  V_SDH2 = 0.177566;
  Keq_SDH = 10;
  Km_FUM = 56.4;
  V_FUM1 = 0.177566;
  V_FUM2 = 0.177566;
  Keq_FUM = 10;
  V_MDH1 = 4.053593;
  V_MDH2 = 4.053593;
  Keq_MDH = 1;
  KI_MDHnad = 0.31;
  KI_MDHnadh = 0.04;
  KI_MDHmal = 1861.2;
  KI_MDHoaa = 152.28;
  Km_MDHnad = 0.1;
  Km_MDHnadh = 0.04;
  Km_MDHmal = 750.12;
  Km_MDHoaa = 152.28;
  KII_MDHnad = 0.31;
  KII_MDHoaa = 95.88;
  V_PTAmax = 1.971697;
  Ki_PTAaccoa = 112.8;
  Km_PTAp = 2.6;
  Ki_PTAp = 2.6;
  Ki_PTAacp = 112.8;
  Ki_PTAcoa = 0.029;
  Km_PTAacp = 394.8;
  Keq_PTA = 0.0281;
  V_ACKmax = 448.897;
  Km_ACKacp = 90.24;
  Km_ACKadp = 0.5;
  Km_ACKacet = 3948;
  Km_ACKatp = 0.07;
  Keq_ACK = 174.2;
  V_ACSmax = 2.819091;
  Km2_ACS = 39.48;
  Keq_ACS = 0.15;
  V_MEZ = 0.016575333;
  Km_MEZmal = 208.68;
  Keq_MEZ = 0.1;
  V_PCKmax = 7.068173;
  KI_PCKatp = 0.04;
  Ki_PCKatp = 0.04;
  Km_PCKoaa = 377.88;
  Ki_PCKpep = 33.84;
  KI_PCKoaa = 253.8;
  Km_PCKpep = 39.48;
  Ki_PCKadp = 0.04;
  V_PPCmax2 = 0.029547333;
  Km_PEP = 182.2284;
  k1 = 0.03176;
  k2 = 0.002283333;
  k3 = 9.61879e-5;
  k4 = 2.55866e-6;
  k5 = 0.000166489;
  k6 = 0.000477482;
  V_ICLmax = 0.600268333;
  V_ICLmax_r = 0.004472833;
  Km_ICLicit = 340.656;
  Km_ICLsuc = 332.76;
  Km_ICLgox = 73.32;
  Ki_ICL = 1.692;
  I = 5.64;
  V_MSmax = 0.577614333;
  V_MSmax_r = 0.021529133;
  Km_MSgox = 1128;
  Km_MSaccoa = 5.64;
  Km_MSmal = 564;

  // Reactions:
  R_PTS: M_PEP + M_GLCex => M_G6P + M_PYR; extracellular*V_PTSmax*M_GLCex*M_PEP/M_PYR/((K_PTSa1 + K_PTSa2*M_PEP/M_PYR + K_PTSa3*M_GLCex + M_GLCex*M_PEP/M_PYR)*(1 + M_G6P^n_PTSg6p/K_PTSg6p^n_PTSg6p));
  R_PGI: M_G6P -> M_F6P; V_PGImax*(M_G6P - M_F6P/K_PGIeq)/(K_PGIg6p*(1 + M_F6P/(K_PGIf6p*(1 + M_6PG/K_PGIf6p_6pginh)) + M_6PG/K_PGIg6p_6pginh) + M_G6P);  // modifiers: M_6PG
  R_PFK: M_F6P => M_FDP; V_PFKmax*ATP*M_F6P/((ATP + K_PFKatp_s*(1 + ADP/K_PFKadp_c))*(M_F6P + K_PFKf6p_s*((1 + M_PEP/K_PFKpep + ADP/K_PFKadp_b + AMP/K_PFKamp_b)/(1 + ADP/K_PFKadp_a + AMP/K_PFKamp_b)))*(1 + L_PFK/(1 + M_F6P*((1 + ADP/K_PFKadp_a + AMP/K_PFKamp_b)/(K_PFKf6p_s*(1 + M_PEP/K_PFKpep + ADP/K_PFKadp_b + AMP/K_PFKamp_b))))^n_PFK));  // modifiers: M_PEP
  R_ALDO: M_FDP -> 2 M_GAPDHAP; V_ALDOmax*(M_FDP - M_GAPDHAP*M_GAPDHAP/K_ALDOeq)/(K_ALDOfdp + M_FDP + K_ALDOgap*M_GAPDHAP/(K_ALDOeq*V_ALDOblf) + K_ALDOdhap*M_GAPDHAP/(K_ALDOeq*V_ALDOblf) + M_FDP*M_GAPDHAP/K_ALDOgapinh + M_GAPDHAP*M_GAPDHAP/(K_ALDOeq*V_ALDOblf));
  R_GAPDH: M_GAPDHAP -> M_PEP; V_GAPDHmax*(M_GAPDHAP - M_PEP*NADH/(K_GAPDHeq*NAD))/((K_GAPDHgap*(1 + M_PEP/K_GAPDHpgp) + M_GAPDHAP)*(K_GAPDHnad/NAD*(1 + NADH/K_GAPDHnadh) + 1));
  R_PYK: M_PEP => M_PYR; V_PYKmax*M_PEP*(M_PEP/Km_PYKpep + 1)^(n_PYK - 1)*ADP/(Km_PYKpep*(L_PYK*((1 + ATP/Km_PYKatp)/(M_FDP/Km_PYKfdp + AMP/Km_PYKamp + 1))^n_PYK + (M_PEP/Km_PYKpep + 1)^n_PYK)*(ADP + Km_PYKadp));  // modifiers: M_FDP
  R_PDH: M_PYR => M_ACCOA; V_PDHmax2/NAD*(1/(1 + Ki_PDH2*(NADH/NAD)))*(M_PYR/Km_PDHpyr2)*(1/Km_PDHnad2)*(COA/Km_PDHcoa2)/((1 + M_PYR/Km_PDHpyr2)*(1/NAD + 1/Km_PDHnad2 + NADH/(NAD*Km_PDHnadh2))*(1 + COA/Km_PDHcoa2 + M_ACCOA/Km_PDHaccoa2));
  R_CS: M_ACCOA + M_OAA => M_ICIT; V_CSmax*(1 + Kd1_CSh/H + H/Kd2_CSh)*M_ACCOA*M_OAA/((Kd_CSaccoa*Km_CSoaa + Km_CSaccoa*M_OAA)*(1 + Kd1_CSh/H + H/Kd2_CSh*(1 + ATP/Ki_CSatp)) + M_ACCOA*Km_CSoaa*(1 + Kd1_CSh/H + H/Kd2_CSh + NADH/Ki1_CSnadh) + M_ACCOA*M_OAA*(1 + Kd1_CSh/H + H/Kd2_CSh + NADH/Ki2_CSnadh));  // modifiers: M_2KG
  R_ICDH: M_ICIT -> M_2KG; ICDH*(Kf_ICDH/Km_ICDHicit)*Kd_ICDHnadp*(M_ICIT - NADPH*M_2KG/(Keq_ICDH*NADP))/(1/NADP + M_ICIT*Km_ICDHnadp/(Km_ICDHicit*Kd_ICDHnadp*NADP) + 1/Kd_ICDHnadp + M_ICIT/(Km_ICDHicit*Kd_ICDHnadp) + M_ICIT/(Kd_ICDHicit*NADP)*(NADPH*Km_ICDHnadp/(Km_ICDHicit*Kd_ICDHnadp*Keinh_ICDHnadph)) + NADPH*Keknh_ICDH2kg/(Km_ICDH2kg*Kenhe_ICDHnadph*NADP) + M_2KG*Km_ICDHnadph/(Km_ICDH2kg*Kenhe_ICDHnadph*NADP) + M_2KG/Km_ICDH2kg*(NADPH/(Kenhe_ICDHnadph*NADP)) + M_2KG*Km_ICDHnadph/(Km_ICDH2kg*Kenhe_ICDHnadph)*(NADPH/(Kekn_ICDHnadp*NADP)));
  R_2KGDH: M_2KG => M_SUC; V_2KGDHmax*M_2KG*COA/(K_2KGDHnad*M_2KG*COA/NAD + K_2KGDHcoa*M_2KG + K_2KGDH2kg*COA + M_2KG*COA + K_2KGDH2kg*K_2KGDHz*M_SUC*NADH/(K_2KGDHsuc*NAD) + K_2KGDHnad*M_2KG*COA*NADH/(K_2KGDHnadh*NAD) + K_2KGDHcoa*M_2KG*M_SUC/K_2KGDHsuc + K_2KGDH2kg*K_2KGDHz*M_2KG*M_SUC*NADH/(KI_2KGDH2kg*K_2KGDHsuc*NAD));
  R_SDH: M_SUC -> M_FUM; V_SDH1*V_SDH2*(M_SUC - M_FUM/Keq_SDH)/(Km_SDHsuc*V_SDH2 + V_SDH2*M_SUC + V_SDH1*M_FUM/Keq_SDH);
  R_FUM: M_FUM -> M_MAL; V_FUM1*V_FUM2*(M_FUM - M_MAL/Keq_FUM)/(Km_FUM*V_FUM2 + V_FUM2*M_FUM + V_FUM1*M_MAL/Keq_FUM);
  R_MDH: M_MAL -> M_OAA; V_MDH1*V_MDH2*(M_MAL - M_OAA/Keq_MDH)/(KI_MDHnad*Km_MDHmal*V_MDH2/NAD + Km_MDHmal*V_MDH2 + Km_MDHnad*V_MDH2*M_MAL/NAD + V_MDH2*M_MAL + Km_MDHoaa*V_MDH1*NADH/(Keq_MDH*NAD) + Km_MDHnadh*V_MDH1*M_OAA/(Keq_MDH*NAD) + V_MDH1*NADH*M_OAA/(Keq_MDH*NAD) + V_MDH1*Km_MDHoaa*NADH/(Keq_MDH*KI_MDHnad) + V_MDH2*Km_MDHnad*M_MAL*M_OAA/(KI_MDHoaa*NAD) + V_MDH2*M_MAL*NADH/KI_MDHnadh + V_MDH1*M_MAL*NADH*M_OAA/(Keq_MDH*KI_MDHmal*NAD) + V_MDH2*M_MAL*M_OAA/KII_MDHoaa + V_MDH1*NADH*M_OAA/(KII_MDHnad*Keq_MDH) + KI_MDHnad*V_MDH2*M_MAL*NADH*M_OAA/(KII_MDHnad*Km_MDHoaa*KI_MDHnadh));
  R_ICL: M_ICIT => M_SUC + M_GOX; V_ICLmax*(M_ICIT/Km_ICLicit)/(1 + M_ICIT/Km_ICLicit + M_SUC/Km_ICLsuc + M_GOX/Km_ICLgox + M_ICIT/Km_ICLicit*(M_SUC/Km_ICLsuc) + M_SUC/Km_ICLsuc*(M_GOX/Km_ICLgox) + I/Ki_ICL);  // modifiers: M_PEP, M_2KG
  R_MS: M_GOX -> M_MAL; (V_MSmax*(M_GOX/Km_MSgox)*(M_ACCOA/Km_MSaccoa) - V_MSmax_r*(M_MAL/Km_MSmal))/(1 + M_GOX/Km_MSgox + M_MAL/Km_MSmal + 1 + M_ACCOA/Km_MSaccoa);  // modifiers: M_ACCOA
  R_PTA: M_ACCOA -> M_ACP; V_PTAmax*(1/(Ki_PTAaccoa*Km_PTAp))*(M_ACCOA*P - M_ACP*COA/Keq_PTA)/(1 + M_ACCOA/Ki_PTAaccoa + P/Ki_PTAp + M_ACP/Ki_PTAacp + COA/Ki_PTAcoa + M_ACCOA*P/(Ki_PTAaccoa*Km_PTAp) + M_ACP*COA/(Km_PTAacp*Ki_PTAcoa));
  R_ACK: M_ACP -> M_ACET; V_ACKmax*(1/(Km_ACKadp*Km_ACKacp))*(M_ACP*ADP - M_ACET*ATP/Keq_ACK)/((1 + M_ACP/Km_ACKacp + M_ACET/Km_ACKacet)*(1 + ADP/Km_ACKadp + ATP/Km_ACKatp));
  R_ACS: M_ACET => M_ACCOA; V_ACSmax*M_ACET*NADP/((Km2_ACS + M_ACET)*(Keq_ACS + NADP));
  R_MEZ: M_MAL => M_PYR; V_MEZ*M_MAL*NADP/((Km_MEZmal + M_MAL)*(Keq_MEZ + NADP));
  R_PCK: M_OAA => M_PEP; V_PCKmax*M_OAA*(ATP/ADP)/(Km_PCKoaa*(ATP/ADP) + M_OAA*(ATP/ADP) + Ki_PCKatp*Km_PCKoaa/Ki_PCKadp + Ki_PCKatp*Km_PCKoaa*M_PEP/(Km_PCKpep*Ki_PCKadp) + Ki_PCKatp*Km_PCKoaa/(Ki_PCKpep*KI_PCKatp)*(ATP*M_PEP/ADP) + Ki_PCKatp*Km_PCKoaa/(Ki_PCKadp*KI_PCKoaa)*M_OAA);
  R_PPC: M_PEP => M_OAA; V_PPCmax2*((k1 + k2*M_ACCOA + k3*M_FDP + k4*M_ACCOA*M_FDP)/(1 + k5*M_ACCOA + k6*M_FDP))*(M_PEP/(Km_PEP + M_PEP));  // modifiers: M_ACCOA, M_FDP
  R_G6PDH: M_G6P => M_6PG; V_G6PDHmax*M_G6P/((M_G6P + K_G6PDHg6p)*(1 + NADPH/K_G6PDHnadphg6pinh)*(K_G6PDHnadp/NADP*(1 + NADPH/K_G6PDHnadphnadpinh) + 1));
  R_6PGDH: M_6PG => M_Ru5P; V_6PGDHmax*M_6PG/((M_6PG + K_6PGDH6pg)*(1 + K_6PGDHnadp/NADP*(1 + NADPH/K_6PGDHnadphinh)*(1 + ATP/K_6PGDHatpinh)));
  R_RPE: M_Ru5P -> M_Xu5P; V_RPEmax*(M_Ru5P - M_Xu5P/K_RPEeq);
  R_RPI: M_Ru5P -> M_R5P; V_RPImax*(M_Ru5P - M_R5P/K_RPIeq);
  R_TKTA: M_R5P + M_Xu5P -> M_GAPDHAP + M_S7P; V_TKTAmax*(M_R5P*M_Xu5P - M_S7P*M_GAPDHAP/K_TKTAeq);
  R_TKTB: M_Xu5P + M_E4P -> M_F6P + M_GAPDHAP; V_TKTBmax*(M_Xu5P*M_E4P - M_F6P*M_GAPDHAP/K_TKTBeq);
  R_TAL: M_GAPDHAP + M_S7P -> M_F6P + M_E4P; V_TALmax*(M_GAPDHAP*M_S7P - M_E4P*M_F6P/K_TALeq);
  R_GLC_FEED: => M_GLCex; extracellular*Dil*(GLC_feed - M_GLCex);
  Dil_G6P: M_G6P => ; Dil*M_G6P;
  Dil_F6P: M_F6P => ; Dil*M_F6P;
  Dil_FDP: M_FDP => ; Dil*M_FDP;
  Dil_GAPDHAP: M_GAPDHAP => ; Dil*M_GAPDHAP;
  Dil_PEP: M_PEP => ; Dil*M_PEP;
  Dil_PYR: M_PYR => ; Dil*M_PYR;
  Dil_ACCOA: M_ACCOA => ; Dil*M_ACCOA;
  Dil_ICIT: M_ICIT => ; Dil*M_ICIT;
  Dil_2KG: M_2KG => ; Dil*M_2KG;
  Dil_SUC: M_SUC => ; Dil*M_SUC;
  Dil_FUM: M_FUM => ; Dil*M_FUM;
  Dil_MAL: M_MAL => ; Dil*M_MAL;
  Dil_OAA: M_OAA => ; Dil*M_OAA;
  Dil_GOX: M_GOX => ; Dil*M_GOX;
  Dil_ACP: M_ACP => ; Dil*M_ACP;
  Dil_ACET: M_ACET => ; Dil*M_ACET;
  Dil_6PG: M_6PG => ; Dil*M_6PG;
  Dil_Ru5P: M_Ru5P => ; Dil*M_Ru5P;
  Dil_R5P: M_R5P => ; Dil*M_R5P;
  Dil_Xu5P: M_Xu5P => ; Dil*M_Xu5P;
  Dil_S7P: M_S7P => ; Dil*M_S7P;
  Dil_E4P: M_E4P => ; Dil*M_E4P;
end
