// SBML level 2 version 4
// Created by JWS2SBML on 2012/05/07 15:51:49

model peskov()

  // Compartments:
  compartment extracellular = 65; extracellular is "external";
  compartment compartment in extracellular = 1;

  // Species:
  species Glcout in extracellular = 0.0557;
  species PEP in compartment = 2.079908;
  species G6P in compartment = 2.917247;
  species Pyr in compartment = 1.00159;
  species $EXTERNAL in compartment = 0;
  species ATP in compartment = 3.253619;
  species ADP in compartment = 0.6797293;
  species F6P in compartment = 0.7055954;
  species FbP in compartment = 0.6549593;
  species DAP in compartment = 0.2785936;
  species GAP in compartment = 0.4370391;
  species NAD in compartment = 1.452315;
  species BPG in compartment = 0.4285968;
  species NADH in compartment = 0.1176848;
  species PGA3 in compartment = 4.073247;
  species PGA2 in compartment = 2.151445;
  species NADP in compartment = 1.004306;
  species Gl6P in compartment = 0.03869215;
  species NADPH in compartment = 0.09569365;
  species PGn in compartment = 1.430811;
  species Ru5P in compartment = 0.1062764;
  species X5P in compartment = 0.1461725;
  species R5P in compartment = 0.1805376;
  species Tkt in compartment = 0.0008486975;
  species Tktc2 in compartment = 0.0001513025;
  species E4P in compartment = 0.125815;
  species S7P in compartment = 0.7554949;
  species Tal in compartment = 0.0001225911;
  species Talc3 in compartment = 0.0008774089;
  species OAA in compartment = 0.4021968;
  species AMP in compartment = 0.5430968;
  species Mal in compartment = 0.5279022;
  species CoA in compartment = 0.419704;
  species AcCoA in compartment = 0.07567258;
  species Cit in compartment = 2.532558;
  species Ac in compartment = 0.07230269;
  species iCit in compartment = 0.1860255;
  species KG in compartment = 0.1760582;
  species SucCoA in compartment = 0.004623413;
  species Suc in compartment = 0.02509976;
  species Q in compartment = 0.9089313;
  species Fum in compartment = 0.2559493;
  species QH2 in compartment = 0.09106866;
  species Glx in compartment = 0.0007393724;
  species ICD in compartment = 0.0008719865;
  species ICDP in compartment = 0.04212801;
  species KDPG in compartment = 0.2363638;
  species cAMP in compartment = 0.00455512;
  species Ace in compartment = 0.36;

  // Parameters:
  cfeed = 110.96;
  Dil = 2.78e-5;
  A5P = 0;
  AceA = 0.005;
  Asp = 0;
  CS = 0.1;
  Cys = 0;
  Defaultmc = 1;
  FUM = 3.33e-6;
  Gala6P = 0;
  HCO3 = 3;
  K10 = 8.52e-4;
  K1e = 5.01e-7;
  K1E = 1e-5;
  K1ef = 3.98e-8;
  k1hgnd = 5.7649e-4;
  k1htal = 4.42591e-4;
  k1htkt = 1.242e-4;
  K2e = 0.003162278;
  K2E = 2.20225e-4;
  K2ef = 1.25893e-4;
  k2hgnd = 5e-7;
  k2htal = 1.9e-7;
  k2htkt = 4.49e-6;
  k2kgdh = 9989561;
  K3 = 5e-7;
  k3kgdh = 989560.7;
  K4 = 1.05e-4;
  K45 = 1.448;
  K9 = 1e-6;
  kcat17kgdh = 99000;
  kcat28kgdh = 50000;
  KcatF6PE4Ptkt = 69.05;
  KcatF6PGAPtal = 1666.667;
  KcatS7PE4Ptal = 83.33333;
  KcatS7PR5Ptkt = 131.2;
  KcatX5PGAPtkt = 131.2;
  kCS8 = 81;
  Kd2kgdhKG = 0.2490329;
  KdAcCoA0 = 0.01;
  KdAcCoACS = 0.7;
  KdADPMg = 0.9;
  KdAMPppsA = 173151.8;
  KdATPMg = 0.0588;
  KdATPMgppsA = 0.1;
  KdcsCit = 0.05;
  KdcsCoA = 0.05;
  KdcsOAA = 0.05;
  KdE4Ptal = 0.025;
  KdE4Ptkt = 0.001;
  KdF6Ptal = 0.333;
  KdF6Ptkt = 0.07;
  KdFbPMg = 10;
  KdG6Pzwf = 0.1920044;
  KdGAPtal = 0.014;
  KdGAPtkt = 0.02;
  KdGl6Pzwf = 0.02025037;
  KdHCO3gnd = 100;
  KdHCO3NADPHgnd = 100;
  KdiCitSucaceA = 0.04007812;
  KdidhCO2 = 0.05;
  KdidhKG = 4.83;
  KdidhNADP = 0.0013;
  KdidhNADPH = 0.0036;
  KdMgppsA = 36.87557;
  KdNADPgnd = 0.117;
  KdNADPHgnd = 0.00344;
  KdPEPaceA = 1.050858;
  KdPEPGlxaceA = 0.2003969;
  KdPEPiCitaceA = 1.14643;
  KdPEPppsA = 95.74066;
  KdPGA3aceA = 0.8;
  KdPhosphppsA = 1482.94;
  KdPyrppsA = 27419.3;
  KdR5Ptkt = 0.0791;
  KdrATPMgpyk1 = 0.07155091;
  KdrMgpfk2 = 2.13;
  KdrNADHmaeB = 0.01654114;
  KdrNADPHmaeB = 0.0106985;
  KdrOAAppc = 0.02584038;
  KdrPEPppc = 655.4326;
  KdrPEPpyk1 = 0.03317406;
  KdrPyrATPMgpyk1 = 100;
  KdrPyrpyk1 = 100;
  KdRu5Pgnd = 0.044;
  KdS7Ptal = 0.107;
  KdS7Ptkt = 0.0603;
  KdSucaceA = 0.5325;
  KdtATPMgpyk1 = 0.01365861;
  KdtMgpfk2 = 4.97;
  KdtNADHmaeB = 0.01485794;
  KdtNADPHmaeB = 0.04289688;
  KdtOAAppc = 1.428396;
  KdtPEPppc = 0.01224756;
  KdtPEPpyk1 = 14.62305;
  KdtPyrATPMgpyk1 = 100;
  KdtPyrpyk1 = 100;
  KdX5Ptkt = 0.0222;
  KefADPppsA = 0.02825422;
  KefATPgnd = 0.065;
  KefATPppsA = 6.27862e-4;
  KefE4Prpi = 1000;
  KefFbPgnd = 0.013;
  KefFum78 = 0.2;
  KefKGppsA = 0.7961077;
  KefNADPATPgnd = 0.14;
  KefNADPFbPgnd = 0.0052;
  KefOAAppsA = 0.2738422;
  KefPEPfba = 1.85;
  KefPEPgnd = 6.5;
  KefPEPpgi = 0.26;
  Kefr2FbPpyk1 = 0.01104393;
  Kefr2SucCoApyk1 = 1000;
  KefrAcCoAmaeA = 1;
  KefrAcCoAmaeB = 0.06356502;
  KefrAcCoAppc = 0.192306;
  KefrADPglpX = 1000;
  KefrADPpfk1 = 0.07365391;
  KefrADPpyk1 = 0.00211;
  KefrAMPpyk2 = 0.2;
  KefrAspmaeA = 0.3268102;
  KefrAspppc = 0.003592217;
  KefrATPalmaeA = 1;
  KefrATPglpX = 1000;
  KefrATPmaeA = 1;
  KefrATPpfk2 = 0.329;
  KefrcAMPmaeB = 0.4941311;
  KefrCitppc = 190.762;
  KefrCoAmaeA = 1.503517;
  KefrCysppc = 0.5963218;
  KefrF1PglpX = 1000;
  KefrF6Ppfk2 = 0.0375;
  KefrFbPAcCoAppc = 0.002091918;
  KefrFbPppc = 8.532619;
  KefrFbPpyk1 = 0.09953689;
  KefrFumppc = 0.0625;
  KefrG6Ppyk2 = 0.08;
  KefrGala6Ppyk2 = 0.17;
  KefrGl6Ppyk2 = 0.06;
  KefrMaleateppc = 1.035453;
  KefrMalppc = 0.0625;
  KefrOAAmaeB = 7.060481;
  KefrPEPglpX = 2.532537;
  KefrPEPpfk1 = 20;
  KefrPhosphglpX = 1000;
  KefrR5Ppyk2 = 0.001;
  KefrRu5Ppyk2 = 0.004;
  KefrS7Ppyk2 = 0.1;
  KefrSucCoApyk1 = 100000;
  KefrSucppc = 0.125;
  KefrX5Ppyk2 = 0.13;
  Keft2FbPpyk1 = 999.9997;
  Keft2SucCoApyk1 = 1.01e-5;
  KeftAcCoAmaeA = 0.1968534;
  KeftAcCoAmaeB = 2.19148e-4;
  KeftAcCoAppc = 0.6746706;
  KeftADPglpX = 3.199169;
  KeftADPpfk1 = 9;
  KeftADPpyk1 = 0.112;
  KeftAspmaeA = 0.5830078;
  KeftAspppc = 0.002082829;
  KeftATPalmaeA = 0.260337;
  KeftATPglpX = 0.260337;
  KeftATPmaeA = 0.260337;
  KeftATPpfk2 = 0.0868;
  KeftATPpyk2 = 2.4;
  KeftcAMPmaeB = 0.001568016;
  KeftCitppc = 41.2713;
  KeftCoAmaeA = 0.2685799;
  KeftCysppc = 0.3526948;
  KeftF1PglpX = 8.466809;
  KeftF6Ppfk2 = 1.23e-4;
  KeftFbPAcCoAppc = 0.0156265;
  KeftFbPppc = 23.46044;
  KeftFbPpyk1 = 0.04448512;
  KeftFumppc = 0.04892057;
  KeftMaleateppc = 0.526122;
  KeftMalppc = 0.02810007;
  KeftOAAmaeB = 0.001252228;
  KeftPEPglpX = 6.795456;
  KeftPEPpfk1 = 0.260337;
  KeftPhosphglpX = 2.663712;
  KeftSucCoApyk1 = 82.20774;
  KeftSucCoApyk2 = 5.37485;
  KeftSucppc = 0.1127237;
  KeinhidhNADPH = 4e-5;
  KekcidhCO2 = 0.05;
  KeknhidhKG = 0.05;
  KeknidhNADP = 0.0017;
  KeqAcCoA = 2.5;
  KeqaceA = 0.9;
  KeqaceB = 231000;
  Keqacn1 = 0.0324;
  Keqacn2 = 2.6145;
  Keqadk = 1.13;
  KeqATPsynth = 2570;
  Keqcs = 2240000;
  Keqeda = 1000;
  Keqedd = 1000;
  Keqeno = 3;
  KeqF6Ptal = 0.177;
  KeqF6Ptkt = 4e-4;
  Keqfba = 0.19;
  Keqgap = 20;
  KeqGl6Phydrol = 42.8;
  Keqgnd = 170;
  Keqicd = 25.3;
  Keqidh = 25.3;
  KeqkaceK = 1000;
  Keqkgdh = 1000;
  KeqMDH = 1e-5;
  Keqmqo = 9;
  KeqNADH = 12.6;
  KeqNADPH = 12.3;
  KeqpaceK = 1000;
  KeqpckA = 1.85;
  Keqpdh = 5;
  Keqpgi = 0.4;
  Keqpgk = 100;
  Keqpgl = 42.8;
  Keqpgm = 0.55;
  Keqpnt = 1.08;
  KeqQH2 = 15;
  Keqrpe = 1.5;
  Keqrpi = 3;
  KeqS7Ptal = 26.6;
  KeqS7Ptkt = 0.05;
  Keqsk = 10;
  Keqtpi = 1.6;
  KeqX5Ptkt = 10;
  Keqzwf = 6e10;
  KesSuc78 = 0.01;
  kf78 = 5100;
  kfaceA = 27.91667;
  kffum75 = 186000;
  kficd = 80.5;
  kfidh = 4830;
  Kfum = 3.7;
  KGDH = 3.67e-7;
  KGl6Phydrol = 0.01;
  Kh1fbp = 7.51e-6;
  Kh1glpX = 7.51e-6;
  Kh1kgdh = 1.55e-7;
  Kh1maeA = 8.5e-7;
  Kh1maeB = 3.43e-7;
  Kh1mqo = 0.0009666254;
  Kh1pckA = 1.96e-7;
  Kh1pfk1 = 3.78e-12;
  Kh1pfk2 = 3.78e-12;
  Kh1pgl = 0.005606881;
  Kh1ppc = 1.64e-6;
  Kh1pyk1 = 2e-5;
  Kh1pyk2 = 1.71e-6;
  Kh1rpe = 9.46926e-4;
  Kh1rpi = 1.64883e-4;
  Kh1zwf = 4.88906e-4;
  Kh2fbp = 2.65e-5;
  Kh2glpX = 2.65e-5;
  Kh2maeA = 0.002815089;
  Kh2maeB = 3.66e-5;
  Kh2mqo = 2.800022e-7;
  Kh2pckA = 7.12292e-4;
  Kh2pfk1 = 6.97e-5;
  Kh2pfk2 = 6.97e-5;
  Kh2pgl = 9.73e-6;
  Kh2ppc = 6.1e-5;
  Kh2pyk1 = 8.96e-5;
  Kh2pyk2 = 0.0240629;
  Kh2rpe = 1.02e-6;
  Kh2rpi = 1.05e-7;
  Kh2zwf = 1.6e-7;
  KhP1ppsA = 1.427146;
  KhP2ppsA = 1.54e-8;
  KhS1ppsA = 6.95e-7;
  KhS2ppsA = 1.4283e-4;
  Ki1KG = 0.01535156;
  Ki1NADH = 100;
  Ki2KG = 0.2555274;
  Ki2NADH = 100;
  KiATP = 0.5806531;
  Kidh = 1000;
  KiG6Ppgl = 0.03;
  KimdhNAD = 0.01;
  KimdhNADH = 1e-4;
  KimdhOAA = 2.999998;
  KirADPpfk1 = 55;
  KirADPpfk2 = 0.077;
  KirADPpyk2 = 0.2189578;
  KirAMPfbp = 10;
  KirAMPFbPfbp = 10;
  KirATPpfk1 = 2.5e-5;
  KirATPpfk2 = 0.0077;
  KirATPpyk2 = 500;
  KirF6Pfbp = 9.719702;
  KirF6PglpX = 0.09364257;
  KirF6PMgfbp = 314.8658;
  KirF6PMgglpX = 3.017746;
  KirF6Ppfk1 = 1.848001;
  KirF6Ppfk2 = 3.73e-6;
  KirFbPfbp = 1.115583;
  KirFbPglpX = 0.0307612;
  KirFbPMgfbp = 0.6764533;
  KirFbPMgglpX = 0.001794476;
  KirFbPMgMgfbp = 0.3559869;
  KirFbPMgMgglpX = 0.05274274;
  KirFbPpfk1 = 0.046;
  KirFbPpfk2 = 0.93;
  KirNADmaeA = 0.6006852;
  KirNADPmaeB = 0.0188885;
  KirPEPpyk2 = 0.08384689;
  KirPhosphF6Pfbp = 6.601167;
  KirPhosphF6PglpX = 0.03218789;
  KirPhosphF6PMgfbp = 48.39311;
  KirPhosphF6PMgglpX = 0.2952895;
  KirPhosphfbp = 15.75622;
  KirPhosphglpX = 0.07368041;
  KirPhosphMgfbp = 538.5504;
  KirPhosphMgglpX = 4.765183;
  KirPyrATPpyk2 = 100;
  KirPyrpyk2 = 100;
  KitADPpfk1 = 80;
  KitADPpfk2 = 0.2;
  KitADPpyk2 = 0.3141116;
  KitAMPfbp = 10;
  KitAMPFbPfbp = 691.2;
  KitATPpfk1 = 0.014;
  KitATPpfk2 = 0.0976;
  KitATPpyk2 = 5.893414;
  KitF6Pfbp = 0.3038757;
  KitF6PglpX = 0.03932298;
  KitF6PMgfbp = 0.3850815;
  KitF6PMgglpX = 0.03567104;
  KitF6Ppfk1 = 0.008562377;
  KitF6Ppfk2 = 3.3e-5;
  KitFbPfbp = 0.006891114;
  KitFbPglpX = 0.004752987;
  KitFbPMgfbp = 6.41946e-4;
  KitFbPMgglpX = 999.9779;
  KitFbPMgMgfbp = 9998.438;
  KitFbPMgMgglpX = 95.88774;
  KitFbPpfk1 = 50.5;
  KitFbPpfk2 = 0.98;
  KitNADmaeA = 0.08371707;
  KitNADPmaeB = 0.02207813;
  KitPEPpyk2 = 0.8264899;
  KitPhosphF6Pfbp = 914.9556;
  KitPhosphF6PglpX = 997.1384;
  KitPhosphF6PMgfbp = 16.45047;
  KitPhosphF6PMgglpX = 691.8735;
  KitPhosphfbp = 3.21146;
  KitPhosphglpX = 1.008355;
  KitPhosphMgfbp = 0.8955931;
  KitPhosphMgglpX = 0.2740964;
  KitPyrATPpyk2 = 100;
  KitPyrpyk2 = 100;
  KkaceK = 25;
  Km1kgdhCoA = 0.075968;
  Km1kgdhKG = 0.02033655;
  Km1kgdhNAD = 0.09861746;
  KmAcacn1 = 0.02;
  KmAcacn2 = 0.02;
  KmAcCoA0 = 0.1816797;
  KmAcCoAaceB = 0.009;
  KmAcCoACS = 0.11;
  KmAcCoApdh = 1;
  KmADPMgpgk = 0.2;
  KmADPpckA = 0.05671878;
  KmADPsk = 0.05;
  KmAMPppsA = 3.47956e-4;
  KmATPMgpgk = 0.48;
  KmATPMgppsA = 0.05492053;
  KmATPpckA = 0.06;
  KmATPsk = 0.07;
  KmBPGgap = 0.2;
  KmBPGpgk = 0.018;
  KmCitacn = 1;
  KmCoAaceB = 10;
  KmCoApdh = 0.005;
  KmCoAsk = 4;
  KmcsCit = 0.05;
  KmcsCoA = 0.05;
  KmDAPfba = 0.13;
  KmDAPtpi = 0.01;
  Kmdh = 1e-5;
  KmF6Ppgi = 0.147;
  KmFbPfba = 0.055;
  KmFum7 = 0.45;
  KmfumFum75 = 0.6;
  KmfumMal75 = 0.7;
  KmG6Ppgi = 1.018;
  KmG6Pzwf = 0.1555655;
  KmGAPeda = 1;
  KmGAPfba = 0.13;
  KmGAPgap = 0.89;
  KmGAPtpi = 0.01;
  KmGl6Ppgl = 0.023;
  KmGl6Pzwf = 0.1216005;
  KmGlcpts = 0.184;
  KmGlxaceA = 0.13;
  KmGlxaceB = 0.021;
  KmHCO3gnd = 100;
  KmHCO3pckA = 4.169148;
  KmiCitaceA = 0.063;
  KmiCitacn = 0.01;
  KmiCiticd = 0.01;
  KmidhCO2 = 0.05;
  KmidhiCit = 0.0059;
  KmidhKG = 0.05;
  KmidhNADP = 0.0227;
  KmidhNADPH = 0.0036;
  KmKDPGeda = 0.35;
  KmKDPGedd = 1;
  KmKGicd = 0.01;
  KmMalaceB = 10;
  KmMalmqo = 0.4354888;
  KmmdhMal = 0.86;
  KmmdhNAD = 0.64;
  KmmdhNADH = 0.003;
  KmmdhOAA = 0.001;
  KmNADgap = 0.045;
  KmNADHgap = 0.012;
  KmNADHpdh = 0.05;
  KmNADpdh = 0.05;
  KmNADPgnd = 0.015;
  KmNADPHgnd = 100;
  KmNADPHicd = 0.001;
  KmNADPHzwf = 0.01678466;
  KmNADPicd = 0.001;
  KmNADPzwf = 0.0274117;
  KmOAA0 = 0.03999023;
  KmOAACS = 0.021;
  KmOAAmqo = 50;
  KmOAApckA = 0.67;
  KmPEPeno = 0.1;
  KmPEPpckA = 0.1185625;
  KmPEPppsA = 20.70922;
  KmPEPpts = 1e-5;
  KmPGA2eno = 0.1;
  KmPGA2pgm = 0.2;
  KmPGA3pgk = 1.28;
  KmPGA3pgm = 0.19;
  KmPGnedd = 0.3;
  KmPGngnd = 0.033;
  KmPGnpgl = 10;
  KmPhosphgap = 0.53;
  KmPhosphppsA = 422.2239;
  KmPhosphsk = 0.7;
  KmPyreda = 100;
  KmPyrpdh = 0.515;
  KmPyrppsA = 0.2286105;
  KmQ78 = 0.002;
  KmQH278 = 0.0045;
  KmQH2mqo = 50;
  KmQmqo = 0.0414168;
  KmR5Prpi = 4.4;
  KmrADPMgpyk1 = 2.775;
  KmrADPMgpyk2 = 0.1988804;
  KmrADPpfk1 = 0.6907519;
  KmrADPpfk2 = 190;
  KmrATPMgpfk1 = 8.13e-5;
  KmrATPMgpfk2 = 0.417;
  KmrF6Ppfk1 = 2.05e-5;
  KmrF6Ppfk2 = 2;
  KmrFbPfbp = 0.008420495;
  KmrFbPglpX = 1e-6;
  KmrFbPpfk1 = 10;
  KmrFbPpfk2 = 1.86;
  KmrHCO3ppc = 1e-6;
  KmrMalmaeA = 0.09346723;
  KmrMalmaeB = 3.7105;
  KmrMgfbp = 0.03876726;
  KmrMgglpX = 0.2632303;
  KmrMgmaeA = 0.1234135;
  KmrMnmaeA = 0.001876626;
  KmrMnmaeB = 8.2225e-4;
  KmrNADmaeA = 0.03297667;
  KmrNADPmaeB = 0.02208499;
  KmrOAAppc = 5.5;
  KmrPEPppc = 3.202721;
  KmrPEPpyk1 = 1e-6;
  KmrPEPpyk2 = 1.1e-6;
  KmrPhosphppc = 0.6907519;
  KmRu5Pgnd = 100;
  KmRu5Prpe = 0.8710365;
  KmRu5Prpi = 0.5;
  KmsdhFum = 0.025;
  KmsdhSuc = 0.28;
  KmSuc75 = 0.28;
  KmSucaceA = 0.59;
  KmSucCoAsk = 0.03;
  KmSucsk = 0.25;
  KmtADPMgpyk1 = 1.31e-4;
  KmtADPMgpyk2 = 0.08483957;
  KmtADPpfk1 = 2;
  KmtADPpfk2 = 4;
  KmtATPMgpfk1 = 3.346858;
  KmtATPMgpfk2 = 0.667;
  KmtF6Ppfk1 = 33.14554;
  KmtF6Ppfk2 = 1.11;
  KmtFbPfbp = 1e-6;
  KmtFbPglpX = 0.003804049;
  KmtFbPpfk1 = 10;
  KmtFbPpfk2 = 0.075;
  KmtHCO3ppc = 2.24316e-4;
  KmtMalmaeA = 0.5320689;
  KmtMalmaeB = 3.28;
  KmtMgfbp = 54.98496;
  KmtMgglpX = 0.003198497;
  KmtMgmaeA = 0.9308088;
  KmtMnmaeA = 0.01174167;
  KmtMnmaeB = 0.1239348;
  KmtNADmaeA = 0.1086355;
  KmtNADPmaeB = 0.02185525;
  KmtOAAppc = 6.605919;
  KmtPEPppc = 5.123589;
  KmtPEPpyk1 = 4.094366;
  KmtPEPpyk2 = 0.05440964;
  KmtPhosphppc = 1;
  KmX5Prpe = 0.8927631;
  KoutAcCoA = 0.083333333;
  KoutAce = 0;
  KoutDAP = 0.006666667;
  KoutE4P = 0.0245;
  KoutF6P = 0.002183333;
  KoutG6P = 5.20833e-4;
  KoutGAP = 0;
  KoutKG = 0.0595;
  KoutOAA = 0.033066667;
  KoutPEP = 0.005283333;
  KoutPGA3 = 0.005;
  KoutPyr = 0.012333333;
  KoutR5P = 0.018833333;
  KoutRu5P = 0;
  KoutS7P = 0;
  KoutSucCoA = 0;
  KpaceK = 1.666667;
  kr78 = 102;
  KrecAcCoA = 0;
  Krecadk = 0.056666667;
  KrecATPsynth = 0.025;
  KreccpdA = 16.66667;
  KreccyaA = 0.023333333;
  KrecNADH = 1.166667;
  KrecNADPH = 6.666667;
  Krecpnt = 0.833333333;
  KrecQH2 = 16.66667;
  krfum75 = 40200;
  krMDH = 33062;
  Ksdh = 3.7;
  kus2uskgdh = 0.016666667;
  kus3uskgdh = 0.016666667;
  Kus45 = 1.79;
  KusrecuscpdA = 1.67e-6;
  KusrecuscyaA = 1.67e-6;
  Lofbp = 8.14591e-4;
  LoglpX = 0.7122661;
  LomaeA = 19.9412;
  LomaeB = 0.1344745;
  Lopfk1 = 14.40891;
  Lopfk2 = 2.36e-5;
  Loppc = 6.38e-10;
  Lopyk1 = 4.588228;
  Lopyk2 = 25.31575;
  Maleate = 0;
  MDH = 5e-5;
  Mg = 1;
  Mn = 0.4;
  nfbp = 4;
  nglpX = 2;
  nmaeA = 4;
  nmaeB = 6;
  npfk1 = 4;
  npfk2 = 4;
  nppc = 4;
  npyk1 = 4;
  npyk2 = 4;
  PEPexp = 1.04;
  pH = 7.5;
  pHmeno = 8.1;
  pHmfba = 6.615;
  pHmfum = 7.6;
  pHmgap = 10.92;
  pHmidh = 7.6;
  pHmkgdh = 8.724102;
  pHmmdh = 7.6;
  pHmpgi = 8.43;
  pHmpgk = 7.49;
  pHmpgm = 7.28;
  pHmsdh = 7.6;
  pHmtpi = 7.26;
  Phosph = 5;
  pKeno = 10;
  pKfba = 7.99;
  pKfum = 8.7;
  pKgap = 14.6;
  pKidh = 8.7;
  pKmdh = 8.7;
  pKpgi = 10.03;
  pKpgk = 10;
  pKpgm = 7.79;
  pKsdh = 8.7;
  pKtpi = 9.09;
  Pool1 = 4.481;
  Pool2 = 0.043;
  Pool3 = 1;
  Pool4 = 0.5;
  Pool5 = 0.001;
  Pool6 = 0.001;
  Pool7 = 1.1;
  Pool8 = 1.57;
  SDH = 2e-4;
  Vfacn1 = 500;
  Vfacn2 = 8.333333;
  Vfeno = 0.383333333;
  Vffba = 7.28;
  Vfgap = 0.833333333;
  Vfgnd = 0.141666667;
  Vfpdh = 0.333333333;
  Vfpgi = 0.95;
  Vfpgk = 1.85;
  Vfpgl = 20;
  Vfpgm = 5.15;
  Vfrpe = 1.5;
  Vfrpi = 1.5;
  Vftpi = 8.493333;
  Vfzwf = 0.043333333;
  VmaceB = 0.833333333;
  Vmeda = 0.041666667;
  Vmedd = 0.016666667;
  VmfpckA = 0.666666667;
  VmfppsA = 0.066666667;
  Vmkgdh = 10.6;
  Vmmqo = 0.833333333;
  Vmrfbp = 0.083333333;
  VmrglpX = 0.416666667;
  VmrmaeA = 1.666667;
  VmrmaeB = 1.666667;
  Vmrpfk1 = 0.043333333;
  Vmrpfk2 = 8.333333;
  Vmrppc = 0.016666667;
  Vmrpyk1 = 9.380637;
  Vmrpyk2 = 0;
  Vmsk = 0.833333333;
  Vmtfbp = 1.67e-8;
  VmtglpX = 1.67e-7;
  VmtmaeA = 1.67e-8;
  VmtmaeB = 0.002019427;
  Vmtpfk1 = 2.02e-8;
  Vmtpfk2 = 1.67e-7;
  Vmtppc = 1.67e-8;
  Vmtpyk1 = 1.67e-8;
  Vmtpyk2 = 0;
  Vptsout = 0.366666667;
  WppsA = 10;
  WrmaeA = 0.04;
  Wrpfk1 = 0.08;
  Wrpfk2 = 100;
  Wrppc = 0.5;
  WtmaeA = 2e-7;
  Wtpfk1 = 1.33;
  Wtpfk2 = 1000;
  Wtppc = 2.5e-5;

  // Reactions:
  vEXTER: => Glcout; extracellular*Dil*(cfeed - Glcout); vEXTER is "Extracellular glucose kinetics";
  v1: Glcout + PEP -> G6P + Pyr; extracellular*Glcout*Vptsout*PEP/(Defaultmc*(Glcout*KmPEPpts + KmGlcpts*KmPEPpts + Glcout*PEP + KmGlcpts*PEP));
  v5: G6P -> F6P; (1 + 2^(1 + pHmpgi - pKpgi)*5^(pHmpgi - pKpgi))*Vfpgi*(-(F6P/Keqpgi) + G6P)/((1 + 10^(pH - pKpgi) + 10^(-pH + 2*pHmpgi - pKpgi))*Defaultmc*KmG6Ppgi*(1 + F6P/KmF6Ppgi + G6P/KmG6Ppgi + PEP/KefPEPpgi));  // modifiers: PEP
  v6: ATP + F6P -> ADP + FbP; npfk1*(Vmrpfk1*(Mg*ATP*F6P/(KdATPMg + Mg) - KirF6Ppfk1*KmrATPMgpfk1*Mg*Wrpfk1*ADP*FbP/(KirFbPpfk1*KmrADPpfk1*(KdADPMg + Mg)))/((1 + 10^(-3 + pH)*Kh1pfk1 + 10^(3 - pH)/Kh2pfk1)*(KirF6Ppfk1*KmrATPMgpfk1 + KirF6Ppfk1*KmrATPMgpfk1*KmrFbPpfk1*Mg*ADP/(KirFbPpfk1*KmrADPpfk1*(KdADPMg + Mg)) + KmrF6Ppfk1*Mg*ATP/(KdATPMg + Mg) + KmrATPMgpfk1*KmrFbPpfk1*Mg*ADP*F6P/(KirFbPpfk1*KmrADPpfk1*(KdADPMg + Mg)) + Mg*ATP*F6P/(KdATPMg + Mg) + Mg^2*ADP*ATP*F6P/(KirADPpfk1*(KdADPMg + Mg)*(KdATPMg + Mg)) + KmrATPMgpfk1*(1 + KdATPMg*ATP/(KirATPpfk1*(KdATPMg + Mg)))*F6P + KirF6Ppfk1*KmrATPMgpfk1*FbP/KirFbPpfk1 + KirF6Ppfk1*KmrATPMgpfk1*Mg*ADP*FbP/(KirFbPpfk1*KmrADPpfk1*(KdADPMg + Mg)) + KmrF6Ppfk1*Mg*ATP*FbP/(KirFbPpfk1*(KdATPMg + Mg)) + KmrF6Ppfk1*Mg^2*Wrpfk1*ADP*ATP*FbP/(KirADPpfk1*KmrFbPpfk1*(KdADPMg + Mg)*(KdATPMg + Mg)))) + Lopfk1*Vmtpfk1*(Mg*ATP*F6P/(KdATPMg + Mg) - KitF6Ppfk1*KmtATPMgpfk1*Mg*Wtpfk1*ADP*FbP/(KitFbPpfk1*KmtADPpfk1*(KdADPMg + Mg)))*(KirF6Ppfk1*KmrATPMgpfk1*(KitF6Ppfk1*KmtATPMgpfk1 + KitF6Ppfk1*KmtATPMgpfk1*KmtFbPpfk1*Mg*ADP/(KitFbPpfk1*KmtADPpfk1*(KdADPMg + Mg)) + KmtF6Ppfk1*Mg*ATP/(KdATPMg + Mg) + KmtATPMgpfk1*KmtFbPpfk1*Mg*ADP*F6P/(KitFbPpfk1*KmtADPpfk1*(KdADPMg + Mg)) + Mg*ATP*F6P/(KdATPMg + Mg) + Mg^2*ADP*ATP*F6P/(KitADPpfk1*(KdADPMg + Mg)*(KdATPMg + Mg)) + KmtATPMgpfk1*(1 + KdATPMg*ATP/(KitATPpfk1*(KdATPMg + Mg)))*F6P + KitF6Ppfk1*KmtATPMgpfk1*FbP/KitFbPpfk1 + KitF6Ppfk1*KmtATPMgpfk1*Mg*ADP*FbP/(KitFbPpfk1*KmtADPpfk1*(KdADPMg + Mg)) + KmtF6Ppfk1*Mg*ATP*FbP/(KitFbPpfk1*(KdATPMg + Mg)) + KmtF6Ppfk1*Mg^2*Wtpfk1*ADP*ATP*FbP/(KitADPpfk1*KmtFbPpfk1*(KdADPMg + Mg)*(KdATPMg + Mg)))*(1 + Mg*ADP/(KeftADPpfk1*(KdADPMg + Mg)) + PEP/KeftPEPpfk1 + Mg*ADP*PEP/(KeftADPpfk1*KeftPEPpfk1*(KdADPMg + Mg)))/(KitF6Ppfk1*KmtATPMgpfk1*(KirF6Ppfk1*KmrATPMgpfk1 + KirF6Ppfk1*KmrATPMgpfk1*KmrFbPpfk1*Mg*ADP/(KirFbPpfk1*KmrADPpfk1*(KdADPMg + Mg)) + KmrF6Ppfk1*Mg*ATP/(KdATPMg + Mg) + KmrATPMgpfk1*KmrFbPpfk1*Mg*ADP*F6P/(KirFbPpfk1*KmrADPpfk1*(KdADPMg + Mg)) + Mg*ATP*F6P/(KdATPMg + Mg) + Mg^2*ADP*ATP*F6P/(KirADPpfk1*(KdADPMg + Mg)*(KdATPMg + Mg)) + KmrATPMgpfk1*(1 + KdATPMg*ATP/(KirATPpfk1*(KdATPMg + Mg)))*F6P + KirF6Ppfk1*KmrATPMgpfk1*FbP/KirFbPpfk1 + KirF6Ppfk1*KmrATPMgpfk1*Mg*ADP*FbP/(KirFbPpfk1*KmrADPpfk1*(KdADPMg + Mg)) + KmrF6Ppfk1*Mg*ATP*FbP/(KirFbPpfk1*(KdATPMg + Mg)) + KmrF6Ppfk1*Mg^2*Wrpfk1*ADP*ATP*FbP/(KirADPpfk1*KmrFbPpfk1*(KdADPMg + Mg)*(KdATPMg + Mg)))*(1 + Mg*ADP/(KefrADPpfk1*(KdADPMg + Mg)) + PEP/KefrPEPpfk1 + Mg*ADP*PEP/(KefrADPpfk1*KefrPEPpfk1*(KdADPMg + Mg)))))^npfk1/((1 + 10^(-3 + pH)*Kh1pfk1 + 10^(3 - pH)/Kh2pfk1)*(KitF6Ppfk1*KmtATPMgpfk1 + KitF6Ppfk1*KmtATPMgpfk1*KmtFbPpfk1*Mg*ADP/(KitFbPpfk1*KmtADPpfk1*(KdADPMg + Mg)) + KmtF6Ppfk1*Mg*ATP/(KdATPMg + Mg) + KmtATPMgpfk1*KmtFbPpfk1*Mg*ADP*F6P/(KitFbPpfk1*KmtADPpfk1*(KdADPMg + Mg)) + Mg*ATP*F6P/(KdATPMg + Mg) + Mg^2*ADP*ATP*F6P/(KitADPpfk1*(KdADPMg + Mg)*(KdATPMg + Mg)) + KmtATPMgpfk1*(1 + KdATPMg*ATP/(KitATPpfk1*(KdATPMg + Mg)))*F6P + KitF6Ppfk1*KmtATPMgpfk1*FbP/KitFbPpfk1 + KitF6Ppfk1*KmtATPMgpfk1*Mg*ADP*FbP/(KitFbPpfk1*KmtADPpfk1*(KdADPMg + Mg)) + KmtF6Ppfk1*Mg*ATP*FbP/(KitFbPpfk1*(KdATPMg + Mg)) + KmtF6Ppfk1*Mg^2*Wtpfk1*ADP*ATP*FbP/(KitADPpfk1*KmtFbPpfk1*(KdADPMg + Mg)*(KdATPMg + Mg)))))/(Defaultmc*(1 + Lopfk1*(KirF6Ppfk1*KmrATPMgpfk1*(KitF6Ppfk1*KmtATPMgpfk1 + KitF6Ppfk1*KmtATPMgpfk1*KmtFbPpfk1*Mg*ADP/(KitFbPpfk1*KmtADPpfk1*(KdADPMg + Mg)) + KmtF6Ppfk1*Mg*ATP/(KdATPMg + Mg) + KmtATPMgpfk1*KmtFbPpfk1*Mg*ADP*F6P/(KitFbPpfk1*KmtADPpfk1*(KdADPMg + Mg)) + Mg*ATP*F6P/(KdATPMg + Mg) + Mg^2*ADP*ATP*F6P/(KitADPpfk1*(KdADPMg + Mg)*(KdATPMg + Mg)) + KmtATPMgpfk1*(1 + KdATPMg*ATP/(KitATPpfk1*(KdATPMg + Mg)))*F6P + KitF6Ppfk1*KmtATPMgpfk1*FbP/KitFbPpfk1 + KitF6Ppfk1*KmtATPMgpfk1*Mg*ADP*FbP/(KitFbPpfk1*KmtADPpfk1*(KdADPMg + Mg)) + KmtF6Ppfk1*Mg*ATP*FbP/(KitFbPpfk1*(KdATPMg + Mg)) + KmtF6Ppfk1*Mg^2*Wtpfk1*ADP*ATP*FbP/(KitADPpfk1*KmtFbPpfk1*(KdADPMg + Mg)*(KdATPMg + Mg)))*(1 + Mg*ADP/(KeftADPpfk1*(KdADPMg + Mg)) + PEP/KeftPEPpfk1 + Mg*ADP*PEP/(KeftADPpfk1*KeftPEPpfk1*(KdADPMg + Mg)))/(KitF6Ppfk1*KmtATPMgpfk1*(KirF6Ppfk1*KmrATPMgpfk1 + KirF6Ppfk1*KmrATPMgpfk1*KmrFbPpfk1*Mg*ADP/(KirFbPpfk1*KmrADPpfk1*(KdADPMg + Mg)) + KmrF6Ppfk1*Mg*ATP/(KdATPMg + Mg) + KmrATPMgpfk1*KmrFbPpfk1*Mg*ADP*F6P/(KirFbPpfk1*KmrADPpfk1*(KdADPMg + Mg)) + Mg*ATP*F6P/(KdATPMg + Mg) + Mg^2*ADP*ATP*F6P/(KirADPpfk1*(KdADPMg + Mg)*(KdATPMg + Mg)) + KmrATPMgpfk1*(1 + KdATPMg*ATP/(KirATPpfk1*(KdATPMg + Mg)))*F6P + KirF6Ppfk1*KmrATPMgpfk1*FbP/KirFbPpfk1 + KirF6Ppfk1*KmrATPMgpfk1*Mg*ADP*FbP/(KirFbPpfk1*KmrADPpfk1*(KdADPMg + Mg)) + KmrF6Ppfk1*Mg*ATP*FbP/(KirFbPpfk1*(KdATPMg + Mg)) + KmrF6Ppfk1*Mg^2*Wrpfk1*ADP*ATP*FbP/(KirADPpfk1*KmrFbPpfk1*(KdADPMg + Mg)*(KdATPMg + Mg)))*(1 + Mg*ADP/(KefrADPpfk1*(KdADPMg + Mg)) + PEP/KefrPEPpfk1 + Mg*ADP*PEP/(KefrADPpfk1*KefrPEPpfk1*(KdADPMg + Mg)))))^npfk1));  // modifiers: PEP
  v7: ATP + F6P -> ADP + FbP; npfk2*(Mg^2*Vmrpfk2*ATP*F6P/((1 + 10^(-3 + pH)*Kh1pfk2 + 10^(3 - pH)/Kh2pfk2)*(KdATPMg + Mg)*(KdrMgpfk2 + Mg)*(KirF6Ppfk2*KmrATPMgpfk2 + KirF6Ppfk2*KmrATPMgpfk2*KmrFbPpfk2*Mg*ADP/(KirFbPpfk2*KmrADPpfk2*(KdADPMg + Mg)) + KmrF6Ppfk2*Mg*ATP/(KdATPMg + Mg) + KmrATPMgpfk2*KmrFbPpfk2*Mg*ADP*F6P/(KirFbPpfk2*KmrADPpfk2*(KdADPMg + Mg)) + Mg*ATP*F6P/(KdATPMg + Mg) + Mg^2*ADP*ATP*F6P/(KirADPpfk2*(KdADPMg + Mg)*(KdATPMg + Mg)) + KmrATPMgpfk2*(1 + KdATPMg*ATP/(KirATPpfk2*(KdATPMg + Mg)))*F6P + KirF6Ppfk2*KmrATPMgpfk2*FbP/KirFbPpfk2 + KirF6Ppfk2*KmrATPMgpfk2*Mg*ADP*FbP/(KirFbPpfk2*KmrADPpfk2*(KdADPMg + Mg)) + KmrF6Ppfk2*Mg*ATP*FbP/(KirFbPpfk2*(KdATPMg + Mg)) + KmrF6Ppfk2*Mg^2*Wrpfk2*ADP*ATP*FbP/(KirADPpfk2*KmrFbPpfk2*(KdADPMg + Mg)*(KdATPMg + Mg)))) + Lopfk2*Mg^2*Vmtpfk2*ATP*F6P*(KdrMgpfk2*KirF6Ppfk2*KmrATPMgpfk2*(KdtMgpfk2 + Mg)*(1 + Mg*ATP/(KeftATPpfk2*(KdATPMg + Mg)))*(1 + F6P/KeftF6Ppfk2)*(KitF6Ppfk2*KmtATPMgpfk2 + KitF6Ppfk2*KmtATPMgpfk2*KmtFbPpfk2*Mg*ADP/(KitFbPpfk2*KmtADPpfk2*(KdADPMg + Mg)) + KmtF6Ppfk2*Mg*ATP/(KdATPMg + Mg) + KmtATPMgpfk2*KmtFbPpfk2*Mg*ADP*F6P/(KitFbPpfk2*KmtADPpfk2*(KdADPMg + Mg)) + Mg*ATP*F6P/(KdATPMg + Mg) + Mg^2*ADP*ATP*F6P/(KitADPpfk2*(KdADPMg + Mg)*(KdATPMg + Mg)) + KmtATPMgpfk2*(1 + KdATPMg*ATP/(KitATPpfk2*(KdATPMg + Mg)))*F6P + KitF6Ppfk2*KmtATPMgpfk2*FbP/KitFbPpfk2 + KitF6Ppfk2*KmtATPMgpfk2*Mg*ADP*FbP/(KitFbPpfk2*KmtADPpfk2*(KdADPMg + Mg)) + KmtF6Ppfk2*Mg*ATP*FbP/(KitFbPpfk2*(KdATPMg + Mg)) + KmtF6Ppfk2*Mg^2*Wtpfk2*ADP*ATP*FbP/(KitADPpfk2*KmtFbPpfk2*(KdADPMg + Mg)*(KdATPMg + Mg)))/(KdtMgpfk2*KitF6Ppfk2*KmtATPMgpfk2*(KdrMgpfk2 + Mg)*(1 + Mg*ATP/(KefrATPpfk2*(KdATPMg + Mg)))*(1 + F6P/KefrF6Ppfk2)*(KirF6Ppfk2*KmrATPMgpfk2 + KirF6Ppfk2*KmrATPMgpfk2*KmrFbPpfk2*Mg*ADP/(KirFbPpfk2*KmrADPpfk2*(KdADPMg + Mg)) + KmrF6Ppfk2*Mg*ATP/(KdATPMg + Mg) + KmrATPMgpfk2*KmrFbPpfk2*Mg*ADP*F6P/(KirFbPpfk2*KmrADPpfk2*(KdADPMg + Mg)) + Mg*ATP*F6P/(KdATPMg + Mg) + Mg^2*ADP*ATP*F6P/(KirADPpfk2*(KdADPMg + Mg)*(KdATPMg + Mg)) + KmrATPMgpfk2*(1 + KdATPMg*ATP/(KirATPpfk2*(KdATPMg + Mg)))*F6P + KirF6Ppfk2*KmrATPMgpfk2*FbP/KirFbPpfk2 + KirF6Ppfk2*KmrATPMgpfk2*Mg*ADP*FbP/(KirFbPpfk2*KmrADPpfk2*(KdADPMg + Mg)) + KmrF6Ppfk2*Mg*ATP*FbP/(KirFbPpfk2*(KdATPMg + Mg)) + KmrF6Ppfk2*Mg^2*Wrpfk2*ADP*ATP*FbP/(KirADPpfk2*KmrFbPpfk2*(KdADPMg + Mg)*(KdATPMg + Mg)))))^npfk2/((1 + 10^(-3 + pH)*Kh1pfk2 + 10^(3 - pH)/Kh2pfk2)*(KdATPMg + Mg)*(KdtMgpfk2 + Mg)*(KitF6Ppfk2*KmtATPMgpfk2 + KitF6Ppfk2*KmtATPMgpfk2*KmtFbPpfk2*Mg*ADP/(KitFbPpfk2*KmtADPpfk2*(KdADPMg + Mg)) + KmtF6Ppfk2*Mg*ATP/(KdATPMg + Mg) + KmtATPMgpfk2*KmtFbPpfk2*Mg*ADP*F6P/(KitFbPpfk2*KmtADPpfk2*(KdADPMg + Mg)) + Mg*ATP*F6P/(KdATPMg + Mg) + Mg^2*ADP*ATP*F6P/(KitADPpfk2*(KdADPMg + Mg)*(KdATPMg + Mg)) + KmtATPMgpfk2*(1 + KdATPMg*ATP/(KitATPpfk2*(KdATPMg + Mg)))*F6P + KitF6Ppfk2*KmtATPMgpfk2*FbP/KitFbPpfk2 + KitF6Ppfk2*KmtATPMgpfk2*Mg*ADP*FbP/(KitFbPpfk2*KmtADPpfk2*(KdADPMg + Mg)) + KmtF6Ppfk2*Mg*ATP*FbP/(KitFbPpfk2*(KdATPMg + Mg)) + KmtF6Ppfk2*Mg^2*Wtpfk2*ADP*ATP*FbP/(KitADPpfk2*KmtFbPpfk2*(KdADPMg + Mg)*(KdATPMg + Mg)))))/(Defaultmc*(1 + Lopfk2*(KdrMgpfk2*KirF6Ppfk2*KmrATPMgpfk2*(KdtMgpfk2 + Mg)*(1 + Mg*ATP/(KeftATPpfk2*(KdATPMg + Mg)))*(1 + F6P/KeftF6Ppfk2)*(KitF6Ppfk2*KmtATPMgpfk2 + KitF6Ppfk2*KmtATPMgpfk2*KmtFbPpfk2*Mg*ADP/(KitFbPpfk2*KmtADPpfk2*(KdADPMg + Mg)) + KmtF6Ppfk2*Mg*ATP/(KdATPMg + Mg) + KmtATPMgpfk2*KmtFbPpfk2*Mg*ADP*F6P/(KitFbPpfk2*KmtADPpfk2*(KdADPMg + Mg)) + Mg*ATP*F6P/(KdATPMg + Mg) + Mg^2*ADP*ATP*F6P/(KitADPpfk2*(KdADPMg + Mg)*(KdATPMg + Mg)) + KmtATPMgpfk2*(1 + KdATPMg*ATP/(KitATPpfk2*(KdATPMg + Mg)))*F6P + KitF6Ppfk2*KmtATPMgpfk2*FbP/KitFbPpfk2 + KitF6Ppfk2*KmtATPMgpfk2*Mg*ADP*FbP/(KitFbPpfk2*KmtADPpfk2*(KdADPMg + Mg)) + KmtF6Ppfk2*Mg*ATP*FbP/(KitFbPpfk2*(KdATPMg + Mg)) + KmtF6Ppfk2*Mg^2*Wtpfk2*ADP*ATP*FbP/(KitADPpfk2*KmtFbPpfk2*(KdADPMg + Mg)*(KdATPMg + Mg)))/(KdtMgpfk2*KitF6Ppfk2*KmtATPMgpfk2*(KdrMgpfk2 + Mg)*(1 + Mg*ATP/(KefrATPpfk2*(KdATPMg + Mg)))*(1 + F6P/KefrF6Ppfk2)*(KirF6Ppfk2*KmrATPMgpfk2 + KirF6Ppfk2*KmrATPMgpfk2*KmrFbPpfk2*Mg*ADP/(KirFbPpfk2*KmrADPpfk2*(KdADPMg + Mg)) + KmrF6Ppfk2*Mg*ATP/(KdATPMg + Mg) + KmrATPMgpfk2*KmrFbPpfk2*Mg*ADP*F6P/(KirFbPpfk2*KmrADPpfk2*(KdADPMg + Mg)) + Mg*ATP*F6P/(KdATPMg + Mg) + Mg^2*ADP*ATP*F6P/(KirADPpfk2*(KdADPMg + Mg)*(KdATPMg + Mg)) + KmrATPMgpfk2*(1 + KdATPMg*ATP/(KirATPpfk2*(KdATPMg + Mg)))*F6P + KirF6Ppfk2*KmrATPMgpfk2*FbP/KirFbPpfk2 + KirF6Ppfk2*KmrATPMgpfk2*Mg*ADP*FbP/(KirFbPpfk2*KmrADPpfk2*(KdADPMg + Mg)) + KmrF6Ppfk2*Mg*ATP*FbP/(KirFbPpfk2*(KdATPMg + Mg)) + KmrF6Ppfk2*Mg^2*Wrpfk2*ADP*ATP*FbP/(KirADPpfk2*KmrFbPpfk2*(KdADPMg + Mg)*(KdATPMg + Mg)))))^npfk2));
  v8: FbP -> DAP + GAP; (1 + 2^(1 + pHmfba - pKfba)*5^(pHmfba - pKfba))*Vffba*(FbP - DAP*GAP/Keqfba)/((1 + 10^(pH - pKfba) + 10^(-pH + 2*pHmfba - pKfba))*Defaultmc*KmFbPfba*(1 + FbP/KmFbPfba + DAP*(1 + GAP/KmGAPfba)/KmDAPfba + PEP/KefPEPfba));  // modifiers: PEP
  v9: DAP -> GAP; (1 + 2^(1 + pHmtpi - pKtpi)*5^(pHmtpi - pKtpi))*Vftpi*(DAP - GAP/Keqtpi)/((1 + 10^(pH - pKtpi) + 10^(-pH + 2*pHmtpi - pKtpi))*Defaultmc*KmDAPtpi*(1 + DAP/KmDAPtpi + GAP/KmGAPtpi));
  v10: GAP + NAD -> BPG + NADH; (1 + 2^(1 + pHmgap - pKgap)*5^(pHmgap - pKgap))*Vfgap*(Phosph*GAP*NAD - BPG*NADH/Keqgap)/((1 + 10^(pH - pKgap) + 10^(-pH + 2*pHmgap - pKgap))*Defaultmc*KmGAPgap*KmNADgap*KmPhosphgap*(-1 + (1 + Phosph/KmPhosphgap)*(1 + GAP/KmGAPgap)*(1 + NAD/KmNADgap) + (1 + BPG/KmBPGgap)*(1 + NADH/KmNADHgap)));
  v11: ADP + BPG -> ATP + PGA3; (1 + 2^(1 + pHmpgk - pKpgk)*5^(pHmpgk - pKpgk))*Vfpgk*(Mg*ADP*BPG/(KdADPMg + Mg) - Mg*ATP*PGA3/(Keqpgk*(KdATPMg + Mg)))/((1 + 10^(pH - pKpgk) + 10^(-pH + 2*pHmpgk - pKpgk))*Defaultmc*KmADPMgpgk*KmBPGpgk*(-1 + (1 + Mg*ADP/(KmADPMgpgk*(KdADPMg + Mg)))*(1 + BPG/KmBPGpgk) + (1 + Mg*ATP/(KmATPMgpgk*(KdATPMg + Mg)))*(1 + PGA3/KmPGA3pgk)));
  v12: PGA3 -> PGA2; (1 + 2^(1 + pHmpgm - pKpgm)*5^(pHmpgm - pKpgm))*Vfpgm*(-(PGA2/Keqpgm) + PGA3)/((1 + 10^(pH - pKpgm) + 10^(-pH + 2*pHmpgm - pKpgm))*Defaultmc*KmPGA3pgm*(1 + PGA2/KmPGA2pgm + PGA3/KmPGA3pgm));
  v13: PGA2 -> PEP; (1 + 2^(1 + pHmeno - pKeno)*5^(pHmeno - pKeno))*Vfeno*(-(PEP/Keqeno) + PGA2)/((1 + 10^(pH - pKeno) + 10^(-pH + 2*pHmeno - pKeno))*Defaultmc*KmPGA2eno*(1 + PEP/KmPEPeno + PGA2/KmPGA2eno));
  v14: ADP + PEP -> ATP + Pyr; npyk2*(Mg*Vmrpyk2*ADP*PEP/((1 + 10^(-3 + pH)*Kh1pyk2 + 10^(3 - pH)/Kh2pyk2)*(KdADPMg + Mg)*(KirPEPpyk2*KmrADPMgpyk2 + KmrPEPpyk2*Mg*ADP/(KdADPMg + Mg) + Mg*ATP/(KirATPpyk2*(KdATPMg + Mg)) + Mg*ADP*PEP/(KdADPMg + Mg) + KmrADPMgpyk2*(1 + KdADPMg*ADP/(KirADPpyk2*(KdADPMg + Mg)))*PEP + Pyr/KirPyrpyk2 + Mg*ATP*Pyr/(KirPyrATPpyk2*KirPyrpyk2*(KdATPMg + Mg)))) + Lopyk2*Mg*Vmtpyk2*ADP*PEP*(KirPEPpyk2*KmrADPMgpyk2*(KitPEPpyk2*KmtADPMgpyk2 + KmtPEPpyk2*Mg*ADP/(KdADPMg + Mg) + Mg*ATP/(KitATPpyk2*(KdATPMg + Mg)) + Mg*ADP*PEP/(KdADPMg + Mg) + KmtADPMgpyk2*(1 + KdADPMg*ADP/(KitADPpyk2*(KdADPMg + Mg)))*PEP + Pyr/KitPyrpyk2 + Mg*ATP*Pyr/(KitPyrATPpyk2*KitPyrpyk2*(KdATPMg + Mg)))*(1 + SucCoA/KeftSucCoApyk2 + Mg*ATP*SucCoA/(KeftATPpyk2*KeftSucCoApyk2*(KdATPMg + Mg)))/(KitPEPpyk2*KmtADPMgpyk2*(KirPEPpyk2*KmrADPMgpyk2 + KmrPEPpyk2*Mg*ADP/(KdADPMg + Mg) + Mg*ATP/(KirATPpyk2*(KdATPMg + Mg)) + Mg*ADP*PEP/(KdADPMg + Mg) + KmrADPMgpyk2*(1 + KdADPMg*ADP/(KirADPpyk2*(KdADPMg + Mg)))*PEP + Pyr/KirPyrpyk2 + Mg*ATP*Pyr/(KirPyrATPpyk2*KirPyrpyk2*(KdATPMg + Mg)))*(1 + Gala6P/KefrGala6Ppyk2 + AMP/KefrAMPpyk2 + G6P/KefrG6Ppyk2 + Gl6P/KefrGl6Ppyk2 + R5P/KefrR5Ppyk2 + Ru5P/KefrRu5Ppyk2 + S7P/KefrS7Ppyk2 + X5P/KefrX5Ppyk2)))^npyk2/((1 + 10^(-3 + pH)*Kh1pyk2 + 10^(3 - pH)/Kh2pyk2)*(KdADPMg + Mg)*(KitPEPpyk2*KmtADPMgpyk2 + KmtPEPpyk2*Mg*ADP/(KdADPMg + Mg) + Mg*ATP/(KitATPpyk2*(KdATPMg + Mg)) + Mg*ADP*PEP/(KdADPMg + Mg) + KmtADPMgpyk2*(1 + KdADPMg*ADP/(KitADPpyk2*(KdADPMg + Mg)))*PEP + Pyr/KitPyrpyk2 + Mg*ATP*Pyr/(KitPyrATPpyk2*KitPyrpyk2*(KdATPMg + Mg)))))/(Defaultmc*(1 + Lopyk2*(KirPEPpyk2*KmrADPMgpyk2*(KitPEPpyk2*KmtADPMgpyk2 + KmtPEPpyk2*Mg*ADP/(KdADPMg + Mg) + Mg*ATP/(KitATPpyk2*(KdATPMg + Mg)) + Mg*ADP*PEP/(KdADPMg + Mg) + KmtADPMgpyk2*(1 + KdADPMg*ADP/(KitADPpyk2*(KdADPMg + Mg)))*PEP + Pyr/KitPyrpyk2 + Mg*ATP*Pyr/(KitPyrATPpyk2*KitPyrpyk2*(KdATPMg + Mg)))*(1 + SucCoA/KeftSucCoApyk2 + Mg*ATP*SucCoA/(KeftATPpyk2*KeftSucCoApyk2*(KdATPMg + Mg)))/(KitPEPpyk2*KmtADPMgpyk2*(KirPEPpyk2*KmrADPMgpyk2 + KmrPEPpyk2*Mg*ADP/(KdADPMg + Mg) + Mg*ATP/(KirATPpyk2*(KdATPMg + Mg)) + Mg*ADP*PEP/(KdADPMg + Mg) + KmrADPMgpyk2*(1 + KdADPMg*ADP/(KirADPpyk2*(KdADPMg + Mg)))*PEP + Pyr/KirPyrpyk2 + Mg*ATP*Pyr/(KirPyrATPpyk2*KirPyrpyk2*(KdATPMg + Mg)))*(1 + Gala6P/KefrGala6Ppyk2 + AMP/KefrAMPpyk2 + G6P/KefrG6Ppyk2 + Gl6P/KefrGl6Ppyk2 + R5P/KefrR5Ppyk2 + Ru5P/KefrRu5Ppyk2 + S7P/KefrS7Ppyk2 + X5P/KefrX5Ppyk2)))^npyk2));  // modifiers: SucCoA, AMP, G6P, Gl6P, R5P, Ru5P, S7P, X5P
  v15: ADP + PEP -> ATP + Pyr; npyk1*(Mg*Vmrpyk1*ADP*PEP/(KdrPEPpyk1*(1 + 10^(-3 + pH)*Kh1pyk1 + 10^(3 - pH)/Kh2pyk1)*KmrADPMgpyk1*(KdADPMg + Mg)*(1 + KdADPMg*ADP/(KefrADPpyk1*(KdADPMg + Mg)) + KmrPEPpyk1*Mg*ADP/(KdrPEPpyk1*KmrADPMgpyk1*(KdADPMg + Mg)) + Mg*ATP/(KdrATPMgpyk1*(KdATPMg + Mg)) + PEP/KdrPEPpyk1 + KdADPMg*ADP*PEP/(KdrPEPpyk1*KefrADPpyk1*(KdADPMg + Mg)) + Mg*ADP*PEP/(KdrPEPpyk1*KmrADPMgpyk1*(KdADPMg + Mg)) + Pyr/KdrPyrpyk1 + Mg*ATP*Pyr/(KdrPyrATPMgpyk1*KdrPyrpyk1*(KdATPMg + Mg)))) + Lopyk1*Mg*Vmtpyk1*ADP*PEP*((1 + KdADPMg*ADP/(KeftADPpyk1*(KdADPMg + Mg)) + KmtPEPpyk1*Mg*ADP/(KdtPEPpyk1*KmtADPMgpyk1*(KdADPMg + Mg)) + Mg*ATP/(KdtATPMgpyk1*(KdATPMg + Mg)) + PEP/KdtPEPpyk1 + KdADPMg*ADP*PEP/(KdtPEPpyk1*KeftADPpyk1*(KdADPMg + Mg)) + Mg*ADP*PEP/(KdtPEPpyk1*KmtADPMgpyk1*(KdADPMg + Mg)) + Pyr/KdtPyrpyk1 + Mg*ATP*Pyr/(KdtPyrATPMgpyk1*KdtPyrpyk1*(KdATPMg + Mg)))*(1 + FbP/KeftFbPpyk1 + FbP^2/(Keft2FbPpyk1*KeftFbPpyk1) + FbP^2*SucCoA/(Keft2FbPpyk1*KeftFbPpyk1*KeftSucCoApyk1) + FbP^2*SucCoA^2/(Keft2FbPpyk1*Keft2SucCoApyk1*KeftFbPpyk1*KeftSucCoApyk1))/((1 + KdADPMg*ADP/(KefrADPpyk1*(KdADPMg + Mg)) + KmrPEPpyk1*Mg*ADP/(KdrPEPpyk1*KmrADPMgpyk1*(KdADPMg + Mg)) + Mg*ATP/(KdrATPMgpyk1*(KdATPMg + Mg)) + PEP/KdrPEPpyk1 + KdADPMg*ADP*PEP/(KdrPEPpyk1*KefrADPpyk1*(KdADPMg + Mg)) + Mg*ADP*PEP/(KdrPEPpyk1*KmrADPMgpyk1*(KdADPMg + Mg)) + Pyr/KdrPyrpyk1 + Mg*ATP*Pyr/(KdrPyrATPMgpyk1*KdrPyrpyk1*(KdATPMg + Mg)))*(1 + FbP/KefrFbPpyk1 + FbP^2/(Kefr2FbPpyk1*KefrFbPpyk1) + FbP^2*SucCoA/(Kefr2FbPpyk1*KefrFbPpyk1*KefrSucCoApyk1) + FbP^2*SucCoA^2/(Kefr2FbPpyk1*Kefr2SucCoApyk1*KefrFbPpyk1*KefrSucCoApyk1))))^npyk1/(KdtPEPpyk1*(1 + 10^(-3 + pH)*Kh1pyk1 + 10^(3 - pH)/Kh2pyk1)*KmtADPMgpyk1*(KdADPMg + Mg)*(1 + KdADPMg*ADP/(KeftADPpyk1*(KdADPMg + Mg)) + KmtPEPpyk1*Mg*ADP/(KdtPEPpyk1*KmtADPMgpyk1*(KdADPMg + Mg)) + Mg*ATP/(KdtATPMgpyk1*(KdATPMg + Mg)) + PEP/KdtPEPpyk1 + KdADPMg*ADP*PEP/(KdtPEPpyk1*KeftADPpyk1*(KdADPMg + Mg)) + Mg*ADP*PEP/(KdtPEPpyk1*KmtADPMgpyk1*(KdADPMg + Mg)) + Pyr/KdtPyrpyk1 + Mg*ATP*Pyr/(KdtPyrATPMgpyk1*KdtPyrpyk1*(KdATPMg + Mg)))))/(Defaultmc*(1 + Lopyk1*((1 + KdADPMg*ADP/(KeftADPpyk1*(KdADPMg + Mg)) + KmtPEPpyk1*Mg*ADP/(KdtPEPpyk1*KmtADPMgpyk1*(KdADPMg + Mg)) + Mg*ATP/(KdtATPMgpyk1*(KdATPMg + Mg)) + PEP/KdtPEPpyk1 + KdADPMg*ADP*PEP/(KdtPEPpyk1*KeftADPpyk1*(KdADPMg + Mg)) + Mg*ADP*PEP/(KdtPEPpyk1*KmtADPMgpyk1*(KdADPMg + Mg)) + Pyr/KdtPyrpyk1 + Mg*ATP*Pyr/(KdtPyrATPMgpyk1*KdtPyrpyk1*(KdATPMg + Mg)))*(1 + FbP/KeftFbPpyk1 + FbP^2/(Keft2FbPpyk1*KeftFbPpyk1) + FbP^2*SucCoA/(Keft2FbPpyk1*KeftFbPpyk1*KeftSucCoApyk1) + FbP^2*SucCoA^2/(Keft2FbPpyk1*Keft2SucCoApyk1*KeftFbPpyk1*KeftSucCoApyk1))/((1 + KdADPMg*ADP/(KefrADPpyk1*(KdADPMg + Mg)) + KmrPEPpyk1*Mg*ADP/(KdrPEPpyk1*KmrADPMgpyk1*(KdADPMg + Mg)) + Mg*ATP/(KdrATPMgpyk1*(KdATPMg + Mg)) + PEP/KdrPEPpyk1 + KdADPMg*ADP*PEP/(KdrPEPpyk1*KefrADPpyk1*(KdADPMg + Mg)) + Mg*ADP*PEP/(KdrPEPpyk1*KmrADPMgpyk1*(KdADPMg + Mg)) + Pyr/KdrPyrpyk1 + Mg*ATP*Pyr/(KdrPyrATPMgpyk1*KdrPyrpyk1*(KdATPMg + Mg)))*(1 + FbP/KefrFbPpyk1 + FbP^2/(Kefr2FbPpyk1*KefrFbPpyk1) + FbP^2*SucCoA/(Kefr2FbPpyk1*KefrFbPpyk1*KefrSucCoApyk1) + FbP^2*SucCoA^2/(Kefr2FbPpyk1*Kefr2SucCoApyk1*KefrFbPpyk1*KefrSucCoApyk1))))^npyk1));  // modifiers: FbP, SucCoA
  v16: G6P + NADP -> Gl6P + NADPH; Vfzwf*(G6P*NADP - Gl6P*NADPH/Keqzwf)/(Defaultmc*(1 + 10^(3 - pH)/Kh1zwf + 10^(-3 + pH)*Kh2zwf)*(KdG6Pzwf*KmNADPzwf + KmNADPzwf*G6P + KmG6Pzwf*NADP + G6P*NADP + KdG6Pzwf*KmNADPzwf*(KmGl6Pzwf*NADPH/KmNADPHzwf + Gl6P*NADPH/KmNADPHzwf)/KdGl6Pzwf));
  v17: Gl6P -> PGn; Vfpgl*(Gl6P - PGn/Keqpgl)/(Defaultmc*(1 + 10^(3 - pH)/Kh1pgl + 10^(-3 + pH)*Kh2pgl)*(KmGl6Ppgl + KmGl6Ppgl*G6P/KiG6Ppgl + Gl6P + KmGl6Ppgl*PGn/KmPGnpgl));  // modifiers: G6P
  v18: Gl6P -> PGn; KGl6Phydrol*(Gl6P - PGn/KeqGl6Phydrol)/Defaultmc;
  v19: NADP + PGn -> NADPH + Ru5P; Vfgnd*(NADP*PGn - HCO3*NADPH*Ru5P/Keqgnd)/(Defaultmc*(1 + 10^(3 - pH)/k1hgnd + 10^(-3 + pH)*k2hgnd)*(1 + PEP/KefPEPgnd)*(KdNADPgnd*KmPGngnd + KmPGngnd*NADP + FbP*(KdNADPgnd*KmPGngnd/KefFbPgnd + KmPGngnd*NADP/KefNADPFbPgnd) + KmNADPgnd*PGn + NADP*PGn + ATP*(KdNADPgnd*KmPGngnd/KefATPgnd + KmNADPgnd*PGn/KefNADPATPgnd) + KdNADPgnd*KmPGngnd*(HCO3/KdHCO3gnd + NADPH/KdNADPHgnd + Ru5P/KdRu5Pgnd) + KdNADPgnd*KmPGngnd*(HCO3*KmRu5Pgnd*NADPH + HCO3*KmNADPHgnd*Ru5P + HCO3*NADPH*Ru5P + KmHCO3gnd*NADPH*Ru5P)/(KdHCO3gnd*KdHCO3NADPHgnd*KmRu5Pgnd)));  // modifiers: PEP, FbP, ATP
  v20: Ru5P -> X5P; Vfrpe*(Ru5P - X5P/Keqrpe)/(Defaultmc*(1 + 10^(3 - pH)/Kh1rpe + 10^(-3 + pH)*Kh2rpe)*(Ru5P + KmRu5Prpe*(1 + X5P/KmX5Prpe)));
  v21: Ru5P -> R5P; Vfrpi*(-(R5P/Keqrpi) + Ru5P)/(Defaultmc*(1 + 10^(3 - pH)/Kh1rpi + 10^(-3 + pH)*Kh2rpi)*(R5P + KmR5Prpi*(1 + E4P/KefE4Prpi + Ru5P/KmRu5Prpi)));  // modifiers: E4P
  v22: Tkt + X5P -> GAP + Tktc2; KcatX5PGAPtkt*(-(KdGAPtkt*GAP*Tktc2/(KdX5Ptkt*KeqX5Ptkt)) + Tkt*X5P)/(Defaultmc*(1 + 10^(3 - pH)/k1htkt + 10^(-3 + pH)*k2htkt));
  v23: F6P + Tkt -> E4P + Tktc2; KcatF6PE4Ptkt*(F6P*Tkt - KdE4Ptkt*E4P*Tktc2/(KdF6Ptkt*KeqF6Ptkt))/(Defaultmc*(1 + 10^(3 - pH)/k1htkt + 10^(-3 + pH)*k2htkt));
  v24: S7P + Tkt -> R5P + Tktc2; KcatS7PR5Ptkt*(S7P*Tkt - KdR5Ptkt*R5P*Tktc2/(KdS7Ptkt*KeqS7Ptkt))/(Defaultmc*(1 + 10^(3 - pH)/k1htkt + 10^(-3 + pH)*k2htkt));
  v25: F6P + Tal -> GAP + Talc3; KcatF6PGAPtal*(F6P*Tal - KdGAPtal*GAP*Talc3/(KdF6Ptal*KeqF6Ptal))/(Defaultmc*(1 + 10^(3 - pH)/k1htal + 10^(-3 + pH)*k2htal));
  v26: S7P + Tal -> E4P + Talc3; KcatS7PE4Ptal*(S7P*Tal - KdE4Ptal*E4P*Talc3/(KdS7Ptal*KeqS7Ptal))/(Defaultmc*(1 + 10^(3 - pH)/k1htal + 10^(-3 + pH)*k2htal));
  v27: FbP -> F6P; nfbp*(KdFbPMg*Mg*Vmrfbp*FbP/((1 + 10^(-3 + pH)*Kh1fbp + 10^(3 - pH)/Kh2fbp)*(KdFbPMg + Mg)*(KirFbPfbp*KmrMgfbp + KmrFbPfbp*Mg + KirFbPfbp*KmrMgfbp*(Phosph/KirPhosphfbp + Mg*Phosph/(KirPhosphfbp*KirPhosphMgfbp) + F6P/KirF6Pfbp + Mg*F6P/(KirF6Pfbp*KirF6PMgfbp) + Phosph*F6P/(KirPhosphF6Pfbp*KirPhosphfbp) + Mg*Phosph*F6P/(KirPhosphF6Pfbp*KirPhosphF6PMgfbp*KirPhosphfbp)) + KdFbPMg*KmrMgfbp*FbP/(KdFbPMg + Mg) + KdFbPMg*Mg*FbP/(KdFbPMg + Mg) + KirFbPfbp*KmrMgfbp*(AMP/KirAMPfbp + Mg*FbP/(KirFbPMgfbp*(KdFbPMg + Mg)) + Mg^2*FbP/(KirFbPMgfbp*KirFbPMgMgfbp*(KdFbPMg + Mg)) + KdFbPMg*AMP*FbP/(KirAMPfbp*KirAMPFbPfbp*(KdFbPMg + Mg))))) + KdFbPMg*Lofbp*Mg*Vmtfbp*FbP*(KirFbPfbp*KmrMgfbp*(KitFbPfbp*KmtMgfbp + KmtFbPfbp*Mg + KitFbPfbp*KmtMgfbp*(Phosph/KitPhosphfbp + Mg*Phosph/(KitPhosphfbp*KitPhosphMgfbp) + F6P/KitF6Pfbp + Mg*F6P/(KitF6Pfbp*KitF6PMgfbp) + Phosph*F6P/(KitPhosphF6Pfbp*KitPhosphfbp) + Mg*Phosph*F6P/(KitPhosphF6Pfbp*KitPhosphF6PMgfbp*KitPhosphfbp)) + KdFbPMg*KmtMgfbp*FbP/(KdFbPMg + Mg) + KdFbPMg*Mg*FbP/(KdFbPMg + Mg) + KitFbPfbp*KmtMgfbp*(AMP/KitAMPfbp + Mg*FbP/(KitFbPMgfbp*(KdFbPMg + Mg)) + Mg^2*FbP/(KitFbPMgfbp*KitFbPMgMgfbp*(KdFbPMg + Mg)) + KdFbPMg*AMP*FbP/(KitAMPfbp*KitAMPFbPfbp*(KdFbPMg + Mg))))/(KitFbPfbp*KmtMgfbp*(KirFbPfbp*KmrMgfbp + KmrFbPfbp*Mg + KirFbPfbp*KmrMgfbp*(Phosph/KirPhosphfbp + Mg*Phosph/(KirPhosphfbp*KirPhosphMgfbp) + F6P/KirF6Pfbp + Mg*F6P/(KirF6Pfbp*KirF6PMgfbp) + Phosph*F6P/(KirPhosphF6Pfbp*KirPhosphfbp) + Mg*Phosph*F6P/(KirPhosphF6Pfbp*KirPhosphF6PMgfbp*KirPhosphfbp)) + KdFbPMg*KmrMgfbp*FbP/(KdFbPMg + Mg) + KdFbPMg*Mg*FbP/(KdFbPMg + Mg) + KirFbPfbp*KmrMgfbp*(AMP/KirAMPfbp + Mg*FbP/(KirFbPMgfbp*(KdFbPMg + Mg)) + Mg^2*FbP/(KirFbPMgfbp*KirFbPMgMgfbp*(KdFbPMg + Mg)) + KdFbPMg*AMP*FbP/(KirAMPfbp*KirAMPFbPfbp*(KdFbPMg + Mg))))))^nfbp/((1 + 10^(-3 + pH)*Kh1fbp + 10^(3 - pH)/Kh2fbp)*(KdFbPMg + Mg)*(KitFbPfbp*KmtMgfbp + KmtFbPfbp*Mg + KitFbPfbp*KmtMgfbp*(Phosph/KitPhosphfbp + Mg*Phosph/(KitPhosphfbp*KitPhosphMgfbp) + F6P/KitF6Pfbp + Mg*F6P/(KitF6Pfbp*KitF6PMgfbp) + Phosph*F6P/(KitPhosphF6Pfbp*KitPhosphfbp) + Mg*Phosph*F6P/(KitPhosphF6Pfbp*KitPhosphF6PMgfbp*KitPhosphfbp)) + KdFbPMg*KmtMgfbp*FbP/(KdFbPMg + Mg) + KdFbPMg*Mg*FbP/(KdFbPMg + Mg) + KitFbPfbp*KmtMgfbp*(AMP/KitAMPfbp + Mg*FbP/(KitFbPMgfbp*(KdFbPMg + Mg)) + Mg^2*FbP/(KitFbPMgfbp*KitFbPMgMgfbp*(KdFbPMg + Mg)) + KdFbPMg*AMP*FbP/(KitAMPfbp*KitAMPFbPfbp*(KdFbPMg + Mg))))))/(Defaultmc*(1 + Lofbp*(KirFbPfbp*KmrMgfbp*(KitFbPfbp*KmtMgfbp + KmtFbPfbp*Mg + KitFbPfbp*KmtMgfbp*(Phosph/KitPhosphfbp + Mg*Phosph/(KitPhosphfbp*KitPhosphMgfbp) + F6P/KitF6Pfbp + Mg*F6P/(KitF6Pfbp*KitF6PMgfbp) + Phosph*F6P/(KitPhosphF6Pfbp*KitPhosphfbp) + Mg*Phosph*F6P/(KitPhosphF6Pfbp*KitPhosphF6PMgfbp*KitPhosphfbp)) + KdFbPMg*KmtMgfbp*FbP/(KdFbPMg + Mg) + KdFbPMg*Mg*FbP/(KdFbPMg + Mg) + KitFbPfbp*KmtMgfbp*(AMP/KitAMPfbp + Mg*FbP/(KitFbPMgfbp*(KdFbPMg + Mg)) + Mg^2*FbP/(KitFbPMgfbp*KitFbPMgMgfbp*(KdFbPMg + Mg)) + KdFbPMg*AMP*FbP/(KitAMPfbp*KitAMPFbPfbp*(KdFbPMg + Mg))))/(KitFbPfbp*KmtMgfbp*(KirFbPfbp*KmrMgfbp + KmrFbPfbp*Mg + KirFbPfbp*KmrMgfbp*(Phosph/KirPhosphfbp + Mg*Phosph/(KirPhosphfbp*KirPhosphMgfbp) + F6P/KirF6Pfbp + Mg*F6P/(KirF6Pfbp*KirF6PMgfbp) + Phosph*F6P/(KirPhosphF6Pfbp*KirPhosphfbp) + Mg*Phosph*F6P/(KirPhosphF6Pfbp*KirPhosphF6PMgfbp*KirPhosphfbp)) + KdFbPMg*KmrMgfbp*FbP/(KdFbPMg + Mg) + KdFbPMg*Mg*FbP/(KdFbPMg + Mg) + KirFbPfbp*KmrMgfbp*(AMP/KirAMPfbp + Mg*FbP/(KirFbPMgfbp*(KdFbPMg + Mg)) + Mg^2*FbP/(KirFbPMgfbp*KirFbPMgMgfbp*(KdFbPMg + Mg)) + KdFbPMg*AMP*FbP/(KirAMPfbp*KirAMPFbPfbp*(KdFbPMg + Mg))))))^nfbp));  // modifiers: AMP
  v28: FbP -> F6P; nglpX*(KdFbPMg*Mg*VmrglpX*FbP/((1 + 10^(-3 + pH)*Kh1glpX + 10^(3 - pH)/Kh2glpX)*(KdFbPMg + Mg)*(KirFbPglpX*KmrMgglpX + KmrFbPglpX*Mg + KirFbPglpX*KmrMgglpX*(Phosph/KirPhosphglpX + Mg*Phosph/(KirPhosphglpX*KirPhosphMgglpX) + F6P/KirF6PglpX + Mg*F6P/(KirF6PglpX*KirF6PMgglpX) + Phosph*F6P/(KirPhosphF6PglpX*KirPhosphglpX) + Mg*Phosph*F6P/(KirPhosphF6PglpX*KirPhosphF6PMgglpX*KirPhosphglpX)) + KdFbPMg*KmrMgglpX*FbP/(KdFbPMg + Mg) + KdFbPMg*Mg*FbP/(KdFbPMg + Mg) + KirFbPglpX*KmrMgglpX*(Mg*FbP/(KirFbPMgglpX*(KdFbPMg + Mg)) + Mg^2*FbP/(KirFbPMgglpX*KirFbPMgMgglpX*(KdFbPMg + Mg))))) + KdFbPMg*LoglpX*Mg*VmtglpX*FbP*(KirFbPglpX*KmrMgglpX*(KitFbPglpX*KmtMgglpX + KmtFbPglpX*Mg + KitFbPglpX*KmtMgglpX*(Phosph/KitPhosphglpX + Mg*Phosph/(KitPhosphglpX*KitPhosphMgglpX) + F6P/KitF6PglpX + Mg*F6P/(KitF6PglpX*KitF6PMgglpX) + Phosph*F6P/(KitPhosphF6PglpX*KitPhosphglpX) + Mg*Phosph*F6P/(KitPhosphF6PglpX*KitPhosphF6PMgglpX*KitPhosphglpX)) + KdFbPMg*KmtMgglpX*FbP/(KdFbPMg + Mg) + KdFbPMg*Mg*FbP/(KdFbPMg + Mg) + KitFbPglpX*KmtMgglpX*(Mg*FbP/(KitFbPMgglpX*(KdFbPMg + Mg)) + Mg^2*FbP/(KitFbPMgglpX*KitFbPMgMgglpX*(KdFbPMg + Mg))))*(1 + Phosph/KeftPhosphglpX + Mg*ADP/(KeftADPglpX*(KdADPMg + Mg)) + Mg*ATP/(KeftATPglpX*(KdATPMg + Mg)) + PEP/KeftPEPglpX)/(KitFbPglpX*KmtMgglpX*(KirFbPglpX*KmrMgglpX + KmrFbPglpX*Mg + KirFbPglpX*KmrMgglpX*(Phosph/KirPhosphglpX + Mg*Phosph/(KirPhosphglpX*KirPhosphMgglpX) + F6P/KirF6PglpX + Mg*F6P/(KirF6PglpX*KirF6PMgglpX) + Phosph*F6P/(KirPhosphF6PglpX*KirPhosphglpX) + Mg*Phosph*F6P/(KirPhosphF6PglpX*KirPhosphF6PMgglpX*KirPhosphglpX)) + KdFbPMg*KmrMgglpX*FbP/(KdFbPMg + Mg) + KdFbPMg*Mg*FbP/(KdFbPMg + Mg) + KirFbPglpX*KmrMgglpX*(Mg*FbP/(KirFbPMgglpX*(KdFbPMg + Mg)) + Mg^2*FbP/(KirFbPMgglpX*KirFbPMgMgglpX*(KdFbPMg + Mg))))*(1 + Phosph/KefrPhosphglpX + Mg*ADP/(KefrADPglpX*(KdADPMg + Mg)) + Mg*ATP/(KefrATPglpX*(KdATPMg + Mg)) + PEP/KefrPEPglpX)))^nglpX/((1 + 10^(-3 + pH)*Kh1glpX + 10^(3 - pH)/Kh2glpX)*(KdFbPMg + Mg)*(KitFbPglpX*KmtMgglpX + KmtFbPglpX*Mg + KitFbPglpX*KmtMgglpX*(Phosph/KitPhosphglpX + Mg*Phosph/(KitPhosphglpX*KitPhosphMgglpX) + F6P/KitF6PglpX + Mg*F6P/(KitF6PglpX*KitF6PMgglpX) + Phosph*F6P/(KitPhosphF6PglpX*KitPhosphglpX) + Mg*Phosph*F6P/(KitPhosphF6PglpX*KitPhosphF6PMgglpX*KitPhosphglpX)) + KdFbPMg*KmtMgglpX*FbP/(KdFbPMg + Mg) + KdFbPMg*Mg*FbP/(KdFbPMg + Mg) + KitFbPglpX*KmtMgglpX*(Mg*FbP/(KitFbPMgglpX*(KdFbPMg + Mg)) + Mg^2*FbP/(KitFbPMgglpX*KitFbPMgMgglpX*(KdFbPMg + Mg))))))/(Defaultmc*(1 + LoglpX*(KirFbPglpX*KmrMgglpX*(KitFbPglpX*KmtMgglpX + KmtFbPglpX*Mg + KitFbPglpX*KmtMgglpX*(Phosph/KitPhosphglpX + Mg*Phosph/(KitPhosphglpX*KitPhosphMgglpX) + F6P/KitF6PglpX + Mg*F6P/(KitF6PglpX*KitF6PMgglpX) + Phosph*F6P/(KitPhosphF6PglpX*KitPhosphglpX) + Mg*Phosph*F6P/(KitPhosphF6PglpX*KitPhosphF6PMgglpX*KitPhosphglpX)) + KdFbPMg*KmtMgglpX*FbP/(KdFbPMg + Mg) + KdFbPMg*Mg*FbP/(KdFbPMg + Mg) + KitFbPglpX*KmtMgglpX*(Mg*FbP/(KitFbPMgglpX*(KdFbPMg + Mg)) + Mg^2*FbP/(KitFbPMgglpX*KitFbPMgMgglpX*(KdFbPMg + Mg))))*(1 + Phosph/KeftPhosphglpX + Mg*ADP/(KeftADPglpX*(KdADPMg + Mg)) + Mg*ATP/(KeftATPglpX*(KdATPMg + Mg)) + PEP/KeftPEPglpX)/(KitFbPglpX*KmtMgglpX*(KirFbPglpX*KmrMgglpX + KmrFbPglpX*Mg + KirFbPglpX*KmrMgglpX*(Phosph/KirPhosphglpX + Mg*Phosph/(KirPhosphglpX*KirPhosphMgglpX) + F6P/KirF6PglpX + Mg*F6P/(KirF6PglpX*KirF6PMgglpX) + Phosph*F6P/(KirPhosphF6PglpX*KirPhosphglpX) + Mg*Phosph*F6P/(KirPhosphF6PglpX*KirPhosphF6PMgglpX*KirPhosphglpX)) + KdFbPMg*KmrMgglpX*FbP/(KdFbPMg + Mg) + KdFbPMg*Mg*FbP/(KdFbPMg + Mg) + KirFbPglpX*KmrMgglpX*(Mg*FbP/(KirFbPMgglpX*(KdFbPMg + Mg)) + Mg^2*FbP/(KirFbPMgglpX*KirFbPMgMgglpX*(KdFbPMg + Mg))))*(1 + Phosph/KefrPhosphglpX + Mg*ADP/(KefrADPglpX*(KdADPMg + Mg)) + Mg*ATP/(KefrATPglpX*(KdATPMg + Mg)) + PEP/KefrPEPglpX)))^nglpX));  // modifiers: ADP, ATP, PEP
  v29: PEP -> OAA; nppc*(Vmrppc*(-(KdrPEPppc*KmrHCO3ppc*Phosph*OAA/(KdrOAAppc*KmrPhosphppc*Wrppc)) + HCO3*PEP)/((1 + 10^(-3 + pH)*Kh1ppc + 10^(3 - pH)/Kh2ppc)*(KdrPEPppc*KmrHCO3ppc + HCO3*KmrPEPppc + KdrPEPppc*KmrHCO3ppc*(KmrOAAppc*Phosph + KmrPhosphppc*OAA + Phosph*OAA)/(KdrOAAppc*KmrPhosphppc) + HCO3*PEP + KmrHCO3ppc*PEP)) + Loppc*Vmtppc*(-(KdtPEPppc*KmtHCO3ppc*Phosph*OAA/(KdtOAAppc*KmtPhosphppc*Wtppc)) + HCO3*PEP)*(KdrPEPppc*KmrHCO3ppc*(1 + AcCoA/KeftAcCoAppc + FbP/KeftFbPppc + AcCoA*FbP/(KeftFbPAcCoAppc*KeftFbPppc))*(KdtPEPppc*KmtHCO3ppc + HCO3*KmtPEPppc + KdtPEPppc*KmtHCO3ppc*(KmtOAAppc*Phosph + KmtPhosphppc*OAA + Phosph*OAA)/(KdtOAAppc*KmtPhosphppc) + HCO3*PEP + KmtHCO3ppc*PEP)*(1 + Asp/KeftAspppc + Cys/KeftCysppc + Maleate/KeftMaleateppc + Cit/KeftCitppc + Fum/KeftFumppc + Mal/KeftMalppc + Suc/KeftSucppc)/(KdtPEPppc*KmtHCO3ppc*(1 + AcCoA/KefrAcCoAppc + FbP/KefrFbPppc + AcCoA*FbP/(KefrFbPAcCoAppc*KefrFbPppc))*(KdrPEPppc*KmrHCO3ppc + HCO3*KmrPEPppc + KdrPEPppc*KmrHCO3ppc*(KmrOAAppc*Phosph + KmrPhosphppc*OAA + Phosph*OAA)/(KdrOAAppc*KmrPhosphppc) + HCO3*PEP + KmrHCO3ppc*PEP)*(1 + Asp/KefrAspppc + Cys/KefrCysppc + Maleate/KefrMaleateppc + Cit/KefrCitppc + Fum/KefrFumppc + Mal/KefrMalppc + Suc/KefrSucppc)))^nppc/((1 + 10^(-3 + pH)*Kh1ppc + 10^(3 - pH)/Kh2ppc)*(KdtPEPppc*KmtHCO3ppc + HCO3*KmtPEPppc + KdtPEPppc*KmtHCO3ppc*(KmtOAAppc*Phosph + KmtPhosphppc*OAA + Phosph*OAA)/(KdtOAAppc*KmtPhosphppc) + HCO3*PEP + KmtHCO3ppc*PEP)))/(Defaultmc*(1 + Loppc*(KdrPEPppc*KmrHCO3ppc*(1 + AcCoA/KeftAcCoAppc + FbP/KeftFbPppc + AcCoA*FbP/(KeftFbPAcCoAppc*KeftFbPppc))*(KdtPEPppc*KmtHCO3ppc + HCO3*KmtPEPppc + KdtPEPppc*KmtHCO3ppc*(KmtOAAppc*Phosph + KmtPhosphppc*OAA + Phosph*OAA)/(KdtOAAppc*KmtPhosphppc) + HCO3*PEP + KmtHCO3ppc*PEP)*(1 + Asp/KeftAspppc + Cys/KeftCysppc + Maleate/KeftMaleateppc + Cit/KeftCitppc + Fum/KeftFumppc + Mal/KeftMalppc + Suc/KeftSucppc)/(KdtPEPppc*KmtHCO3ppc*(1 + AcCoA/KefrAcCoAppc + FbP/KefrFbPppc + AcCoA*FbP/(KefrFbPAcCoAppc*KefrFbPppc))*(KdrPEPppc*KmrHCO3ppc + HCO3*KmrPEPppc + KdrPEPppc*KmrHCO3ppc*(KmrOAAppc*Phosph + KmrPhosphppc*OAA + Phosph*OAA)/(KdrOAAppc*KmrPhosphppc) + HCO3*PEP + KmrHCO3ppc*PEP)*(1 + Asp/KefrAspppc + Cys/KefrCysppc + Maleate/KefrMaleateppc + Cit/KefrCitppc + Fum/KefrFumppc + Mal/KefrMalppc + Suc/KefrSucppc)))^nppc));  // modifiers: AcCoA, FbP, Cit, Fum, Mal, Suc
  v30: ATP + OAA -> ADP + PEP; VmfpckA*(Mg*ATP*OAA/(KdATPMg + Mg) - HCO3*Mg*ADP*PEP/(KeqpckA*(KdADPMg + Mg)))/(Defaultmc*(1 + 10^(-3 + pH)*Kh1pckA + 10^(3 - pH)/Kh2pckA)*(HCO3*KmADPpckA*KmPEPpckA + KmADPpckA*KmHCO3pckA*KmPEPpckA + HCO3*KmPEPpckA*ADP + KmHCO3pckA*KmPEPpckA*Mg*ADP/(KdADPMg + Mg) + KmADPpckA*KmHCO3pckA*KmPEPpckA*(KmOAApckA*Mg*ATP/(KdATPMg + Mg) + KmATPpckA*OAA + Mg*ATP*OAA/(KdATPMg + Mg))/(KmATPpckA*KmOAApckA) + HCO3*KmADPpckA*PEP + KmADPpckA*KmHCO3pckA*PEP + HCO3*Mg*ADP*PEP/(KdADPMg + Mg) + KmHCO3pckA*Mg*ADP*PEP/(KdADPMg + Mg)));
  v31: ATP + Pyr -> AMP + PEP; VmfppsA*(-(KmATPMgppsA*KmPyrppsA*Mg*Phosph*AMP*PEP/(KdAMPppsA*KdMgppsA*KmPEPppsA*KmPhosphppsA*WppsA^2)) + Mg*ATP*Pyr/(KdATPMg + Mg))/(Defaultmc*((1 + 10^(-3 + pH)*KhS1ppsA + 10^(3 - pH)/KhS2ppsA)*KmPyrppsA*Mg*ATP/(KdATPMg + Mg) + (1 + 10^(-3 + pH)*KhP1ppsA + 10^(3 - pH)/KhP2ppsA)*KmPyrppsA*Mg*Phosph*ATP/(KdPhosphppsA*(KdATPMg + Mg)) + (1 + 10^(-3 + pH)*KhP1ppsA + 10^(3 - pH)/KhP2ppsA)*KmPyrppsA*Mg*AMP*ATP/(KdAMPppsA*(KdATPMg + Mg)) + (1 + 10^(-3 + pH)*KhP1ppsA + 10^(3 - pH)/KhP2ppsA)*KmPyrppsA*Mg*Phosph*AMP*ATP/(KdAMPppsA*KdPhosphppsA*(KdATPMg + Mg)) + (1 + 10^(-3 + pH)*KhP1ppsA + 10^(3 - pH)/KhP2ppsA)*KmATPMgppsA*KmPyrppsA*Mg^2*Phosph*AMP*ATP/(KdAMPppsA*KdATPMgppsA*KdMgppsA*KmPhosphppsA*(KdATPMg + Mg)*(1 + Mg/KdMgppsA)*WppsA) + (1 + 10^(-3 + pH)*KhS1ppsA + 10^(3 - pH)/KhS2ppsA)*(KmPyrppsA*Mg*ATP*KG/(KefKGppsA*(KdATPMg + Mg)) + KmATPMgppsA*KmPyrppsA*(1 + Mg/KdMgppsA)*KG*PEP/(KefKGppsA*KmPEPppsA*WppsA)) + (1 + 10^(-3 + pH)*KhS1ppsA + 10^(3 - pH)/KhS2ppsA)*(KmPyrppsA*Mg*ATP*OAA/(KefOAAppsA*(KdATPMg + Mg)) + KmATPMgppsA*KmPyrppsA*(1 + Mg/KdMgppsA)*OAA*PEP/(KefOAAppsA*KmPEPppsA*WppsA)) + KmATPMgppsA*KmPyrppsA*((1 + 10^(-3 + pH)*KhS1ppsA + 10^(3 - pH)/KhS2ppsA)*KmPEPppsA*Mg*Phosph*AMP + KdMgppsA*(1 + 10^(-3 + pH)*KhP1ppsA + 10^(3 - pH)/KhP2ppsA)*KmPhosphppsA*Phosph*AMP*PEP/KdPhosphppsA + (1 + 10^(-3 + pH)*KhP1ppsA + 10^(3 - pH)/KhP2ppsA)*Mg*Phosph*AMP*PEP + KdMgppsA*(1 + 10^(-3 + pH)*KhP1ppsA + 10^(3 - pH)/KhP2ppsA)*(1 + Mg/KdMgppsA)*(KmAMPppsA*Phosph*PEP + KmPhosphppsA*AMP*PEP))/(KdAMPppsA*KdMgppsA*KmPEPppsA*KmPhosphppsA*WppsA) + (1 + 10^(-3 + pH)*KhS1ppsA + 10^(3 - pH)/KhS2ppsA)*KmATPMgppsA*(1 + Mg/KdMgppsA)*Pyr + (1 + 10^(-3 + pH)*KhS1ppsA + 10^(3 - pH)/KhS2ppsA)*Mg*ATP*Pyr/(KdATPMg + Mg) + (1 + 10^(-3 + pH)*KhS1ppsA + 10^(3 - pH)/KhS2ppsA)*(KdADPMg*KmATPMgppsA*KmPyrppsA*Mg*Phosph*ADP*AMP/(KdAMPppsA*KdMgppsA*KefADPppsA*KmPhosphppsA*(KdADPMg + Mg)*(1 + Mg/KdMgppsA)*WppsA) + KdADPMg*KmATPMgppsA*ADP*Pyr/(KefADPppsA*(KdADPMg + Mg))) + (1 + 10^(-3 + pH)*KhS1ppsA + 10^(3 - pH)/KhS2ppsA)*(KdATPMg*KmATPMgppsA*KmPyrppsA*Mg*Phosph*AMP*ATP/(KdAMPppsA*KdMgppsA*KefATPppsA*KmPhosphppsA*(KdATPMg + Mg)*(1 + Mg/KdMgppsA)*WppsA) + KdATPMg*KmATPMgppsA*ATP*Pyr/(KefATPppsA*(KdATPMg + Mg))) + (1 + Mg/KdMgppsA)*((1 + 10^(-3 + pH)*KhS1ppsA + 10^(3 - pH)/KhS2ppsA)*KmATPMgppsA*KmPyrppsA*PEP/(KmPEPppsA*WppsA) + ((1 + 10^(-3 + pH)*KhP1ppsA + 10^(3 - pH)/KhP2ppsA)*KmATPMgppsA/KdPEPppsA + (1 + 10^(-3 + pH)*KhS1ppsA + 10^(3 - pH)/KhS2ppsA)*KmATPMgppsA*KmPyrppsA/(KdPyrppsA*KmPEPppsA*WppsA))*PEP*Pyr)));  // modifiers: KG, OAA, ADP
  v32: Mal + NADP -> NADPH + Pyr; nmaeB*(Mn*VmrmaeB*Mal*NADP/((1 + 10^(-3 + pH)*Kh1maeB + 10^(3 - pH)/Kh2maeB)*(KmrMnmaeB + Mn)*(KmrNADPmaeB*Mal + Mal*NADP + KirNADPmaeB*KmrMalmaeB*(1 + NADH/KdrNADHmaeB + NADPH/KdrNADPHmaeB) + KmrMalmaeB*NADP*(1 + OAA/KefrOAAmaeB))) + LomaeB*Mn*VmtmaeB*Mal*NADP*(KirNADPmaeB*KmrMalmaeB*KmrMnmaeB*(KmtMnmaeB + Mn)*(1 + AcCoA/KeftAcCoAmaeB)*(1 + cAMP/KeftcAMPmaeB)*(KmtNADPmaeB*Mal + Mal*NADP + KitNADPmaeB*KmtMalmaeB*(1 + NADH/KdtNADHmaeB + NADPH/KdtNADPHmaeB) + KmtMalmaeB*NADP*(1 + OAA/KefrOAAmaeB))/(KitNADPmaeB*KmtMalmaeB*KmtMnmaeB*(KmrMnmaeB + Mn)*(1 + AcCoA/KefrAcCoAmaeB)*(1 + cAMP/KefrcAMPmaeB)*(KmrNADPmaeB*Mal + Mal*NADP + KirNADPmaeB*KmrMalmaeB*(1 + NADH/KdrNADHmaeB + NADPH/KdrNADPHmaeB) + KmrMalmaeB*NADP*(1 + OAA/KefrOAAmaeB))))^nmaeB/((1 + 10^(-3 + pH)*Kh1maeB + 10^(3 - pH)/Kh2maeB)*(KmtMnmaeB + Mn)*(KmtNADPmaeB*Mal + Mal*NADP + KitNADPmaeB*KmtMalmaeB*(1 + NADH/KdtNADHmaeB + NADPH/KdtNADPHmaeB) + KmtMalmaeB*NADP*(1 + OAA/KefrOAAmaeB))))/(Defaultmc*(1 + LomaeB*(KirNADPmaeB*KmrMalmaeB*KmrMnmaeB*(KmtMnmaeB + Mn)*(1 + AcCoA/KeftAcCoAmaeB)*(1 + cAMP/KeftcAMPmaeB)*(KmtNADPmaeB*Mal + Mal*NADP + KitNADPmaeB*KmtMalmaeB*(1 + NADH/KdtNADHmaeB + NADPH/KdtNADPHmaeB) + KmtMalmaeB*NADP*(1 + OAA/KefrOAAmaeB))/(KitNADPmaeB*KmtMalmaeB*KmtMnmaeB*(KmrMnmaeB + Mn)*(1 + AcCoA/KefrAcCoAmaeB)*(1 + cAMP/KefrcAMPmaeB)*(KmrNADPmaeB*Mal + Mal*NADP + KirNADPmaeB*KmrMalmaeB*(1 + NADH/KdrNADHmaeB + NADPH/KdrNADPHmaeB) + KmrMalmaeB*NADP*(1 + OAA/KefrOAAmaeB))))^nmaeB));  // modifiers: NADH, OAA, AcCoA, cAMP
  v33: Mal + NAD -> NADH + Pyr; nmaeA*((KmrMnmaeA*Mg/KmrMgmaeA + Mn)*VmrmaeA*Mal*NAD/((1 + 10^(-3 + pH)*Kh1maeA + 10^(3 - pH)/Kh2maeA)*(KmrMnmaeA + KmrMnmaeA*Mg/KmrMgmaeA + Mn)*(KirNADmaeA*KmrMalmaeA + KmrNADmaeA*Mal + KmrMalmaeA*NAD + Mal*NAD)) + LomaeA*(KmtMnmaeA*Mg/KmtMgmaeA + Mn)*VmtmaeA*Mal*NAD*((1 + Asp/KeftAspmaeA)*KirNADmaeA*KmrMalmaeA*KmrMnmaeA*(KmtMnmaeA + KmtMnmaeA*Mg/KmtMgmaeA + Mn)*(1 + ATP/KeftATPmaeA)*(1 + AcCoA/KeftAcCoAmaeA + CoA/KeftCoAmaeA)*(KitNADmaeA*KmtMalmaeA + KmtNADmaeA*Mal + KmtMalmaeA*NAD + Mal*NAD)/((1 + Asp/KefrAspmaeA)*KitNADmaeA*KmtMalmaeA*KmtMnmaeA*(KmrMnmaeA + KmrMnmaeA*Mg/KmrMgmaeA + Mn)*(1 + ATP/KefrATPmaeA)*(1 + AcCoA/KefrAcCoAmaeA + CoA/KefrCoAmaeA)*(KirNADmaeA*KmrMalmaeA + KmrNADmaeA*Mal + KmrMalmaeA*NAD + Mal*NAD)))^nmaeA/((1 + 10^(-3 + pH)*Kh1maeA + 10^(3 - pH)/Kh2maeA)*(KmtMnmaeA + KmtMnmaeA*Mg/KmtMgmaeA + Mn)*(KitNADmaeA*KmtMalmaeA + KmtNADmaeA*Mal + KmtMalmaeA*NAD + Mal*NAD)))/(Defaultmc*(1 + LomaeA*((1 + Asp/KeftAspmaeA)*KirNADmaeA*KmrMalmaeA*KmrMnmaeA*(KmtMnmaeA + KmtMnmaeA*Mg/KmtMgmaeA + Mn)*(1 + ATP/KeftATPmaeA)*(1 + AcCoA/KeftAcCoAmaeA + CoA/KeftCoAmaeA)*(KitNADmaeA*KmtMalmaeA + KmtNADmaeA*Mal + KmtMalmaeA*NAD + Mal*NAD)/((1 + Asp/KefrAspmaeA)*KitNADmaeA*KmtMalmaeA*KmtMnmaeA*(KmrMnmaeA + KmrMnmaeA*Mg/KmrMgmaeA + Mn)*(1 + ATP/KefrATPmaeA)*(1 + AcCoA/KefrAcCoAmaeA + CoA/KefrCoAmaeA)*(KirNADmaeA*KmrMalmaeA + KmrNADmaeA*Mal + KmrMalmaeA*NAD + Mal*NAD)))^nmaeA));  // modifiers: ATP, AcCoA, CoA
  v34: CoA + NAD + Pyr -> AcCoA + NADH; Vfpdh*(-(HCO3*AcCoA*NADH/Keqpdh) + CoA*NAD*Pyr)/(Defaultmc*KmCoApdh*KmNADpdh*KmPyrpdh*(AcCoA/KmAcCoApdh + NADH/KmNADHpdh + AcCoA*NADH/(KmAcCoApdh*KmNADHpdh) + CoA*NADH/(KmCoApdh*KmNADHpdh) + AcCoA*CoA*NADH/(KmAcCoApdh*KmCoApdh*KmNADHpdh) + NAD*NADH/(KmNADHpdh*KmNADpdh) + CoA*NAD*NADH/(KmCoApdh*KmNADHpdh*KmNADpdh) + AcCoA*Pyr/(KmAcCoApdh*KmPyrpdh) + AcCoA*CoA*Pyr/(KmAcCoApdh*KmCoApdh*KmPyrpdh) + CoA*(1 + NAD/KmNADpdh)*Pyr/(KmCoApdh*KmPyrpdh) + NAD*(1 + CoA/KmCoApdh + Pyr/KmPyrpdh)/KmNADpdh));
  v35: AcCoA + OAA -> Cit + CoA; CS*(1 + 100000*K1E + 1/(100000*K2E))*kCS8*(-(Cit*CoA/Keqcs) + AcCoA*OAA)/(Defaultmc*(KmOAA0*AcCoA*(1 + 10^(-3 + pH)*K1E + 10^(3 - pH)/K2E + KG/Ki1KG + NADH/Ki1NADH) + AcCoA*(1 + 10^(-3 + pH)*K1E + 10^(3 - pH)/K2E + KG/Ki2KG + NADH/Ki2NADH)*OAA + (1 + 10^(-3 + pH)*K1E + 10^(3 - pH)*(1 + ATP/KiATP)/K2E)*(KdAcCoA0*KmOAA0 + KmAcCoA0*OAA) + (1 + 10^(-3 + pH)*K1E + 10^(3 - pH)/K2E)*(KdAcCoA0*KmcsCoA*KmOAA0*Cit/(KdcsCoA*KmcsCit) + KmcsCoA*KmOAA0*AcCoA*Cit/(KdcsCoA*KmcsCit) + KdAcCoA0*KmOAA0*CoA/KdcsCoA + KdAcCoA0*KmOAA0*Cit*OAA/(KdcsCoA*KmcsCit) + AcCoA*Cit*OAA/KdcsCit + KmAcCoA0*CoA*OAA/KdcsCoA + KdAcCoA0*KmOAA0*Cit*CoA*OAA/(KdcsCoA*KdcsOAA*KmcsCit))));  // modifiers: KG, NADH, ATP
  v36: Cit -> Ac; Vfacn1*(-(Ac/Keqacn1) + Cit)/(Defaultmc*(Cit + KmCitacn*(1 + (KmAcacn1^(-1) + KmAcacn2^(-1))*Ac + iCit/KmiCitacn)));  // modifiers: iCit
  v37: Ac -> iCit; Keqacn2*Vfacn2*(Ac - iCit/Keqacn2)/(Defaultmc*(KmiCitacn*(1 + (KmAcacn1^(-1) + KmAcacn2^(-1))*Ac + Cit/KmCitacn) + iCit));  // modifiers: Cit
  v38: iCit + NADP -> KG + NADPH; kficd*ICD*(iCit*NADP - KG*NADPH/Keqicd)/(Defaultmc*(KmiCiticd*KmNADPicd + KmNADPicd*iCit + KmiCiticd*NADP + iCit*NADP + KmiCiticd*KmNADPicd*(KG/KmKGicd + NADPH/KmNADPHicd + KG*NADPH/(KmKGicd*KmNADPHicd))));  // modifiers: ICD
  v39: CoA + KG + NAD -> NADH + SucCoA; k2kgdh^5*k3kgdh^5*kcat17kgdh^2*KGDH*(1 + 10000*Kh1kgdh + 10^(-10 + 2*pHmkgdh)*Kh1kgdh)^2*CoA*KG*(k2kgdh*k3kgdh*kcat17kgdh*(1 + 10000*Kh1kgdh + 10^(-10 + 2*pHmkgdh)*Kh1kgdh)/(k2kgdh*k3kgdh - (k2kgdh + k3kgdh)*kcat17kgdh*(1 + 10000*Kh1kgdh + 10^(-10 + 2*pHmkgdh)*Kh1kgdh)) + k2kgdh*k3kgdh*kcat28kgdh*(1 + 100000*Kh1kgdh + 10^(-11 + 2*pHmkgdh)*Kh1kgdh)*KG/(Kd2kgdhKG*(k2kgdh*k3kgdh - (k2kgdh + k3kgdh)*kcat28kgdh*(1 + 100000*Kh1kgdh + 10^(-11 + 2*pHmkgdh)*Kh1kgdh))))*NAD/(Defaultmc*(1 + 10^(-3 + pH)*Kh1kgdh + 10^(-3 - pH + 2*pHmkgdh)*Kh1kgdh)*(k2kgdh*k3kgdh - (k2kgdh + k3kgdh)*kcat17kgdh*(1 + 10000*Kh1kgdh + 10^(-10 + 2*pHmkgdh)*Kh1kgdh))^2*(k2kgdh*k3kgdh + k2kgdh^2*k3kgdh*kcat17kgdh*(1 + 10000*Kh1kgdh + 10^(-10 + 2*pHmkgdh)*Kh1kgdh)/(k2kgdh*k3kgdh - (k2kgdh + k3kgdh)*kcat17kgdh*(1 + 10000*Kh1kgdh + 10^(-10 + 2*pHmkgdh)*Kh1kgdh)) + k2kgdh*k3kgdh^2*kcat17kgdh*(1 + 10000*Kh1kgdh + 10^(-10 + 2*pHmkgdh)*Kh1kgdh)/(k2kgdh*k3kgdh - (k2kgdh + k3kgdh)*kcat17kgdh*(1 + 10000*Kh1kgdh + 10^(-10 + 2*pHmkgdh)*Kh1kgdh)))^3*Km1kgdhCoA*Km1kgdhKG*Km1kgdhNAD*(k2kgdh^4*k3kgdh^4*kcat17kgdh^2*(1 + 10000*Kh1kgdh + 10^(-10 + 2*pHmkgdh)*Kh1kgdh)^2*CoA*KG/((k2kgdh*k3kgdh - (k2kgdh + k3kgdh)*kcat17kgdh*(1 + 10000*Kh1kgdh + 10^(-10 + 2*pHmkgdh)*Kh1kgdh))^2*(k2kgdh*k3kgdh + k2kgdh^2*k3kgdh*kcat17kgdh*(1 + 10000*Kh1kgdh + 10^(-10 + 2*pHmkgdh)*Kh1kgdh)/(k2kgdh*k3kgdh - (k2kgdh + k3kgdh)*kcat17kgdh*(1 + 10000*Kh1kgdh + 10^(-10 + 2*pHmkgdh)*Kh1kgdh)) + k2kgdh*k3kgdh^2*kcat17kgdh*(1 + 10000*Kh1kgdh + 10^(-10 + 2*pHmkgdh)*Kh1kgdh)/(k2kgdh*k3kgdh - (k2kgdh + k3kgdh)*kcat17kgdh*(1 + 10000*Kh1kgdh + 10^(-10 + 2*pHmkgdh)*Kh1kgdh)))^2*Km1kgdhCoA*Km1kgdhKG) + k2kgdh^4*k3kgdh^4*kcat17kgdh*kcat28kgdh*(1 + 100000*Kh1kgdh + 10^(-11 + 2*pHmkgdh)*Kh1kgdh)*(1 + 10000*Kh1kgdh + 10^(-10 + 2*pHmkgdh)*Kh1kgdh)*CoA*KG^2/(Kd2kgdhKG*(k2kgdh*k3kgdh - (k2kgdh + k3kgdh)*kcat28kgdh*(1 + 100000*Kh1kgdh + 10^(-11 + 2*pHmkgdh)*Kh1kgdh))*(k2kgdh*k3kgdh - (k2kgdh + k3kgdh)*kcat17kgdh*(1 + 10000*Kh1kgdh + 10^(-10 + 2*pHmkgdh)*Kh1kgdh))*(k2kgdh*k3kgdh + k2kgdh^2*k3kgdh*kcat17kgdh*(1 + 10000*Kh1kgdh + 10^(-10 + 2*pHmkgdh)*Kh1kgdh)/(k2kgdh*k3kgdh - (k2kgdh + k3kgdh)*kcat17kgdh*(1 + 10000*Kh1kgdh + 10^(-10 + 2*pHmkgdh)*Kh1kgdh)) + k2kgdh*k3kgdh^2*kcat17kgdh*(1 + 10000*Kh1kgdh + 10^(-10 + 2*pHmkgdh)*Kh1kgdh)/(k2kgdh*k3kgdh - (k2kgdh + k3kgdh)*kcat17kgdh*(1 + 10000*Kh1kgdh + 10^(-10 + 2*pHmkgdh)*Kh1kgdh)))^2*Km1kgdhCoA*Km1kgdhKG) + k2kgdh^4*k3kgdh^4*kcat17kgdh^2*(1 + 10000*Kh1kgdh + 10^(-10 + 2*pHmkgdh)*Kh1kgdh)^2*CoA*NAD/((k2kgdh*k3kgdh - (k2kgdh + k3kgdh)*kcat17kgdh*(1 + 10000*Kh1kgdh + 10^(-10 + 2*pHmkgdh)*Kh1kgdh))^2*(k2kgdh*k3kgdh + k2kgdh^2*k3kgdh*kcat17kgdh*(1 + 10000*Kh1kgdh + 10^(-10 + 2*pHmkgdh)*Kh1kgdh)/(k2kgdh*k3kgdh - (k2kgdh + k3kgdh)*kcat17kgdh*(1 + 10000*Kh1kgdh + 10^(-10 + 2*pHmkgdh)*Kh1kgdh)) + k2kgdh*k3kgdh^2*kcat17kgdh*(1 + 10000*Kh1kgdh + 10^(-10 + 2*pHmkgdh)*Kh1kgdh)/(k2kgdh*k3kgdh - (k2kgdh + k3kgdh)*kcat17kgdh*(1 + 10000*Kh1kgdh + 10^(-10 + 2*pHmkgdh)*Kh1kgdh)))^2*Km1kgdhCoA*Km1kgdhNAD) + k2kgdh^4*k3kgdh^4*kcat17kgdh^2*(1 + 10000*Kh1kgdh + 10^(-10 + 2*pHmkgdh)*Kh1kgdh)^2*KG*NAD/((k2kgdh*k3kgdh - (k2kgdh + k3kgdh)*kcat17kgdh*(1 + 10000*Kh1kgdh + 10^(-10 + 2*pHmkgdh)*Kh1kgdh))^2*(k2kgdh*k3kgdh + k2kgdh^2*k3kgdh*kcat17kgdh*(1 + 10000*Kh1kgdh + 10^(-10 + 2*pHmkgdh)*Kh1kgdh)/(k2kgdh*k3kgdh - (k2kgdh + k3kgdh)*kcat17kgdh*(1 + 10000*Kh1kgdh + 10^(-10 + 2*pHmkgdh)*Kh1kgdh)) + k2kgdh*k3kgdh^2*kcat17kgdh*(1 + 10000*Kh1kgdh + 10^(-10 + 2*pHmkgdh)*Kh1kgdh)/(k2kgdh*k3kgdh - (k2kgdh + k3kgdh)*kcat17kgdh*(1 + 10000*Kh1kgdh + 10^(-10 + 2*pHmkgdh)*Kh1kgdh)))^2*Km1kgdhKG*Km1kgdhNAD) + k2kgdh^4*k3kgdh^4*kcat17kgdh^2*(1 + 10000*Kh1kgdh + 10^(-10 + 2*pHmkgdh)*Kh1kgdh)^2*CoA*KG*NAD/((k2kgdh*k3kgdh - (k2kgdh + k3kgdh)*kcat17kgdh*(1 + 10000*Kh1kgdh + 10^(-10 + 2*pHmkgdh)*Kh1kgdh))^2*(k2kgdh*k3kgdh + k2kgdh^2*k3kgdh*kcat17kgdh*(1 + 10000*Kh1kgdh + 10^(-10 + 2*pHmkgdh)*Kh1kgdh)/(k2kgdh*k3kgdh - (k2kgdh + k3kgdh)*kcat17kgdh*(1 + 10000*Kh1kgdh + 10^(-10 + 2*pHmkgdh)*Kh1kgdh)) + k2kgdh*k3kgdh^2*kcat17kgdh*(1 + 10000*Kh1kgdh + 10^(-10 + 2*pHmkgdh)*Kh1kgdh)/(k2kgdh*k3kgdh - (k2kgdh + k3kgdh)*kcat17kgdh*(1 + 10000*Kh1kgdh + 10^(-10 + 2*pHmkgdh)*Kh1kgdh)))^2*Km1kgdhCoA*Km1kgdhKG*Km1kgdhNAD) + k2kgdh^4*k3kgdh^4*kcat17kgdh*kcat28kgdh*(1 + 100000*Kh1kgdh + 10^(-11 + 2*pHmkgdh)*Kh1kgdh)*(1 + 10000*Kh1kgdh + 10^(-10 + 2*pHmkgdh)*Kh1kgdh)*KG^2*NAD/(Kd2kgdhKG*(k2kgdh*k3kgdh - (k2kgdh + k3kgdh)*kcat28kgdh*(1 + 100000*Kh1kgdh + 10^(-11 + 2*pHmkgdh)*Kh1kgdh))*(k2kgdh*k3kgdh - (k2kgdh + k3kgdh)*kcat17kgdh*(1 + 10000*Kh1kgdh + 10^(-10 + 2*pHmkgdh)*Kh1kgdh))*(k2kgdh*k3kgdh + k2kgdh^2*k3kgdh*kcat17kgdh*(1 + 10000*Kh1kgdh + 10^(-10 + 2*pHmkgdh)*Kh1kgdh)/(k2kgdh*k3kgdh - (k2kgdh + k3kgdh)*kcat17kgdh*(1 + 10000*Kh1kgdh + 10^(-10 + 2*pHmkgdh)*Kh1kgdh)) + k2kgdh*k3kgdh^2*kcat17kgdh*(1 + 10000*Kh1kgdh + 10^(-10 + 2*pHmkgdh)*Kh1kgdh)/(k2kgdh*k3kgdh - (k2kgdh + k3kgdh)*kcat17kgdh*(1 + 10000*Kh1kgdh + 10^(-10 + 2*pHmkgdh)*Kh1kgdh)))^2*Km1kgdhKG*Km1kgdhNAD) + k2kgdh^4*k3kgdh^4*kcat17kgdh^2*(1 + 10000*Kh1kgdh + 10^(-10 + 2*pHmkgdh)*Kh1kgdh)^2*(k2kgdh*k3kgdh + k2kgdh^2*k3kgdh*kcat28kgdh*(1 + 100000*Kh1kgdh + 10^(-11 + 2*pHmkgdh)*Kh1kgdh)/(k2kgdh*k3kgdh - (k2kgdh + k3kgdh)*kcat28kgdh*(1 + 100000*Kh1kgdh + 10^(-11 + 2*pHmkgdh)*Kh1kgdh)) + k2kgdh*k3kgdh^2*kcat28kgdh*(1 + 100000*Kh1kgdh + 10^(-11 + 2*pHmkgdh)*Kh1kgdh)/(k2kgdh*k3kgdh - (k2kgdh + k3kgdh)*kcat28kgdh*(1 + 100000*Kh1kgdh + 10^(-11 + 2*pHmkgdh)*Kh1kgdh)))*CoA*KG^2*NAD/(Kd2kgdhKG*(k2kgdh*k3kgdh - (k2kgdh + k3kgdh)*kcat17kgdh*(1 + 10000*Kh1kgdh + 10^(-10 + 2*pHmkgdh)*Kh1kgdh))^2*(k2kgdh*k3kgdh + k2kgdh^2*k3kgdh*kcat17kgdh*(1 + 10000*Kh1kgdh + 10^(-10 + 2*pHmkgdh)*Kh1kgdh)/(k2kgdh*k3kgdh - (k2kgdh + k3kgdh)*kcat17kgdh*(1 + 10000*Kh1kgdh + 10^(-10 + 2*pHmkgdh)*Kh1kgdh)) + k2kgdh*k3kgdh^2*kcat17kgdh*(1 + 10000*Kh1kgdh + 10^(-10 + 2*pHmkgdh)*Kh1kgdh)/(k2kgdh*k3kgdh - (k2kgdh + k3kgdh)*kcat17kgdh*(1 + 10000*Kh1kgdh + 10^(-10 + 2*pHmkgdh)*Kh1kgdh)))^3*Km1kgdhCoA*Km1kgdhKG*Km1kgdhNAD) + k2kgdh^2*k3kgdh^2*kcat17kgdh*(1 + 10000*Kh1kgdh + 10^(-10 + 2*pHmkgdh)*Kh1kgdh)*kus3uskgdh*CoA*(1 + k2kgdh^2*k3kgdh*kcat17kgdh*(1 + 10000*Kh1kgdh + 10^(-10 + 2*pHmkgdh)*Kh1kgdh)*NAD/((k2kgdh*k3kgdh - (k2kgdh + k3kgdh)*kcat17kgdh*(1 + 10000*Kh1kgdh + 10^(-10 + 2*pHmkgdh)*Kh1kgdh))*(k2kgdh*k3kgdh + k2kgdh^2*k3kgdh*kcat17kgdh*(1 + 10000*Kh1kgdh + 10^(-10 + 2*pHmkgdh)*Kh1kgdh)/(k2kgdh*k3kgdh - (k2kgdh + k3kgdh)*kcat17kgdh*(1 + 10000*Kh1kgdh + 10^(-10 + 2*pHmkgdh)*Kh1kgdh)) + k2kgdh*k3kgdh^2*kcat17kgdh*(1 + 10000*Kh1kgdh + 10^(-10 + 2*pHmkgdh)*Kh1kgdh)/(k2kgdh*k3kgdh - (k2kgdh + k3kgdh)*kcat17kgdh*(1 + 10000*Kh1kgdh + 10^(-10 + 2*pHmkgdh)*Kh1kgdh)))*Km1kgdhNAD))*NADH/((k2kgdh*k3kgdh - (k2kgdh + k3kgdh)*kcat17kgdh*(1 + 10000*Kh1kgdh + 10^(-10 + 2*pHmkgdh)*Kh1kgdh))*(k2kgdh*k3kgdh + k2kgdh^2*k3kgdh*kcat17kgdh*(1 + 10000*Kh1kgdh + 10^(-10 + 2*pHmkgdh)*Kh1kgdh)/(k2kgdh*k3kgdh - (k2kgdh + k3kgdh)*kcat17kgdh*(1 + 10000*Kh1kgdh + 10^(-10 + 2*pHmkgdh)*Kh1kgdh)) + k2kgdh*k3kgdh^2*kcat17kgdh*(1 + 10000*Kh1kgdh + 10^(-10 + 2*pHmkgdh)*Kh1kgdh)/(k2kgdh*k3kgdh - (k2kgdh + k3kgdh)*kcat17kgdh*(1 + 10000*Kh1kgdh + 10^(-10 + 2*pHmkgdh)*Kh1kgdh)))*Km1kgdhCoA) + k2kgdh^2*k3kgdh^2*kcat17kgdh*(1 + 10000*Kh1kgdh + 10^(-10 + 2*pHmkgdh)*Kh1kgdh)*kus2uskgdh*(1 + k2kgdh*k3kgdh^2*kcat17kgdh*(1 + 10000*Kh1kgdh + 10^(-10 + 2*pHmkgdh)*Kh1kgdh)*CoA/((k2kgdh*k3kgdh - (k2kgdh + k3kgdh)*kcat17kgdh*(1 + 10000*Kh1kgdh + 10^(-10 + 2*pHmkgdh)*Kh1kgdh))*(k2kgdh*k3kgdh + k2kgdh^2*k3kgdh*kcat17kgdh*(1 + 10000*Kh1kgdh + 10^(-10 + 2*pHmkgdh)*Kh1kgdh)/(k2kgdh*k3kgdh - (k2kgdh + k3kgdh)*kcat17kgdh*(1 + 10000*Kh1kgdh + 10^(-10 + 2*pHmkgdh)*Kh1kgdh)) + k2kgdh*k3kgdh^2*kcat17kgdh*(1 + 10000*Kh1kgdh + 10^(-10 + 2*pHmkgdh)*Kh1kgdh)/(k2kgdh*k3kgdh - (k2kgdh + k3kgdh)*kcat17kgdh*(1 + 10000*Kh1kgdh + 10^(-10 + 2*pHmkgdh)*Kh1kgdh)))*Km1kgdhCoA))*KG*SucCoA/((k2kgdh*k3kgdh - (k2kgdh + k3kgdh)*kcat17kgdh*(1 + 10000*Kh1kgdh + 10^(-10 + 2*pHmkgdh)*Kh1kgdh))*(k2kgdh*k3kgdh + k2kgdh^2*k3kgdh*kcat17kgdh*(1 + 10000*Kh1kgdh + 10^(-10 + 2*pHmkgdh)*Kh1kgdh)/(k2kgdh*k3kgdh - (k2kgdh + k3kgdh)*kcat17kgdh*(1 + 10000*Kh1kgdh + 10^(-10 + 2*pHmkgdh)*Kh1kgdh)) + k2kgdh*k3kgdh^2*kcat17kgdh*(1 + 10000*Kh1kgdh + 10^(-10 + 2*pHmkgdh)*Kh1kgdh)/(k2kgdh*k3kgdh - (k2kgdh + k3kgdh)*kcat17kgdh*(1 + 10000*Kh1kgdh + 10^(-10 + 2*pHmkgdh)*Kh1kgdh)))*Km1kgdhKG) + k2kgdh^2*k3kgdh^2*kcat28kgdh*(1 + 100000*Kh1kgdh + 10^(-11 + 2*pHmkgdh)*Kh1kgdh)*kus2uskgdh*(1 + k2kgdh*k3kgdh^2*kcat17kgdh*(1 + 10000*Kh1kgdh + 10^(-10 + 2*pHmkgdh)*Kh1kgdh)*CoA/((k2kgdh*k3kgdh - (k2kgdh + k3kgdh)*kcat17kgdh*(1 + 10000*Kh1kgdh + 10^(-10 + 2*pHmkgdh)*Kh1kgdh))*(k2kgdh*k3kgdh + k2kgdh^2*k3kgdh*kcat17kgdh*(1 + 10000*Kh1kgdh + 10^(-10 + 2*pHmkgdh)*Kh1kgdh)/(k2kgdh*k3kgdh - (k2kgdh + k3kgdh)*kcat17kgdh*(1 + 10000*Kh1kgdh + 10^(-10 + 2*pHmkgdh)*Kh1kgdh)) + k2kgdh*k3kgdh^2*kcat17kgdh*(1 + 10000*Kh1kgdh + 10^(-10 + 2*pHmkgdh)*Kh1kgdh)/(k2kgdh*k3kgdh - (k2kgdh + k3kgdh)*kcat17kgdh*(1 + 10000*Kh1kgdh + 10^(-10 + 2*pHmkgdh)*Kh1kgdh)))*Km1kgdhCoA))*KG^2*SucCoA/(Kd2kgdhKG*(k2kgdh*k3kgdh - (k2kgdh + k3kgdh)*kcat28kgdh*(1 + 100000*Kh1kgdh + 10^(-11 + 2*pHmkgdh)*Kh1kgdh))*(k2kgdh*k3kgdh + k2kgdh^2*k3kgdh*kcat17kgdh*(1 + 10000*Kh1kgdh + 10^(-10 + 2*pHmkgdh)*Kh1kgdh)/(k2kgdh*k3kgdh - (k2kgdh + k3kgdh)*kcat17kgdh*(1 + 10000*Kh1kgdh + 10^(-10 + 2*pHmkgdh)*Kh1kgdh)) + k2kgdh*k3kgdh^2*kcat17kgdh*(1 + 10000*Kh1kgdh + 10^(-10 + 2*pHmkgdh)*Kh1kgdh)/(k2kgdh*k3kgdh - (k2kgdh + k3kgdh)*kcat17kgdh*(1 + 10000*Kh1kgdh + 10^(-10 + 2*pHmkgdh)*Kh1kgdh)))*Km1kgdhKG) + kus2uskgdh*kus3uskgdh*(1 + k2kgdh*k3kgdh^2*kcat17kgdh*(1 + 10000*Kh1kgdh + 10^(-10 + 2*pHmkgdh)*Kh1kgdh)*CoA/((k2kgdh*k3kgdh - (k2kgdh + k3kgdh)*kcat17kgdh*(1 + 10000*Kh1kgdh + 10^(-10 + 2*pHmkgdh)*Kh1kgdh))*(k2kgdh*k3kgdh + k2kgdh^2*k3kgdh*kcat17kgdh*(1 + 10000*Kh1kgdh + 10^(-10 + 2*pHmkgdh)*Kh1kgdh)/(k2kgdh*k3kgdh - (k2kgdh + k3kgdh)*kcat17kgdh*(1 + 10000*Kh1kgdh + 10^(-10 + 2*pHmkgdh)*Kh1kgdh)) + k2kgdh*k3kgdh^2*kcat17kgdh*(1 + 10000*Kh1kgdh + 10^(-10 + 2*pHmkgdh)*Kh1kgdh)/(k2kgdh*k3kgdh - (k2kgdh + k3kgdh)*kcat17kgdh*(1 + 10000*Kh1kgdh + 10^(-10 + 2*pHmkgdh)*Kh1kgdh)))*Km1kgdhCoA))*NADH*SucCoA));
  v40: ADP + SucCoA -> ATP + CoA + Suc; Vmsk*(-(ATP*CoA*Suc/Keqsk) + Phosph*ADP*SucCoA)/(Defaultmc*(KmADPsk*KmPhosphsk*KmSucCoAsk + KmADPsk*KmSucCoAsk*Phosph + KmPhosphsk*KmSucCoAsk*ADP + KmSucCoAsk*Phosph*ADP + KmADPsk*KmPhosphsk*KmSucCoAsk*(ATP/KmATPsk + CoA/KmCoAsk + ATP*CoA/(KmATPsk*KmCoAsk) + Suc/KmSucsk + ATP*Suc/(KmATPsk*KmSucsk) + CoA*Suc/(KmCoAsk*KmSucsk) + ATP*CoA*Suc/(KmATPsk*KmCoAsk*KmSucsk)) + KmADPsk*KmPhosphsk*SucCoA + KmADPsk*Phosph*SucCoA + KmPhosphsk*ADP*SucCoA + Phosph*ADP*SucCoA));
  v41: Q + Suc -> Fum + QH2; SDH*(-(kr78*Fum*QH2/(KefFum78*KmQH278)) + kf78*Q*Suc/(KesSuc78*KmQ78))/(Defaultmc*(1 + 10^(-3 + pH)*K3 + 10^(3 - pH)/K4 + (1 + 10^(3 - pH)/K10 + 10^(-3 + pH)*K9)*Fum/((1 + 1.584893e-5/K10 + 63095.73*K9)*KefFum78) + (1 + 10^(-3 + pH)*K3 + 10^(3 - pH)/K4)*KmSuc75*Q/((1 + 63095.73*K3 + 1.584893e-5/K4)*KesSuc78*KmQ78) + (1 + 10^(3 - pH)/K10 + 10^(-3 + pH)*K9)*KmFum7*QH2/((1 + 1.584893e-5/K10 + 63095.73*K9)*KefFum78*KmQH278) + (1 + 10^(3 - pH)/K10 + 10^(-3 + pH)*K9)*Fum*QH2/((1 + 1.584893e-5/K10 + 63095.73*K9)*KefFum78*KmQH278) + (1 + 10^(-3 + pH)*K3 + 10^(3 - pH)/K4)*Suc/((1 + 63095.73*K3 + 1.584893e-5/K4)*KesSuc78) + (1 + 10^(-3 + pH)*K3 + 10^(3 - pH)/K4)*Q*Suc/((1 + 63095.73*K3 + 1.584893e-5/K4)*KesSuc78*KmQ78)));
  v42: Fum -> Mal; FUM*((1 + 10^(-3 + pH)*K1e + 10^(3 - pH)/K2e)*(1 + 31622.78*K1ef + 3.162278e-5/K2ef)^2*kffum75*KmfumMal75*Fum/((1 + 31622.78*K1e + 3.162278e-5/K2e)*(1 + 10^(-3 + pH)*K1ef + 10^(3 - pH)/K2ef)^2) - (1 + 10^(-3 + pH)*K1e + 10^(3 - pH)/K2e)*(1 + 31622.78*K1ef + 3.162278e-5/K2ef)^2*KmfumFum75*krfum75*Mal/((1 + 31622.78*K1e + 3.162278e-5/K2e)*(1 + 10^(-3 + pH)*K1ef + 10^(3 - pH)/K2ef)^2))/(Defaultmc*((1 + 10^(-3 + pH)*K1e + 10^(3 - pH)/K2e)^2*(1 + 31622.78*K1ef + 3.162278e-5/K2ef)^2*KmfumFum75*KmfumMal75/((1 + 31622.78*K1e + 3.162278e-5/K2e)^2*(1 + 10^(-3 + pH)*K1ef + 10^(3 - pH)/K2ef)^2) + (1 + 10^(-3 + pH)*K1e + 10^(3 - pH)/K2e)*(1 + 31622.78*K1ef + 3.162278e-5/K2ef)*KmfumMal75*Fum/((1 + 31622.78*K1e + 3.162278e-5/K2e)*(1 + 10^(-3 + pH)*K1ef + 10^(3 - pH)/K2ef)) + (1 + 10^(-3 + pH)*K1e + 10^(3 - pH)/K2e)*(1 + 31622.78*K1ef + 3.162278e-5/K2ef)*KmfumFum75*Mal/((1 + 31622.78*K1e + 3.162278e-5/K2e)*(1 + 10^(-3 + pH)*K1ef + 10^(3 - pH)/K2ef))));
  v43: Mal + Q -> OAA + QH2; Vmmqo*(Mal*Q - OAA*QH2/Keqmqo)/(Defaultmc*(KmMalmqo*KmQmqo + KmQmqo*Mal + KmMalmqo*Q + Mal*Q + KmMalmqo*KmQmqo*(OAA/KmOAAmqo + QH2/KmQH2mqo + OAA*QH2/(KmOAAmqo*KmQH2mqo))));
  v44: Mal + NAD -> NADH + OAA; MDH*(KeqMDH*krMDH*Mal*NAD/(KimdhNADH*KmmdhOAA) - krMDH*NADH*OAA/(KimdhNADH*KmmdhOAA))/(Defaultmc*(1 + KmmdhNAD*Mal/(KimdhNAD*KmmdhMal) + NAD/KimdhNAD + Mal*NAD/(KimdhNAD*KmmdhMal) + NADH/KimdhNADH + KmmdhNAD*Mal*NADH/(KimdhNAD*KimdhNADH*KmmdhMal) + KmmdhNADH*OAA/(KimdhNADH*KmmdhOAA) + KmmdhNADH*NAD*OAA/(KimdhNAD*KimdhNADH*KmmdhOAA) + Mal*NAD*OAA/(KimdhNAD*KimdhOAA*KmmdhMal) + NADH*OAA/(KimdhNADH*KmmdhOAA) + KimdhNADH*KmmdhNAD*KmmdhOAA*Mal*NADH*OAA/(KeqMDH*KimdhNAD^2*KimdhOAA*KmmdhMal^2*KmmdhNADH)));
  v45: iCit -> Glx + Suc; AceA*kfaceA*(iCit - Glx*Suc/KeqaceA)/(Defaultmc*(iCit*(1 + PEP/KdPEPiCitaceA) + KmiCitaceA*(1 + PEP/KdPEPaceA + PGA3/KdPGA3aceA) + KmiCitaceA*iCit*Suc/(KdiCitSucaceA*KdSucaceA) + KmiCitaceA*(KmSucaceA*Glx*(1 + PEP/KdPEPGlxaceA) + KmGlxaceA*Suc + Glx*Suc)/(KdSucaceA*KmGlxaceA)));  // modifiers: PEP, PGA3
  v46: AcCoA + Glx -> CoA + Mal; VmaceB*(AcCoA*Glx - CoA*Mal/KeqaceB)/(Defaultmc*(KmAcCoAaceB*KmGlxaceB + KmGlxaceB*AcCoA + KmAcCoAaceB*Glx + AcCoA*Glx + KmAcCoAaceB*KmGlxaceB*(CoA/KmCoAaceB + Mal/KmMalaceB + CoA*Mal/(KmCoAaceB*KmMalaceB))));
  v47: ATP + ICD -> ADP + ICDP; KkaceK*(ATP*ICD - ADP*ICDP/KeqkaceK)/Defaultmc;
  v48: ICDP -> ICD; KpaceK*(-(ICD/KeqpaceK) + ICDP)/Defaultmc;
  v49: PGn -> KDPG; Vmedd*(-(KDPG/Keqedd) + PGn)/(Defaultmc*(KmPGnedd + KmPGnedd*KDPG/KmKDPGedd + PGn));
  v50: KDPG -> GAP + Pyr; Vmeda*(KDPG - GAP*Pyr/Keqeda)/(Defaultmc*(KmKDPGeda + KDPG + KmKDPGeda*(GAP/KmGAPeda + Pyr/KmPyreda + Glx*Pyr/(KmGAPeda*KmPyreda))));  // modifiers: Glx
  v51: NADH -> NAD; KrecNADH*(-(NAD/KeqNADH) + NADH)/Defaultmc;
  v52: NADPH -> NADP; KrecNADPH*(-(NADP/KeqNADPH) + NADPH)/Defaultmc;
  v53: NAD + NADPH -> NADH + NADP; Krecpnt*(-(NADH*NADP/Keqpnt) + NAD*NADPH)/Defaultmc;
  v54: QH2 -> Q; KrecQH2*(-(Q/KeqQH2) + QH2)/Defaultmc;
  v55: AMP + ATP -> 2 ADP; Krecadk*(-(ADP^2/Keqadk) + AMP*ATP)/Defaultmc;
  v56: ADP -> ATP; KrecATPsynth*(Phosph*ADP - ATP/KeqATPsynth)/Defaultmc;
  v57: ATP -> cAMP; (KreccyaA*ATP - KusrecuscyaA*cAMP)/Defaultmc;
  v58: cAMP -> AMP; (-(KusrecuscpdA*AMP) + KreccpdA*cAMP)/Defaultmc;
  v59: AcCoA -> Ace + CoA; KrecAcCoA*(AcCoA - Ace*CoA/KeqAcCoA)/Defaultmc;
  v60: G6P -> $EXTERNAL; KoutG6P*G6P/Defaultmc;
  v61: F6P -> $EXTERNAL; KoutF6P*F6P/Defaultmc;
  v62: DAP -> $EXTERNAL; KoutDAP*DAP/Defaultmc;
  v63: GAP -> $EXTERNAL; KoutGAP*GAP/Defaultmc;
  v64: PGA3 -> $EXTERNAL; KoutPGA3*PGA3/Defaultmc;
  v65: PEP -> $EXTERNAL; KoutPEP*PEP/Defaultmc;
  v66: Pyr -> $EXTERNAL; KoutPyr*Pyr/Defaultmc;
  v67: E4P -> $EXTERNAL; KoutE4P*E4P/Defaultmc;
  v68: R5P -> $EXTERNAL; KoutR5P*R5P/Defaultmc;
  v69: S7P -> $EXTERNAL; KoutS7P*S7P/Defaultmc;
  v70: Ru5P -> $EXTERNAL; KoutRu5P*Ru5P/Defaultmc;
  v71: OAA -> $EXTERNAL; KoutOAA*OAA/Defaultmc;
  v72: KG -> $EXTERNAL; KoutKG*KG/Defaultmc;
  v73: SucCoA -> CoA; KoutSucCoA*SucCoA/Defaultmc;
  v74: AcCoA -> CoA; KoutAcCoA*AcCoA/Defaultmc;
  v75: Ace -> $EXTERNAL; KoutAce*Ace/Defaultmc;
end
